# EPD of WIN WIN Mono Crystalline Silicon Photovoltaic (PV) Modules

Dataset: ILCD process, EPD, specific dataset
Geography: GLO
Reference year: 2024
Valid until: 2029
Classification: The International EPD System: Construction products, Infrastructure & buildings
Functional unit: 1 Wp (Watt-peak) of manufactured PV module, from cradle-to-grave, with activities needed for a reference service of life (RSL) of 30 years (≥80% of the labelled power output).
Method details: Construction products (EN 15804A2)
Generated by: Hongyu Tian, hongyu.tian@tuvsud.com
Registration number: EPD-IES-0007690:003
Owner: WIN WIN Precision Technology Co., Ltd.
Compliance: EN 15804+A2 (EF 3.1); ISO 14025
Review: Independent external review by Marcel Gómez Ferrer
Amounts: rows without a unit in brackets have none in this file; such an amount is in the reference unit of its flow, which a separate flow dataset defines
copyright: true
licenseType: Free of charge for all users and uses
accessRestrictions: Your use of this material is subject to the General Terms of Use published on by EPD International AB:s homepage at https://www.environdec.com/contact/General-terms-of-use/. If you have not accepted EPD International AB:s the General Terms of Use, you are not authorized to exploit this work in any manner.

## Technology and included processes
WIN's PV modules combine half-cell, 16 busbars and reflective wires as well as TOPCon technology to maximize module efficiency and improve temperature coefficients to perform well even in hot weather.

## Technical purpose
The function of the PV module is to generate electricity. For Building-Integrated-PV (BIPV) applications, there is an additional function of providing roofing to the building.

## Reference product
- 1 Wp of PV modules: 1

## Inputs
- Use of renewable primary energy as energy carrier (PERE) [MJ]: A1-A3 0.95, A4 0.00191, A5 0.000213, B1 0, B2 2.81e-5, B3 0, B4 0, B5 0, B6 0, B7 0, C1 0.00018, C2 0.000122, C3 0.0142, C4 0.000182, D -0.0855
- Use of renewable primary energy resources used as raw materials (PERM) [MJ]: A1-A3 0.0322, A4 0, A5 0, B1 0, B2 0, B3 0, B4 0, B5 0, B6 0, B7 0, C1 0, C2 0, C3 0, C4 0, D 0
- Total use of renewable primary energy (PERT) [MJ]: A1-A3 0.983, A4 0.00191, A5 0.000213, B1 0, B2 2.81e-5, B3 0, B4 0, B5 0, B6 0, B7 0, C1 0.00018, C2 0.000122, C3 0.0142, C4 0.000182, D -0.0855
- Use of non renewable primary energy as energy carrier (PENRE) [MJ]: A1-A3 4.88, A4 0.212, A5 0.0196, B1 0, B2 0.00019, B3 0, B4 0, B5 0, B6 0, B7 0, C1 0.018, C2 0.00778, C3 0.109, C4 0.00565, D -0.152
- Use of non renewable primary energy resources used as raw materials (PENRM) [MJ]: A1-A3 0.307, A4 0, A5 0, B1 0, B2 0, B3 0, B4 0, B5 0, B6 0, B7 0, C1 0, C2 0, C3 0, C4 0, D 0
- Total use of non renewable primary energy resource (PENRT) [MJ]: A1-A3 5.19, A4 0.212, A5 0.0196, B1 0, B2 0.00019, B3 0, B4 0, B5 0, B6 0, B7 0, C1 0.018, C2 0.00778, C3 0.109, C4 0.00565, D -0.152
- Use of secondary material (SM) [kg]: A1-A3 0, A4 0, A5 0, B1 0, B2 0, B3 0, B4 0, B5 0, B6 0, B7 0, C1 0, C2 0, C3 0, C4 0, D 0
- Use of renewable secondary fuels (RSF) [MJ]: A1-A3 0, A4 0, A5 0, B1 0, B2 0, B3 0, B4 0, B5 0, B6 0, B7 0, C1 0, C2 0, C3 0, C4 0, D 0
- Use of non renewable secondary fuels (NRSF) [MJ]: A1-A3 0, A4 0, A5 0, B1 0, B2 0, B3 0, B4 0, B5 0, B6 0, B7 0, C1 0, C2 0, C3 0, C4 0, D 0
- Net use of fresh water (FW) [m3]: A1-A3 -0.0119, A4 2.13e-5, A5 3.08e-6, B1 0, B2 3.39e-5, B3 0, B4 0, B5 0, B6 0, B7 0, C1 1.61e-6, C2 1.12e-6, C3 5.19e-5, C4 2.98e-5, D -0.000218

## Outputs
- Hazardous waste disposed (HWD) [kg]: A1-A3 0.00039, A4 1.17e-6, A5 1.31e-7, B1 0, B2 5.59e-10, B3 0, B4 0, B5 0, B6 0, B7 0, C1 1.21e-7, C2 5.01e-8, C3 2.7e-7, C4 3.23e-8, D -4.29e-7
- Non harzardous waste disposed (NHWD) [kg]: A1-A3 0.0412, A4 0.00372, A5 0.000156, B1 0, B2 2.23e-6, B3 0, B4 0, B5 0, B6 0, B7 0, C1 2.7e-5, C2 0.000391, C3 0.000237, C4 0.00875, D -0.00545
- Radioactive waste disposed (RWD) [kg]: A1-A3 6.01e-6, A4 3.07e-8, A5 3.51e-9, B1 0, B2 1.04e-9, B3 0, B4 0, B5 0, B6 0, B7 0, C1 2.85e-9, C2 2.59e-9, C3 2.2e-7, C4 2.5e-9, D -2.67e-7
- Components for re-use (CRU) [kg]: A1-A3 0, A4 0, A5 0, B1 0, B2 0, B3 0, B4 0, B5 0, B6 0, B7 0, C1 0, C2 0, C3 0, C4 0, D 0
- Materials for recycling (MFR) [kg]: A1-A3 0, A4 0, A5 0.00133, B1 0, B2 0, B3 0, B4 0, B5 0, B6 0, B7 0, C1 0, C2 0, C3 0.0433, C4 0, D 0
- Materials for energy recovery (MER) [kg]: A1-A3 0, A4 0, A5 0, B1 0, B2 0, B3 0, B4 0, B5 0, B6 0, B7 0, C1 0, C2 0, C3 0.00819, C4 0, D 0
- Exported electrical energy (EEE) [MJ]: A1-A3 0, A4 0, A5 0, B1 0, B2 0, B3 0, B4 0, B5 0, B6 0, B7 0, C1 0, C2 0, C3 0, C4 0.0114, D 0
- Exported thermal energy (EET) [MJ]: A1-A3 0, A4 0, A5 0, B1 0, B2 0, B3 0, B4 0, B5 0, B6 0, B7 0, C1 0, C2 0, C3 0, C4 0.0233, D 0

## Impact indicators
- Global Warming Potential - fossil fuels (GWP-fossil) [kg CO2 eq.]: A1-A3 0.424, A4 0.0168, A5 0.00207, B1 0, B2 9.86e-6, B3 0, B4 0, B5 0, B6 0, B7 0, C1 0.00138, C2 0.000554, C3 0.027, C4 -0.00257, D -0.0714
- Global Warming Potential - biogenic (GWP-biogenic) [kg CO2 eq.]: A1-A3 -0.00405, A4 0, A5 0.00405, B1 0, B2 0, B3 0, B4 0, B5 0, B6 0, B7 0, C1 0, C2 0, C3 0, C4 0, D 0
- Global Warming Potential - land use and land use change (GWP-luluc) [kg CO2 eq.]: A1-A3 0.000488, A4 1.18e-5, A5 2.22e-7, B1 0, B2 1.72e-8, B3 0, B4 0, B5 0, B6 0, B7 0, C1 1.64e-7, C2 2.74e-7, C3 2.68e-6, C4 -1.11e-7, D -0.000943
- Global Warming Potential - total (GWP-total) [kg CO2 eq.]: A1-A3 0.421, A4 0.0168, A5 0.00612, B1 0, B2 9.87e-6, B3 0, B4 0, B5 0, B6 0, B7 0, C1 0.00138, C2 0.000555, C3 0.027, C4 -0.00257, D -0.0723
- Depletion potential of the stratospheric ozone layer (ODP) [kg CFC-11 eq.]: A1-A3 8.57e-9, A4 2.6e-10, A5 2.62e-11, B1 0, B2 2.79e-13, B3 0, B4 0, B5 0, B6 0, B7 0, C1 2.25e-11, C2 1.21e-11, C3 2.5e-10, C4 -1.06e-10, D -7.69e-10
- Acidifcation potential, Accumulated Exceedance (AP) [mol H+ eq.]: A1-A3 0.0025, A4 0.000369, A5 1.31e-5, B1 0, B2 5.39e-8, B3 0, B4 0, B5 0, B6 0, B7 0, C1 1.26e-5, C2 1.21e-6, C3 1.73e-5, C4 -3.19e-6, D -0.000627
- Europhication potential - freshwater (EP-freshwater) [kg P eq.]: A1-A3 6.96e-5, A4 9.25e-8, A5 7.57e-9, B1 0, B2 7.11e-10, B3 0, B4 0, B5 0, B6 0, B7 0, C1 6.19e-9, C2 4.5e-9, C3 3e-7, C4 -2.76e-9, D -1.55e-6
- Europhication potential - marine (EP-marine) [kg N eq.]: A1-A3 0.000606, A4 9.19e-5, A5 6.02e-6, B1 0, B2 8.93e-9, B3 0, B4 0, B5 0, B6 0, B7 0, C1 5.82e-6, C2 2.98e-7, C3 5.49e-6, C4 -1.35e-6, D -9.02e-5
- Europhication potential - terrestrial (EP-terrestrial) [mol N eq.]: A1-A3 0.00549, A4 0.00102, A5 6.54e-5, B1 0, B2 1.01e-7, B3 0, B4 0, B5 0, B6 0, B7 0, C1 6.33e-5, C2 3.11e-6, C3 6.15e-5, C4 -1.61e-5, D -0.00106
- Photochemical Ozone Creation Potential (POCP) [kg NMVOC eq.]: A1-A3 0.0016, A4 0.000282, A5 1.95e-5, B1 0, B2 3.69e-8, B3 0, B4 0, B5 0, B6 0, B7 0, C1 1.88e-5, C2 1.88e-6, C3 1.75e-5, C4 -6.66e-6, D -0.000313
- Abiotic depletion potential - non-fossil resources (ADPE) [kg Sb eq.]: A1-A3 1.95e-5, A4 2.72e-8, A5 1.13e-9, B1 0, B2 5.18e-11, B3 0, B4 0, B5 0, B6 0, B7 0, C1 7.56e-10, C2 1.81e-9, C3 1.09e-8, C4 -6.82e-10, D 2.58e-7
- Abiotic depletion potential - fossil resources (ADPF) [MJ]: A1-A3 5.18, A4 0.215, A5 0.0198, B1 0, B2 0.000177, B3 0, B4 0, B5 0, B6 0, B7 0, C1 0.0182, C2 0.00787, C3 0.112, C4 -0.0324, D -0.47
- Water (user) deprivation potential (WDP) [m3 world eq. deprived]: A1-A3 -0.607, A4 0.00063, A5 0.000124, B1 0, B2 0.00135, B3 0, B4 0, B5 0, B6 0, B7 0, C1 4.25e-5, C2 3.25e-5, C3 0.00177, C4 5.34e-5, D -0.0156
- Global Warming Potential (GWP-GHG) [kg CO2 eq.]: A1-A3 0.425, A4 0.0168, A5 0.00207, B1 0, B2 9.87e-6, B3 0, B4 0, B5 0, B6 0, B7 0, C1 0.00138, C2 0.000555, C3 0.027, C4 -0.00257, D -0.0723
- Particulate Matter emissions (PM) [Disease incidence]: A1-A3 3.1e-8, A4 7.07e-10, A5 3.6e-10, B1 0, B2 5.37e-13, B3 0, B4 0, B5 0, B6 0, B7 0, C1 3.5e-10, C2 4.11e-11, C3 7.6e-11, C4 4.05e-13, D -8.16e-9
- Ionizing radiation, human health (IRP) [kBq U235 eq.]: A1-A3 0.009, A4 5.57e-5, A5 5.65e-6, B1 0, B2 1.2e-6, B3 0, B4 0, B5 0, B6 0, B7 0, C1 4.66e-6, C2 3.99e-6, C3 0.000251, C4 -1.8e-6, D -0.00185
- Eco-toxicity - freshwater (ETP-fw) [CTUe]: A1-A3 5.93, A4 0.109, A5 0.0116, B1 0, B2 4.52e-5, B3 0, B4 0, B5 0, B6 0, B7 0, C1 0.00854, C2 0.00389, C3 0.0503, C4 -0.000588, D -0.369
- Human toxicity, cancer effect (HTP-c) [CTUh]: A1-A3 1.81e-9, A4 7.37e-12, A5 6.3e-13, B1 0, B2 4.35e-14, B3 0, B4 0, B5 0, B6 0, B7 0, C1 4.25e-13, C2 2.53e-13, C3 3.28e-12, C4 -2.2e-13, D -1.32e-10
- Human toxicity, non-cancer effects (HTP-nc) [CTUh]: A1-A3 1.29e-7, A4 9.13e-11, A5 9.95e-12, B1 0, B2 5.7e-13, B3 0, B4 0, B5 0, B6 0, B7 0, C1 3.26e-12, C2 5.59e-12, C3 9.39e-11, C4 -2.59e-12, D -1.04e-9
- Land use related impacts/Soil quality (SQP) [dimensionless]: A1-A3 1.72, A4 0.0519, A5 0.00229, B1 0, B2 3.86e-5, B3 0, B4 0, B5 0, B6 0, B7 0, C1 0.00129, C2 0.00476, C3 0.0229, C4 0.00448, D -0.13

## Use advice
WIN's PV modules encompasses the life cycle stages of the product, from cradle to gate with options (A4-A5-B2)+C+D, including raw materials acquisition, transportation, manufacturing, delivery, installation, maintenance, waste disposal for end-of-life and benefits and loads after end-of-life.

## Data sources
- ecoinvent database (general)
- ecoinvent 3.9.1 database
