# Environmental Product Declaration for Photovoltaic Modules

Dataset: ILCD process, EPD, average dataset
Geography: GLO
Reference year: 2025
Valid until: 2030
Classification: The International EPD System: Construction products, Infrastructure & buildings
Functional unit: W(Watt)
Method details: Construction products (EN 15804+A2) (version 2.0.1)
Generated by: Bella Hu, behu@tuv-nord.com
Registration number: EPD-IES-0025024:002
Owner: Tongwei Co., Ltd.
Compliance: EN 15804+A2 (EF 3.1); ISO 14025
Review: Independent external review by Jiang Zhu
Amounts: rows without a unit in brackets have none in this file; such an amount is in the reference unit of its flow, which a separate flow dataset defines
copyright: true
licenseType: Free of charge for all users and uses
accessRestrictions: Your use of this material is subject to the General Terms of Use published on by EPD International AB:s homepage at https://www.environdec.com/contact/General-terms-of-use/. If you have not accepted EPD International AB:s the General Terms of Use, you are not authorized to exploit this work in any manner.

## Technology and included processes
The photovoltaic (PV) modules are mainly made by a lamination of PV cells, front glass, encapsulation, interconnection and busbar string, junction box and Aluminum frame are adhered to the lamination. the manufacturing flow process is cell loading, half-cutting, soldering, layup, framing, solidification & clean and final test & packaging.

## Technical purpose
The PV modules are used to convert light into electricity.

## Reference product
- Photovoltaic module: 1

## Inputs
- Use of renewable primary energy as energy carrier (PERE) [MJ]: A1-A3 1.06, A4 0.00244, A5 0.000114, B1 ND, B2 0.00137, B3 ND, B4 ND, B5 ND, B6 ND, B7 ND, C1 0.000107, C2 0.000106, C3 0.00467, C4 7.96e-5, D -0.066
- Use of renewable primary energy resources used as raw materials (PERM) [MJ]: A1-A3 0.0306, A4 0, A5 0, B1 ND, B2 0, B3 ND, B4 ND, B5 ND, B6 ND, B7 ND, C1 0, C2 0, C3 0, C4 0, D 0
- Total use of renewable primary energy (PERT) [MJ]: A1-A3 1.09, A4 0.00244, A5 0.000114, B1 ND, B2 0.00137, B3 ND, B4 ND, B5 ND, B6 ND, B7 ND, C1 0.000107, C2 0.000106, C3 0.00467, C4 7.96e-5, D -0.066
- Use of non renewable primary energy as energy carrier (PENRE) [MJ]: A1-A3 6.15, A4 0.236, A5 0.0187, B1 ND, B2 0.0148, B3 ND, B4 ND, B5 ND, B6 ND, B7 ND, C1 0.0184, C2 0.00648, C3 0.0171, C4 0.00288, D -1
- Use of non renewable primary energy resources used as raw materials (PENRM) [MJ]: A1-A3 0.14, A4 0, A5 0, B1 ND, B2 0, B3 ND, B4 ND, B5 ND, B6 ND, B7 ND, C1 0, C2 0, C3 0, C4 0, D 0
- Total use of non renewable primary energy resource (PENRT) [MJ]: A1-A3 6.29, A4 0.236, A5 0.0187, B1 ND, B2 0.0148, B3 ND, B4 ND, B5 ND, B6 ND, B7 ND, C1 0.0184, C2 0.00648, C3 0.0171, C4 0.00288, D -1
- Use of secondary material (SM) [kg]: A1-A3 0, A4 0, A5 0, B1 ND, B2 0, B3 ND, B4 ND, B5 ND, B6 ND, B7 ND, C1 0, C2 0, C3 0, C4 0, D 0
- Use of renewable secondary fuels (RSF) [MJ]: A1-A3 0, A4 0, A5 0, B1 ND, B2 0, B3 ND, B4 ND, B5 ND, B6 ND, B7 ND, C1 0, C2 0, C3 0, C4 0, D 0
- Use of non renewable secondary fuels (NRSF) [MJ]: A1-A3 0, A4 0, A5 0, B1 ND, B2 0, B3 ND, B4 ND, B5 ND, B6 ND, B7 ND, C1 0, C2 0, C3 0, C4 0, D 0
- Net use of fresh water (FW) [m3]: A1-A3 0.0146, A4 2.56e-5, A5 1.36e-6, B1 ND, B2 0.000965, B3 ND, B4 ND, B5 ND, B6 ND, B7 ND, C1 1.34e-6, C2 8.87e-7, C3 -1.03e-5, C4 -1.38e-5, D -0.000341

## Outputs
- Hazardous waste disposed (HWD) [kg]: A1-A3 0.000549, A4 4.81e-6, A5 2.69e-6, B1 ND, B2 8.19e-7, B3 ND, B4 ND, B5 ND, B6 ND, B7 ND, C1 1.66e-7, C2 1.6e-7, C3 7.61e-7, C4 0.000207, D -2.94e-5
- Non harzardous waste disposed (NHWD) [kg]: A1-A3 0.0206, A4 0.00661, A5 0.000261, B1 ND, B2 8.99e-5, B3 ND, B4 ND, B5 ND, B6 ND, B7 ND, C1 1.15e-5, C2 0.000307, C3 0.00719, C4 0.0105, D -0.00204
- Radioactive waste disposed (RWD) [kg]: A1-A3 1.06e-5, A4 3.86e-8, A5 2.07e-9, B1 ND, B2 2.52e-8, B3 ND, B4 ND, B5 ND, B6 ND, B7 ND, C1 1.96e-9, C2 2.06e-9, C3 2.76e-8, C4 1.21e-9, D -4.52e-7
- Components for re-use (CRU) [kg]: A1-A3 0, A4 0, A5 0, B1 ND, B2 0, B3 ND, B4 ND, B5 ND, B6 ND, B7 ND, C1 0, C2 0, C3 0, C4 0, D 0
- Materials for recycling (MFR) [kg]: A1-A3 0, A4 0, A5 0.000422, B1 ND, B2 0, B3 ND, B4 ND, B5 ND, B6 ND, B7 ND, C1 0, C2 0, C3 0, C4 0, D 0
- Materials for energy recovery (MER) [kg]: A1-A3 0, A4 0, A5 0, B1 ND, B2 0, B3 ND, B4 ND, B5 ND, B6 ND, B7 ND, C1 0, C2 0, C3 0, C4 0, D 0
- Exported electrical energy (EEE) [MJ]: A1-A3 1.77e-5, A4 0, A5 0.000306, B1 ND, B2 0, B3 ND, B4 ND, B5 ND, B6 ND, B7 ND, C1 0, C2 0, C3 0, C4 0.016, D 0
- Exported thermal energy (EET) [MJ]: A1-A3 0.000239, A4 0, A5 0.000601, B1 ND, B2 0, B3 ND, B4 ND, B5 ND, B6 ND, B7 ND, C1 0, C2 0, C3 0, C4 0.0308, D 0

## Impact indicators
- Global Warming Potential - fossil fuels (GWP-fossil) [kg CO2 eq.]: A1-A3 0.495, A4 0.0179, A5 0.00162, B1 ND, B2 0.00124, B3 ND, B4 ND, B5 ND, B6 ND, B7 ND, C1 0.00139, C2 0.000461, C3 0.00105, C4 0.0108, D -0.102
- Global Warming Potential - biogenic (GWP-biogenic) [kg CO2 eq.]: A1-A3 -0.0226, A4 2.86e-6, A5 0.0239, B1 ND, B2 1.12e-6, B3 ND, B4 ND, B5 ND, B6 ND, B7 ND, C1 1.24e-7, C2 8.26e-8, C3 4.37e-6, C4 5.03e-7, D -0.000189
- Global Warming Potential - land use and land use change (GWP-luluc) [kg CO2 eq.]: A1-A3 0.000537, A4 8.12e-6, A5 1.29e-7, B1 ND, B2 1.02e-6, B3 ND, B4 ND, B5 ND, B6 ND, B7 ND, C1 1.2e-7, C2 1.51e-7, C3 1.64e-7, C4 5.78e-8, D -2.39e-5
- Global Warming Potential - total (GWP-total) [kg CO2 eq.]: A1-A3 0.473, A4 0.0179, A5 0.0255, B1 ND, B2 0.00124, B3 ND, B4 ND, B5 ND, B6 ND, B7 ND, C1 0.00139, C2 0.000461, C3 0.00105, C4 0.0108, D -0.102
- Depletion potential of the stratospheric ozone layer (ODP) [kg CFC-11 eq.]: A1-A3 2.41e-8, A4 2.53e-10, A5 2.22e-11, B1 ND, B2 2.24e-10, B3 ND, B4 ND, B5 ND, B6 ND, B7 ND, C1 2.18e-11, C2 9.17e-12, C3 2.24e-11, C4 5.3e-12, D -6.27e-10
- Acidifcation potential, Accumulated Exceedance (AP) [mol H+ eq.]: A1-A3 0.00282, A4 0.00027, A5 1.24e-5, B1 ND, B2 6.41e-6, B3 ND, B4 ND, B5 ND, B6 ND, B7 ND, C1 1.22e-5, C2 1.44e-6, C3 4.66e-6, C4 3.06e-6, D -0.000855
- Europhication potential - freshwater (EP-freshwater) [kg P eq.]: A1-A3 0.000219, A4 1.02e-6, A5 4.25e-8, B1 ND, B2 4.18e-7, B3 ND, B4 ND, B5 ND, B6 ND, B7 ND, C1 4.02e-8, C2 3.08e-8, C3 1.47e-7, C4 6.7e-8, D -4.37e-5
- Europhication potential - marine (EP-marine) [kg N eq.]: A1-A3 0.000526, A4 6.95e-5, A5 5.77e-6, B1 ND, B2 1.3e-6, B3 ND, B4 ND, B5 ND, B6 ND, B7 ND, C1 5.66e-6, C2 4.86e-7, C3 1.25e-6, C4 1.97e-6, D -0.000119
- Europhication potential - terrestrial (EP-terrestrial) [mol N eq.]: A1-A3 0.00548, A4 0.00077, A5 6.25e-5, B1 ND, B2 1.34e-5, B3 ND, B4 ND, B5 ND, B6 ND, B7 ND, C1 6.2e-5, C2 5.29e-6, C3 1.36e-5, C4 1.59e-5, D -0.00132
- Photochemical Ozone Creation Potential (POCP) [kg NMVOC eq.]: A1-A3 0.00199, A4 0.000223, A5 1.87e-5, B1 ND, B2 4.09e-6, B3 ND, B4 ND, B5 ND, B6 ND, B7 ND, C1 1.85e-5, C2 2.26e-6, C3 4.93e-6, C4 4.06e-6, D -0.000408
- Abiotic depletion potential - non-fossil resources (ADPE) [kg Sb eq.]: A1-A3 1.81e-5, A4 3.92e-8, A5 6.16e-10, B1 ND, B2 5.51e-9, B3 ND, B4 ND, B5 ND, B6 ND, B7 ND, C1 5.34e-10, C2 1.47e-9, C3 1.78e-9, C4 4.44e-10, D -1.06e-5
- Abiotic depletion potential - fossil resources (ADPF) [MJ]: A1-A3 6.29, A4 0.236, A5 0.0187, B1 ND, B2 0.0148, B3 ND, B4 ND, B5 ND, B6 ND, B7 ND, C1 0.0184, C2 0.00648, C3 0.0171, C4 0.00288, D -1
- Water (user) deprivation potential (WDP) [m3 world eq. deprived]: A1-A3 0.395, A4 0.000848, A5 4.16e-5, B1 ND, B2 0.0414, B3 ND, B4 ND, B5 ND, B6 ND, B7 ND, C1 4.07e-5, C2 2.65e-5, C3 -0.000529, C4 -0.000734, D -0.013
- Global Warming Potential (GWP-GHG) [kg CO2 eq.]: A1-A3 0.496, A4 0.0179, A5 0.00162, B1 ND, B2 0.00124, B3 ND, B4 ND, B5 ND, B6 ND, B7 ND, C1 0.00139, C2 0.000461, C3 0.00105, C4 0.0108, D -0.102
- Particulate Matter emissions (PM) [Disease incidence]: A1-A3 2.84e-8, A4 1.01e-9, A5 3.48e-10, B1 ND, B2 8.31e-11, B3 ND, B4 ND, B5 ND, B6 ND, B7 ND, C1 3.46e-10, C2 3.62e-11, C3 6.11e-11, C4 1.9e-11, D -8.37e-9
- Ionizing radiation, human health (IRP) [kBq U235 eq.]: A1-A3 0.0427, A4 0.000158, A5 8.43e-6, B1 ND, B2 0.000104, B3 ND, B4 ND, B5 ND, B6 ND, B7 ND, C1 7.98e-6, C2 8.31e-6, C3 0.000104, C4 4.91e-6, D -0.00184
- Eco-toxicity - freshwater (ETP-fw) [CTUe]: A1-A3 4.26, A4 0.0534, A5 0.00319, B1 ND, B2 0.00989, B3 ND, B4 ND, B5 ND, B6 ND, B7 ND, C1 0.00256, C2 0.00174, C3 0.00248, C4 0.104, D -0.867
- Human toxicity, cancer effect (HTP-c) [CTUh]: A1-A3 2.66e-9, A4 8.46e-11, A5 5.5e-12, B1 ND, B2 1.95e-11, B3 ND, B4 ND, B5 ND, B6 ND, B7 ND, C1 5.34e-12, C2 3.22e-12, C3 2.77e-12, C4 2.08e-12, D -4.9e-10
- Human toxicity, non-cancer effects (HTP-nc) [CTUh]: A1-A3 1.24e-8, A4 1.09e-10, A5 3.15e-12, B1 ND, B2 3.56e-11, B3 ND, B4 ND, B5 ND, B6 ND, B7 ND, C1 2.27e-12, C2 4.04e-12, C3 4.22e-12, C4 1.44e-10, D -4.35e-9
- Land use related impacts/Soil quality (SQP) [dimensionless]: A1-A3 1.94, A4 0.0896, A5 0.00149, B1 ND, B2 0.00306, B3 ND, B4 ND, B5 ND, B6 ND, B7 ND, C1 0.00126, C2 0.00385, C3 0.00667, C4 0.00339, D -0.373

## Use advice
LCA results of the product(s) - main environmental performance results based on the worst-case scenario.
The system boundary considered in this LCA study is “cradle to gate with options, modules C1-C4, module D with optional modules (A1–A3 + A4 + A5 + C + D)”.
A1-A3: Product stage (raw material acquisition, transport to manufacturing site and manufacturing)
A4: Transport to user site
A5: Installation
C1-C4: End-of-life stage (deconstruction, transport, waste processing and disposal)
D: Reuse, recovery and/or recycling potentials

## Data sources
- ecoinvent database (general)
- ecoinvent 3.10 database
