# LONGi solar photovoltaic module

Dataset: ILCD process, EPD, specific dataset
Geography: GLO
Reference year: 2024
Valid until: 2029
Classification: The International EPD System: Construction products
Method details: 2019:14-c-PCR-016 Photovoltaic modules and parts thereof
Generated by: , peteryf.chen@tuv.com
Registration number: EPD-IES-0006192:003 (S-P-06192)
Owner: LONGi Green Energy Technology Co., Ltd.
Compliance: EN 15804+A2 (EF 3.0); ISO 14025
Review: Independent external review by Daniel Böckin
Amounts: rows without a unit in brackets have none in this file; such an amount is in the reference unit of its flow, which a separate flow dataset defines
copyright: true
licenseType: Free of charge for all users and uses
accessRestrictions: Your use of this material is subject to the General Terms of Use published on by EPD International AB:s homepage at https://www.environdec.com/contact/General-terms-of-use/. If you have not accepted EPD International AB:s the General Terms of Use, you are not authorized to exploit this work in any manner.

## Technology and included processes
The solar photovoltaic module components mainly include PV cells, solar glass, Frames, EVA/POE, and Junction Box, manufacturing includes polysilicon production, ingot pulling, wafer slicing, cell production and module assembling. The module will be transported to the project site for installation, after 25-30 years of service the module will be sent to end-of-life treatment.

## Technical purpose
LONGi Solar PV modules are widely used to generate electricity on ultra-large ground
power stations and Large-scale industrial and commercial projects.

## Reference product
- solar photovoltaic modules: 1

## Inputs
- Use of renewable primary energy as energy carrier (PERE) [MJ]: A1-A3 0.301, A4 0.000863, A5 0.000183, B1 0, B2 2.36e-5, B3 0, B4 0, B5 0, B6 0, B7 0, C1 0.000183, C2 8.28e-5, C3 0.00598, C4 0.00681, D -0.135
- Use of renewable primary energy resources used as raw materials (PERM) [MJ]: A1-A3 1.66, A4 0, A5 0, B1 0, B2 0, B3 0, B4 0, B5 0, B6 0, B7 0, C1 0, C2 0, C3 0, C4 0, D 0
- Total use of renewable primary energy (PERT) [MJ]: A1-A3 1.96, A4 0.000863, A5 0.000183, B1 0, B2 2.36e-5, B3 0, B4 0, B5 0, B6 0, B7 0, C1 0.000183, C2 8.28e-5, C3 0.00598, C4 0.00681, D -0.135
- Use of non renewable primary energy as energy carrier (PENRE) [MJ]: A1-A3 5.76, A4 0.119, A5 0.0181, B1 0, B2 0.0181, B3 0, B4 0, B5 0, B6 0, B7 0, C1 0.0181, C2 0.0064, C3 0.053, C4 0.0307, D -1.06
- Use of non renewable primary energy resources used as raw materials (PENRM) [MJ]: A1-A3 0.399, A4 0, A5 0, B1 0, B2 0, B3 0, B4 0, B5 0, B6 0, B7 0, C1 0, C2 0, C3 0, C4 0, D 0
- Total use of non renewable primary energy resource (PENRT) [MJ]: A1-A3 6.16, A4 0.119, A5 0.0181, B1 0, B2 0.0181, B3 0, B4 0, B5 0, B6 0, B7 0, C1 0.0181, C2 0.0064, C3 0.053, C4 0.0307, D -1.06
- Use of secondary material (SM) [kg]: A1-A3 0, A4 0, A5 0, B1 0, B2 0, B3 0, B4 0, B5 0, B6 0, B7 0, C1 0, C2 0, C3 0, C4 0, D -2.37
- Use of renewable secondary fuels (RSF) [MJ]: A1-A3 0, A4 0, A5 0, B1 0, B2 0, B3 0, B4 0, B5 0, B6 0, B7 0, C1 0, C2 0, C3 0, C4 0, D 0
- Use of non renewable secondary fuels (NRSF) [MJ]: A1-A3 0, A4 0, A5 0, B1 0, B2 0, B3 0, B4 0, B5 0, B6 0, B7 0, C1 0, C2 0, C3 0, C4 0, D 0
- Net use of fresh water (FW) [m3]: A1-A3 0.0161, A4 9.73e-6, A5 1.7e-6, B1 0, B2 1.95e-5, B3 0, B4 0, B5 0, B6 0, B7 0, C1 1.7e-6, C2 9.21e-7, C3 2.65e-5, C4 -0.0128, D -0.00073

## Outputs
- Hazardous waste disposed (HWD) [kg]: A1-A3 0.000835, A4 1.56e-6, A5 1.8e-7, B1 0, B2 1.31e-8, B3 0, B4 0, B5 0, B6 0, B7 0, C1 1.8e-7, C2 1.62e-7, C3 1.57e-6, C4 0.000423, D -7.15e-5
- Non harzardous waste disposed (NHWD) [kg]: A1-A3 0.0477, A4 0.00042, A5 2.84e-5, B1 0, B2 2.57e-6, B3 0, B4 0, B5 0, B6 0, B7 0, C1 2.84e-5, C2 0.000316, C3 0.00023, C4 0.0119, D -0.0187
- Radioactive waste disposed (RWD) [kg]: A1-A3 6.15e-6, A4 1.33e-8, A5 3.53e-9, B1 0, B2 5.41e-10, B3 0, B4 0, B5 0, B6 0, B7 0, C1 3.53e-9, C2 1.31e-9, C3 1.32e-7, C4 9.87e-8, D -8.39e-7
- Components for re-use (CRU) [kg]: A1-A3 0, A4 0, A5 0, B1 0, B2 0, B3 0, B4 0, B5 0, B6 0, B7 0, C1 0, C2 0, C3 0, C4 0, D 0
- Materials for recycling (MFR) [kg]: A1-A3 9.19e-6, A4 0, A5 0, B1 0, B2 0, B3 0, B4 0, B5 0, B6 0, B7 0, C1 0, C2 0, C3 0, C4 0.041, D 0
- Materials for energy recovery (MER) [kg]: A1-A3 0, A4 0, A5 0, B1 0, B2 0, B3 0, B4 0, B5 0, B6 0, B7 0, C1 0, C2 0, C3 0, C4 0, D 0
- Exported electrical energy (EEE) [MJ]: A1-A3 0, A4 0, A5 0, B1 0, B2 0, B3 0, B4 0, B5 0, B6 0, B7 0, C1 0, C2 0, C3 0, C4 0, D 0.0243
- Exported thermal energy (EET) [MJ]: A1-A3 0, A4 0, A5 0, B1 0, B2 0, B3 0, B4 0, B5 0, B6 0, B7 0, C1 0, C2 0, C3 0, C4 0, D 0.012

## Impact indicators
- Global Warming Potential - fossil fuels (GWP-fossil) [kg CO2 eq.]: A1-A3 0.617, A4 0.00969, A5 0.00138, B1 0, B2 1.73e-5, B3 0, B4 0, B5 0, B6 0, B7 0, C1 0.00138, C2 0.000454, C3 0.00409, C4 0.00442, D -0.107
- Global Warming Potential - biogenic (GWP-biogenic) [kg CO2 eq.]: A1-A3 0.00177, A4 1.94e-6, A5 0.00765, B1 0, B2 3.99e-8, B3 0, B4 0, B5 0, B6 0, B7 0, C1 2.84e-7, C2 1.33e-7, C3 7.94e-6, C4 0.00398, D -0.000264
- Global Warming Potential - land use and land use change (GWP-luluc) [kg CO2 eq.]: A1-A3 0.000356, A4 7.43e-6, A5 2.48e-7, B1 0, B2 2.77e-8, B3 0, B4 0, B5 0, B6 0, B7 0, C1 2.48e-7, C2 2.39e-7, C3 7.9e-6, C4 1e-6, D -5.88e-5
- Global Warming Potential - total (GWP-total) [kg CO2 eq.]: A1-A3 0.543, A4 0.00969, A5 0.00138, B1 0, B2 1.74e-5, B3 0, B4 0, B5 0, B6 0, B7 0, C1 0.00138, C2 0.000455, C3 0.00412, C4 0.00954, D -0.000374
- Depletion potential of the stratospheric ozone layer (ODP) [kg CFC-11 eq.]: A1-A3 8.73e-8, A4 1.47e-10, A5 2.16e-11, B1 0, B2 2.69e-12, B3 0, B4 0, B5 0, B6 0, B7 0, C1 2.16e-11, C2 7.17e-12, C3 2.95e-11, C4 6.82e-11, D -1.58e-9
- Acidifcation potential, Accumulated Exceedance (AP) [mol H+ eq.]: A1-A3 0.00389, A4 0.000284, A5 1.26e-5, B1 0, B2 9.26e-8, B3 0, B4 0, B5 0, B6 0, B7 0, C1 1.26e-5, C2 1.13e-6, C3 2.13e-5, C4 9.36e-5, D -0.00072
- Europhication potential - freshwater (EP-freshwater) [kg P eq.]: A1-A3 0.000199, A4 3.31e-7, A5 6.29e-8, B1 0, B2 7.58e-9, B3 0, B4 0, B5 0, B6 0, B7 0, C1 6.29e-8, C2 3.72e-8, C3 1.72e-6, C4 6e-7, D -3.98e-5
- Europhication potential - marine (EP-marine) [kg N eq.]: A1-A3 0.000775, A4 7.09e-5, A5 5.78e-6, B1 0, B2 1.87e-8, B3 0, B4 0, B5 0, B6 0, B7 0, C1 5.78e-6, C2 2.74e-7, C3 5.02e-6, C4 0.000108, D -0.000114
- Europhication potential - terrestrial (EP-terrestrial) [mol N eq.]: A1-A3 0.00763, A4 0.000784, A5 6.28e-5, B1 0, B2 1.89e-7, B3 0, B4 0, B5 0, B6 0, B7 0, C1 6.28e-5, C2 2.82e-6, C3 5.14e-5, C4 0.000389, D -0.00115
- Photochemical Ozone Creation Potential (POCP) [kg NMVOC eq.]: A1-A3 0.00291, A4 0.000212, A5 1.86e-5, B1 0, B2 6.15e-8, B3 0, B4 0, B5 0, B6 0, B7 0, C1 1.86e-5, C2 1.5e-6, C3 1.52e-5, C4 9.5e-5, D -0.000365
- Abiotic depletion potential - non-fossil resources (ADPE) [kg Sb eq.]: A1-A3 3.87e-5, A4 9.77e-9, A5 7.24e-10, B1 0, B2 8.06e-11, B3 0, B4 0, B5 0, B6 0, B7 0, C1 7.24e-10, C2 1.48e-9, C3 3.55e-9, C4 1.62e-8, D -1.28e-7
- Abiotic depletion potential - fossil resources (ADPF) [MJ]: A1-A3 6.16, A4 0.119, A5 0.0181, B1 0, B2 0.000222, B3 0, B4 0, B5 0, B6 0, B7 0, C1 0.0181, C2 0.0064, C3 0.053, C4 0.0307, D -1.06
- Water (user) deprivation potential (WDP) [m3 world eq. deprived]: A1-A3 0.669, A4 0.000273, A5 4.58e-5, B1 0, B2 0.000809, B3 0, B4 0, B5 0, B6 0, B7 0, C1 4.58e-5, C2 2.85e-5, C3 0.000641, C4 -0.0166, D -0.0179
- Global Warming Potential (GWP-GHG) [kg CO2 eq.]: A1-A3 0.617, A4 0.00969, A5 0.00138, B1 0, B2 1.73e-5, B3 0, B4 0, B5 0, B6 0, B7 0, C1 0.00138, C2 0.000455, C3 0.0041, C4 0.00442, D -0.107
- Particulate Matter emissions (PM) [Disease incidence]: A1-A3 3.34e-8, A4 2.92e-10, A5 3.47e-10, B1 0, B2 1.1e-12, B3 0, B4 0, B5 0, B6 0, B7 0, C1 3.47e-10, C2 3.39e-11, C3 2.41e-10, C4 3.64e-10, D -8.64e-9
- Ionizing radiation, human health (IRP) [kBq U235 eq.]: A1-A3 0.0231, A4 5.81e-5, A5 1.49e-5, B1 0, B2 2.18e-6, B3 0, B4 0, B5 0, B6 0, B7 0, C1 1.49e-5, C2 5.51e-6, C3 0.000541, C4 0.000437, D -0.00316
- Eco-toxicity - freshwater (ETP-fw) [CTUe]: A1-A3 6.08, A4 0.0589, A5 0.00849, B1 0, B2 7.52e-5, B3 0, B4 0, B5 0, B6 0, B7 0, C1 0.00849, C2 0.00352, C3 0.0113, C4 0.221, D -0.358
- Human toxicity, cancer effect (HTP-c) [CTUh]: A1-A3 4.17e-10, A4 4.19e-12, A5 4.23e-13, B1 0, B2 4.57e-14, B3 0, B4 0, B5 0, B6 0, B7 0, C1 4.23e-13, C2 2.06e-13, C3 9.49e-13, C4 1.67e-10, D -1.26e-10
- Human toxicity, non-cancer effects (HTP-nc) [CTUh]: A1-A3 2.39e-8, A4 3.54e-11, A5 3.43e-12, B1 0, B2 6.41e-13, B3 0, B4 0, B5 0, B6 0, B7 0, C1 3.43e-12, C2 4.63e-12, C3 3.15e-11, C4 1.18e-8, D -2.41e-9
- Land use related impacts/Soil quality (SQP) [dimensionless]: A1-A3 11.7, A4 0.0102, A5 0.00128, B1 0, B2 4.76e-5, B3 0, B4 0, B5 0, B6 0, B7 0, C1 0.00128, C2 0.00387, C3 0.00751, C4 0.0196, D -0.227

## Use advice
This report is subject to several limitations and uncertainties, and caution should be taken when using the results for comparison or making commitments based on them. The results are only informational for the analyzed PV modules in this report and referenced year and may not be representative of other PV modules or production processes outside the studied scope.
The indicator Ionising radiation deals mainly with the eventual impact of low-dose ionizing radiation on human health of the nuclear fuel cycle. It does not consider effects due to possible nuclear accidents, occupational exposure nor radioactive waste disposal in underground facilities. Potential ionizing radiation from the soil, from radon and some construction materials is also not measured by this indicator.

## Data sources
- ecoinvent database (general)
- ecoinvent 3.8 database
