# MAXEON 3 MONO-CRYSTALLINE PHOTOVOLTAIC MODULE (1m2)

Dataset: ILCD process, EPD, specific dataset
Reference year: 2021
Valid until: 2026
Classification: EPDNorge: Bygg / Solcellepaneler og komponenter
Method details: PCR EPDItaly022 – Use of Highways, streets, roads and airfield
Registration number: NEPD-3087-1726-EN
Owner: SunPower
Compliance: EN 15804; ISO 14025; ISO 21930
Review: Independent external review by Michael M. Jenssen - Asplan Viak AS
Amounts: rows without a unit in brackets have none in this file; such an amount is in the reference unit of its flow, which a separate flow dataset defines
copyright: true
licenseType: Free of charge for all users and uses

## General comment
Specific data provided by SunPower for the year 2019.
The procedures defined by the PCR regarding the data quality
have been respected according to the following criteria:
• Temporal factor: LCI data has been sourced from the database
ecoinvent 3.6, which was updated in 2019, and ELCD, updated in
2018. As such all LCI data has been updated within the last 10
years All primary data dates from product specific data collections
from within the last 5 years.
• Geographical factor: Datasets appropriate to the location of the
modelled flow have been selected when available. Certain
datasets have been modified to better reflect the specific energy
consumptions (see Appendix 2) of certain countries which are not
available in the database. When specific data for a country is not
available and could not be created, European processes were
selected for flows attributed to Europe, and Global or Rest of
World flows were used for all other flows.
• Technological factor: Datasets have been selected according to
the actual processes used by the manufacturer. For generic
products where no upstream data is available (e.g. packaging),
manufacturing has been modelled according current practices.

The allocation is made in accordance with the provisions of ISO
14025. Incoming energy and water and waste production in-house is
allocated equally among all products through mass allocation. Effects
of primary production of recycled materials allocated to the main
product in which the material was used. The recycling process and
transportation of the material is allocated to this analysis.

All major raw materials and all the essential energy is
included. The production process for raw materials and
energy flows that are included with very small amounts (<1%)
are not included – this included certain packaging materials
used for the transport of components to the main production
facility. The infrastructure relating to the manufacturing facility
has also been exclude as it has negligeable impacts when
considering the quantity of panels produced.
This cut-off rule does not apply for hazardous materials and
substances.

## Geography
Norway / Europe / World

## Time period
"01.08.2022" - "01.08.2027"

## Technology and included processes
The panel considered for this EPD has a power rating of 400W.
1 complete panel has a mass of 19 kg without packaging.
The packaging per panel weighs 1.36 kg.
The overall dimensions are 1690x1046x40 mm.
Certified: IEC 61215, IEC 61730 Class 1 fire rated per UNI
9177

## Technical purpose
400Wp mono-crystalline solar photovoltaic
module with back-contact conductivity, solid
metal backing and thick connectors. The
panels are designed to be installed on roofs
or as stand-alone systems for local power
production.
The 2 other products covered by the PEP
differ only in colour for the BLK product and
the connector type for the COM product.
As the differences between products is
minor, no averaging has been performed.
To produce their panels, SunPower sources
silicon wafers from Norway and the US,
which are sent to their factory in the
Phillipines to produce the solar cells. These
cells are then sent to their factory in
Mexico, where they are assembled with the
backsheet, frame and electrical connections
to produce the finished solar module. Sold as individual panels, with an effective
surface area of 1.77m². The packaging
consists of LDPE film, PP, PET and a
cardboard box, and the panels are
delivered on a wooden pallet.

## Reference product
- MAXEON 3 MONO-CRYSTALLINE PHOTOVOLTAIC MODULE (1m2): 1; General reminder flow; measured

## Inputs
- Use of renewable primary energy (PERE) [MJ]: A1-A3 319, A4 0.798, A5 0.0409, C2 0.0387, C3 0.39, C4 2.95e-5, D -107
- Use of renewable primary energy resources used as raw materials (PERM) [MJ]: A1-A3 9.29, A4 0, A5 0, C2 0, C3 0, C4 0, D 0
- Total use of renewable primary energy resource (PERT) [MJ]: A1-A3 364, A4 0.798, A5 0.0409, C2 0.0387, C3 0.39, C4 2.95e-5, D -107
- Use of non renewable primary energy (PENRE) [MJ]: A1-A3 1030, A4 44.1, A5 0.541, C2 2.74, C3 2.12, C4 0.000906, D -350
- Use of non renewable primary energy resources used as raw materials (PENRM) [MJ]: A1-A3 47.3, A4 0, A5 0, C2 0, C3 0, C4 0, D 0
- Total use of non renewable primary energy resource (PENRT) [MJ]: A1-A3 1080, A4 44.1, A5 0.541, C2 2.74, C3 2.12, C4 0.000906, D -349
- Use of secondary material (SM) [kg]: A1-A3 0.645, A4 0, A5 0, C2 0, C3 0, C4 0, D 0
- Use of renewable secondary fuels (RSF) [MJ]: A1-A3 0, A4 0, A5 0, C2 0, C3 0, C4 0, D 0
- Use of non renewable secondary fuels (NRSF) [MJ]: A1-A3 0, A4 0, A5 0, C2 0, C3 0, C4 0, D 0
- Use of net fresh water (FW) [m3]: A1-A3 3.69, A4 0.00491, A5 0.000496, C2 0.000283, C3 0.0025, C4 3.22e-6, D -0.261

## Outputs
- Hazardous waste disposed (HWD) [kg]: A1-A3 5.68, A4 0.0329, A5 0.00778, C2 0.00176, C3 0.00741, C4 0.000742, D -0.304
- Non hazardous waste dispose (NHWD) [kg]: A1-A3 39.9, A4 1.7, A5 0.0983, C2 0.144, C3 0.0401, C4 3.52e-5, D -8.86
- Radioactive waste disposed (RWD) [kg]: A1-A3 0.00378, A4 0.000296, A5 2.91e-6, C2 1.87e-5, C3 1.53e-5, C4 3.21e-9, D -0.00101
- Components for re-use (CRU) [kg]: A1-A3 0, A4 0, A5 0, C2 0, C3 0, C4 0, D 0
- Materials for recycling (MFR) [kg]: A1-A3 0.849, A4 0, A5 0.5, C2 0, C3 9.77, C4 0, D 0
- Materials for energy recovery (MER) [kg]: A1-A3 0.0363, A4 0, A5 0.128, C2 0, C3 0, C4 0, D 0
- Exported electrical energy (EEE) [MJ]: A1-A3 0, A4 0, A5 0, C2 0, C3 0, C4 0, D 0
- Exported thermal energy (EET) [MJ]: A1-A3 0.0363, A4 44.9, A5 0.582, C2 2.78, C3 2.51, C4 0.000935, D -456

## Impact indicators
- Global warming potential (GWP) [kg CO2-Äqv.]: A1-A3 77.2, A4 3.04, A5 0.193, C2 0.18, C3 0.129, C4 0.00145, D -31.2
- Ozone Depletion Potential (ODP) [kg CFC 11 eq.]: A1-A3 7.84e-5, A4 5.15e-7, A5 4.67e-9, C2 3.3e-8, C3 1.33e-8, C4 1e-11, D -2.04e-6
- Acidification potential (AP) [kg SO2-Äqv.]: A1-A3 0.0587, A4 0.00309, A5 3.51e-5, C2 9.38e-5, C3 6.9e-5, C4 2.02e-7, D -0.0155
- Eutrophication potential (EP) [kg Phosphat-Äqv.]: A1-A3 0.0587, A4 0.00309, A5 3.51e-5, C2 9.38e-5, C3 6.9e-5, C4 2.02e-7, D -0.0155
- Photochemical Ozone Creation Potential (POCP) [kg Ethen-Äqv.]: A1-A3 0.0653, A4 0.00256, A5 2.84e-5, C2 9.37e-5, C3 3.73e-5, C4 5.84e-8, D -0.0109
- Abiotic depletion potential for non fossil resources (ADPE) [kg Sb-Äqv.]: A1-A3 0.0118, A4 5.39e-5, A5 8.35e-7, C2 4.93e-6, C3 7.38e-7, C4 8.08e-10, D -0.00323
- Abiotic depletion potential for fossil resources (ADPF) [MJ]: A1-A3 42.9, A4 0.465, A5 2.69, C2 1.21, C3 0.000865, C4 -306, D 0.000865

## Data sources
- ecoinvent database (all versions)
- NEPD-3087-1726_MAXEON-3-MONO-CRYSTALLINE-PHOTOVOLTAIC-MODULE.pdf
