# Tongwei N type half-piece double-glass photovoltaic module

Dataset: ILCD process, EPD, specific dataset
Geography: CN
Reference year: 2025
Valid until: 2030
Classification: The International EPD System: Construction products, Infrastructure & buildings
Functional unit: 1 Wp of manufactured photovoltaic module, from cradle-to-grave, with activities needed for a study period for a RSL of 25 years.
Method details: Construction products (EN 15804+A2) (version 2.0.1)
Generated by: Sijing Xiang, xiangsijing@cdt-dtlc.com
Registration number: EPD-IES-0025632:003
Owner: Tongwei Solar (Yancheng) Co.,Ltd.
Compliance: EN 15804+A2 (EF 3.1); ISO 14025
Review: Independent external review by Ying SU
Amounts: rows without a unit in brackets have none in this file; such an amount is in the reference unit of its flow, which a separate flow dataset defines
copyright: true
licenseType: Free of charge for all users and uses
accessRestrictions: Your use of this material is subject to the General Terms of Use published on by EPD International AB:s homepage at https://www.environdec.com/contact/General-terms-of-use/. If you have not accepted EPD International AB:s the General Terms of Use, you are not authorized to exploit this work in any manner.

## Geography
China

## Technology and included processes
Components/materials: tempered solar glass, aluminum-alloy frame, N-type monocrystalline Si cells, EVA & POE encapsulants, copper interconnects/busbars, PPE/PPO junction box, silicone sealants; packaging uses corrugated board and a plywood pallet.
Manufacturing keywords: cutting & string welding → EL/appearance testing → stacking → lamination → framing & junction-box bonding/terminal welding → curing → IV/insulation testing → automatic packaging.
Use & EoL: Suitable for commercial/industrial rooftops and ground-mounted PV plants; operating temperature −40 to +85 °C; manufacturing, use, and end-of-life all take place in China.

## Technical purpose
Tongwei N type half-piece double-glass photovoltaic module is suitable for industrial and commercial roof and ground power stations. The PV module has high power generation and low cost per hour. The maximum power can reach 630W and the module efficiency can reach 23.3%. In addition, the component has passed a number of quality certifications, and the product quality is reliable and guaranteed.

## Reference product
- Photovoltaic module. Unit: Area (m2). Value: 2.7: 1

## Inputs
- Use of renewable primary energy as energy carrier (PERE) [MJ]: A1-A3 0.854, A4 0.00194, A5 0.0156, B1 0, B2 2.26e-5, B3 0, B4 0, B5 0, B6 0, B7 0, C1 0.0156, C2 6.91e-5, C3 0.0156, C4 5.67e-6, D -0.108
- Use of renewable primary energy resources used as raw materials (PERM) [MJ]: A1-A3 0.0442, A4 0, A5 -0.0442, B1 0, B2 0, B3 0, B4 0, B5 0, B6 0, B7 0, C1 0, C2 0, C3 0, C4 0, D 0
- Total use of renewable primary energy (PERT) [MJ]: A1-A3 0.898, A4 0.00194, A5 -0.0286, B1 0, B2 2.26e-5, B3 0, B4 0, B5 0, B6 0, B7 0, C1 0.0156, C2 6.91e-5, C3 0.0156, C4 5.67e-6, D -0.108
- Use of non renewable primary energy as energy carrier (PENRE) [MJ]: A1-A3 4.28, A4 0.146, A5 0.128, B1 0, B2 0.000204, B3 0, B4 0, B5 0, B6 0, B7 0, C1 0.128, C2 0.00475, C3 0.128, C4 0.000655, D -0.84
- Use of non renewable primary energy resources used as raw materials (PENRM) [MJ]: A1-A3 0.157, A4 0, A5 0, B1 0, B2 0, B3 0, B4 0, B5 0, B6 0, B7 0, C1 0, C2 0, C3 0, C4 -0.157, D 0
- Total use of non renewable primary energy resource (PENRT) [MJ]: A1-A3 4.43, A4 0.146, A5 0.128, B1 0, B2 0.000204, B3 0, B4 0, B5 0, B6 0, B7 0, C1 0.128, C2 0.00475, C3 0.128, C4 -0.156, D -0.84
- Use of secondary material (SM) [kg]: A1-A3 0, A4 0, A5 0, B1 0, B2 0, B3 0, B4 0, B5 0, B6 0, B7 0, C1 0, C2 0, C3 0, C4 0, D 0
- Use of renewable secondary fuels (RSF) [MJ]: A1-A3 0, A4 0, A5 0, B1 0, B2 0, B3 0, B4 0, B5 0, B6 0, B7 0, C1 0, C2 0, C3 0, C4 0, D 0
- Use of non renewable secondary fuels (NRSF) [MJ]: A1-A3 0, A4 0, A5 0, B1 0, B2 0, B3 0, B4 0, B5 0, B6 0, B7 0, C1 0, C2 0, C3 0, C4 0, D 0
- Net use of fresh water (FW) [m3]: A1-A3 0.0107, A4 2.01e-5, A5 3.82e-5, B1 0, B2 1.82e-5, B3 0, B4 0, B5 0, B6 0, B7 0, C1 3.82e-5, C2 7.25e-7, C3 3.82e-5, C4 4.82e-8, D -0.000584

## Outputs
- Hazardous waste disposed (HWD) [kg]: A1-A3 0.0481, A4 0.000257, A5 0.0016, B1 0, B2 1.76e-6, B3 0, B4 0, B5 0, B6 0, B7 0, C1 0.0016, C2 8.52e-6, C3 0.0016, C4 9.42e-7, D -0.0162
- Non harzardous waste disposed (NHWD) [kg]: A1-A3 0.584, A4 0.00483, A5 0.0124, B1 0, B2 0.00032, B3 0, B4 0, B5 0, B6 0, B7 0, C1 0.0124, C2 0.000159, C3 0.0124, C4 1.49e-5, D -0.107
- Radioactive waste disposed (RWD) [kg]: A1-A3 6.45e-6, A4 2.97e-8, A5 1.4e-7, B1 0, B2 4.73e-10, B3 0, B4 0, B5 0, B6 0, B7 0, C1 1.4e-7, C2 1.07e-9, C3 1.4e-7, C4 7.7e-11, D -6.77e-7
- Components for re-use (CRU) [kg]: A1-A3 0, A4 0, A5 0, B1 0, B2 0, B3 0, B4 0, B5 0, B6 0, B7 0, C1 0, C2 0, C3 0, C4 0, D 0
- Materials for recycling (MFR) [kg]: A1-A3 0, A4 0, A5 0.00238, B1 0, B2 0, B3 0, B4 0, B5 0, B6 0, B7 0, C1 0, C2 0, C3 0.0338, C4 0, D 0
- Materials for energy recovery (MER) [kg]: A1-A3 0, A4 0, A5 0, B1 0, B2 0, B3 0, B4 0, B5 0, B6 0, B7 0, C1 0, C2 0, C3 0, C4 0.0036, D 0
- Exported electrical energy (EEE) [MJ]: A1-A3 0, A4 0, A5 0, B1 0, B2 0, B3 0, B4 0, B5 0, B6 0, B7 0, C1 0, C2 0, C3 0, C4 0, D -0.133
- Exported thermal energy (EET) [MJ]: A1-A3 0.0013, A4 2.17e-5, A5 8.04e-6, B1 0, B2 2.84e-8, B3 0, B4 0, B5 0, B6 0, B7 0, C1 8e-6, C2 6.98e-7, C3 8e-6, C4 1.69e-8, D -6.42e-5

## Impact indicators
- Global Warming Potential - fossil fuels (GWP-fossil) [kg CO2 eq.]: A1-A3 0.363, A4 0.0104, A5 0.0131, B1 0, B2 1.6e-5, B3 0, B4 0, B5 0, B6 0, B7 0, C1 0.0131, C2 0.000332, C3 0.0131, C4 5.12e-5, D -0.0909
- Global Warming Potential - biogenic (GWP-biogenic) [kg CO2 eq.]: A1-A3 -0.00229, A4 2e-7, A5 0.0028, B1 0, B2 4.83e-8, B3 0, B4 0, B5 0, B6 0, B7 0, C1 -7.47e-5, C2 3.99e-7, C3 -7.47e-5, C4 4.23e-9, D 0.00043
- Global Warming Potential - land use and land use change (GWP-luluc) [kg CO2 eq.]: A1-A3 0.000272, A4 4.22e-6, A5 4.75e-6, B1 0, B2 1.96e-8, B3 0, B4 0, B5 0, B6 0, B7 0, C1 4.69e-6, C2 1.11e-6, C3 4.69e-6, C4 5.07e-9, D -2.7e-5
- Global Warming Potential - total (GWP-total) [kg CO2 eq.]: A1-A3 0.361, A4 0.0104, A5 0.016, B1 0, B2 1.61e-5, B3 0, B4 0, B5 0, B6 0, B7 0, C1 0.0131, C2 0.000334, C3 0.0131, C4 5.12e-5, D -0.0905
- Depletion potential of the stratospheric ozone layer (ODP) [kg CFC-11 eq.]: A1-A3 4.44e-9, A4 1.54e-10, A5 3.12e-11, B1 0, B2 2.3e-12, B3 0, B4 0, B5 0, B6 0, B7 0, C1 3.09e-11, C2 5.59e-12, C3 3.09e-11, C4 7.41e-13, D -2.75e-10
- Acidifcation potential, Accumulated Exceedance (AP) [mol H+ eq.]: A1-A3 0.00207, A4 2.38e-5, A5 7.25e-5, B1 0, B2 8.39e-8, B3 0, B4 0, B5 0, B6 0, B7 0, C1 7.24e-5, C2 1.52e-6, C3 7.24e-5, C4 4.5e-7, D -0.000554
- Europhication potential - freshwater (EP-freshwater) [kg P eq.]: A1-A3 0.000111, A4 8.2e-7, A5 2.62e-6, B1 0, B2 6.53e-9, B3 0, B4 0, B5 0, B6 0, B7 0, C1 2.62e-6, C2 2.71e-8, C3 2.62e-6, C4 2.51e-9, D -1.77e-5
- Europhication potential - marine (EP-marine) [kg N eq.]: A1-A3 0.000388, A4 5.52e-6, A5 1.49e-5, B1 0, B2 1.69e-8, B3 0, B4 0, B5 0, B6 0, B7 0, C1 1.48e-5, C2 5.79e-7, C3 1.48e-5, C4 2.02e-7, D -0.000102
- Europhication potential - terrestrial (EP-terrestrial) [mol N eq.]: A1-A3 0.00413, A4 5.96e-5, A5 0.000159, B1 0, B2 1.72e-7, B3 0, B4 0, B5 0, B6 0, B7 0, C1 0.000158, C2 6.23e-6, C3 0.000158, C4 2.21e-6, D -0.00108
- Photochemical Ozone Creation Potential (POCP) [kg NMVOC eq.]: A1-A3 0.00125, A4 3.33e-5, A5 4.24e-5, B1 0, B2 5.26e-8, B3 0, B4 0, B5 0, B6 0, B7 0, C1 4.23e-5, C2 2.15e-6, C3 4.23e-5, C4 6.71e-7, D -0.000308
- Abiotic depletion potential - non-fossil resources (ADPE) [kg Sb eq.]: A1-A3 1.28e-6, A4 3.38e-8, A5 5.5e-8, B1 0, B2 7.28e-11, B3 0, B4 0, B5 0, B6 0, B7 0, C1 5.49e-8, C2 1.04e-9, C3 5.49e-8, C4 1.83e-11, D -3.96e-7
- Abiotic depletion potential - fossil resources (ADPF) [MJ]: A1-A3 4.27, A4 0.146, A5 0.128, B1 0, B2 0.000204, B3 0, B4 0, B5 0, B6 0, B7 0, C1 0.128, C2 0.00474, C3 0.128, C4 0.000655, D -0.839
- Water (user) deprivation potential (WDP) [m3 world eq. deprived]: A1-A3 0.434, A4 0.000823, A5 0.00117, B1 0, B2 0.000783, B3 0, B4 0, B5 0, B6 0, B7 0, C1 0.00116, C2 2.97e-5, C3 0.00116, C4 1.97e-6, D -0.0229
- Global Warming Potential (GWP-GHG) [kg CO2 eq.]: A1-A3 0.361, A4 0.0104, A5 0.0131, B1 0, B2 1.61e-5, B3 0, B4 0, B5 0, B6 0, B7 0, C1 0.0131, C2 0.000334, C3 0.0131, C4 5.12e-5, D -0.0905

## Use advice
This data set includes modules A1-A5, B2, C1-C4, and D.

## Data sources
- ecoinvent database (general)
- ecoinvent 3.10 database
