# Tongwei TWMNH-48HD (TNC-G12R-48 Half Cell Bifacial Module) (photovoltaic module)

Dataset: ILCD process, EPD, average dataset
Geography: CN
Reference year: 2024
Valid until: 2029
Classification: OEKOBAU.DAT: Gebäudetechnik / Elektro
Generated by: Kiwa GmbH (Berlin)
Registration number: EPD-Kiwa-EE-000420-EN
Owner: Tongwei Co., Ltd.
Compliance: ISO 14025; EN 15804+A2 (EF 3.1)
Review: Independent external review by Elisabet Amat - Greenize Projects S.L.U.
Amounts: rows without a unit in brackets have none in this file; such an amount is in the reference unit of its flow, which a separate flow dataset defines
copyright: true
licenseType: Free of charge for all users and uses
accessRestrictions: None.

## General comment
This EPD is based on the life cycle assessment of the photovoltaic module TWMNH-48HD which is produced and distributed by Tongwei Co., Ltd., located in Nantong City (P. R. China). The EPD refers to the specific product. EPD type: Cradle to Grave + Module D. Kiwa-Ecobility Experts assumes no liability for manufacturer's information, LCA data and evidence. Functional unit: 1 Wp of manufactured photovoltaic module, from cradle-to-grave, with activities needed for a study period for a defined reference service life (≥80% of the labelled power output). Note: The EPD results have been calculated for the declared / functional unit of m^2 and Wp. The results displayed in this dataset refer to the declared unit of m^2. The m^2 results can be converted into the Wp functional unit with a conversion factor (1/227.5) or can be seen in the EPD document.

## Geography
The product is produced and manufactured in Nantong City, Jiangsu Province, P. R. China, and the main market areas are China, the European Union, the Middle East, Latin America, etc.. The geographical reference area is China and Europe.

## Time period
The production data have been collected for the year 2024 (01/01/2024 – 31/07/2024) and are there-fore up to date.

## Technology and included processes
TWMNH-48HD is part of Tongwei G12R-TNC series of photovoltaic module products, which adopts the new efficient N-type TNC cell independently developed by Tongwei for module packaging, and integrates the industry-leading multi-main gate design to reduce hidden crack loss, non-destructive slicing technology to smooth and flat cutting surface, high-density packaging technology to improve the "screen ratio" of the module to ensure the perfect balance of efficiency and reliability. The product has the characteristics of market demand: small parts, high appearance level, high power, so that photovoltaic and building perfect integration. With fewer batteries, the G12R-48 product can connect more components to the same inverter at the same voltage, without the need for additional new strings, reducing the amount of DC cable, and easier wiring. The ultimate battery area design within 2 square meters, the "screen" is larger, more installed, reduce transportation costs, and bring higher product value to customers. TWMNH-48HD has a power output range from 425W to 455W and a weight of 20.9 kg. 455W is chosen as the representative product power output. The manufacturing site is located in No. 8, Bonded 10 Road, Economic Development Zone, Nantong City, Jiangsu Province, P. R. China.

## Technical purpose
Tongwei solar PV modules installed on household roofs and deployed in various "PV+" applications, to meet the growing global demand for clean energy.

## Scenarios
- Standard scenario: Transport to manufacturer (A2): It was assumed that all transportation from suppliers is carried out using trucks. The environmental profile used for this purpose is "T0001 - Lorry (Truck), unspecified (default) | market group for (GLO).". Production process (A3) | Production waste:

## Reference product
- Tongwei TWMNH-48HD (TNC-G12R-48 Half Cell Bifacial Module): 1

## Inputs
- Use of net fresh water (FW) [m3]: A1 (Standard scenario) 2.63, A2 (Standard scenario) 0.000713, A3 (Standard scenario) 0.0218, A4 (Standard scenario) 0.00386, A5 (Standard scenario) 0.000828, B2 (Standard scenario) 0.0302, C1 (Standard scenario) 0.000572, C2 (Standard scenario) 0.000168, C3 (Standard scenario) 0.00365, C4 (Standard scenario) 0.000272, D (Standard scenario) -0.145
- Use of non renewable primary energy (PENRE) [MJ]: A1 (Standard scenario) 1270, A2 (Standard scenario) 6.21, A3 (Standard scenario) 18.3, A4 (Standard scenario) 51.6, A5 (Standard scenario) 11.7, B2 (Standard scenario) 2.39, C1 (Standard scenario) 11.4, C2 (Standard scenario) 1.47, C3 (Standard scenario) 5.86, C4 (Standard scenario) 0.309, D (Standard scenario) -237
- Use of non renewable primary energy resources used as raw materials (PENRM) [MJ]: A1 (Standard scenario) 38.1, A2 (Standard scenario) 0, A3 (Standard scenario) 0.152, A4 (Standard scenario) 0, A5 (Standard scenario) 0, B2 (Standard scenario) 0, C1 (Standard scenario) 0, C2 (Standard scenario) 0, C3 (Standard scenario) 0, C4 (Standard scenario) 0, D (Standard scenario) 0
- Use of non renewable secondary fuels (NRSF) [MJ]: A1 (Standard scenario) 0, A2 (Standard scenario) 0, A3 (Standard scenario) 0, A4 (Standard scenario) 0, A5 (Standard scenario) 0, B2 (Standard scenario) 0, C1 (Standard scenario) 0, C2 (Standard scenario) 0, C3 (Standard scenario) 0, C4 (Standard scenario) 0, D (Standard scenario) 0
- Use of renewable primary energy (PERE) [MJ]: A1 (Standard scenario) 196, A2 (Standard scenario) 0.0733, A3 (Standard scenario) 10.8, A4 (Standard scenario) 0.428, A5 (Standard scenario) 0.0922, B2 (Standard scenario) 3.63, C1 (Standard scenario) 0.085, C2 (Standard scenario) 0.0173, C3 (Standard scenario) 0.581, C4 (Standard scenario) 0.00828, D (Standard scenario) -38.5
- Use of renewable primary energy resources used as raw materials (PERM) [MJ]: A1 (Standard scenario) 0, A2 (Standard scenario) 0, A3 (Standard scenario) 7.98, A4 (Standard scenario) 0, A5 (Standard scenario) 0, B2 (Standard scenario) 0, C1 (Standard scenario) 0, C2 (Standard scenario) 0, C3 (Standard scenario) 0, C4 (Standard scenario) 0, D (Standard scenario) 0
- Use of renewable secondary fuels (RSF) [MJ]: A1 (Standard scenario) 0, A2 (Standard scenario) 0, A3 (Standard scenario) 0, A4 (Standard scenario) 0, A5 (Standard scenario) 0, B2 (Standard scenario) 0, C1 (Standard scenario) 0, C2 (Standard scenario) 0, C3 (Standard scenario) 0, C4 (Standard scenario) 0, D (Standard scenario) 0
- Use of secondary material (SM) [kg]: A1 (Standard scenario) 0, A2 (Standard scenario) 0, A3 (Standard scenario) 0, A4 (Standard scenario) 0, A5 (Standard scenario) 0, B2 (Standard scenario) 0, C1 (Standard scenario) 0, C2 (Standard scenario) 0, C3 (Standard scenario) 0, C4 (Standard scenario) 0, D (Standard scenario) 0
- Total use of non renewable primary energy resource (PENRT) [MJ]: A1 (Standard scenario) 1310, A2 (Standard scenario) 6.21, A3 (Standard scenario) 18.4, A4 (Standard scenario) 51.6, A5 (Standard scenario) 11.7, B2 (Standard scenario) 2.39, C1 (Standard scenario) 11.4, C2 (Standard scenario) 1.47, C3 (Standard scenario) 5.88, C4 (Standard scenario) 0.31, D (Standard scenario) -237
- Total use of renewable primary energy resources (PERT) [MJ]: A1 (Standard scenario) 196, A2 (Standard scenario) 0.0733, A3 (Standard scenario) 18.8, A4 (Standard scenario) 0.428, A5 (Standard scenario) 0.0922, B2 (Standard scenario) 3.63, C1 (Standard scenario) 0.085, C2 (Standard scenario) 0.0173, C3 (Standard scenario) 0.581, C4 (Standard scenario) 0.00829, D (Standard scenario) -38.5

## Outputs
- Components for re-use (CRU) [kg]: A1 (Standard scenario) 0, A2 (Standard scenario) 0, A3 (Standard scenario) 0, A4 (Standard scenario) 0, A5 (Standard scenario) 0, B2 (Standard scenario) 0, C1 (Standard scenario) 0, C2 (Standard scenario) 0, C3 (Standard scenario) 0, C4 (Standard scenario) 0, D (Standard scenario) 0
- Exported electrical energy (EEE) [MJ]: A1 (Standard scenario) 0, A2 (Standard scenario) 0, A3 (Standard scenario) -0.0266, A4 (Standard scenario) 0, A5 (Standard scenario) 0, B2 (Standard scenario) 0, C1 (Standard scenario) 0, C2 (Standard scenario) 0, C3 (Standard scenario) 0, C4 (Standard scenario) 0, D (Standard scenario) -7.55
- Exported thermal energy (EET) [MJ]: A1 (Standard scenario) 0, A2 (Standard scenario) 0, A3 (Standard scenario) -0.0458, A4 (Standard scenario) 0, A5 (Standard scenario) 0, B2 (Standard scenario) 0, C1 (Standard scenario) 0, C2 (Standard scenario) 0, C3 (Standard scenario) 0, C4 (Standard scenario) 0, D (Standard scenario) -13
- Hazardous waste disposed (HWD) [kg]: A1 (Standard scenario) 0.0435, A2 (Standard scenario) 1.48e-5, A3 (Standard scenario) 0.000245, A4 (Standard scenario) 8.37e-5, A5 (Standard scenario) 3.13e-5, B2 (Standard scenario) 4.23e-6, C1 (Standard scenario) 3.07e-5, C2 (Standard scenario) 3.5e-6, C3 (Standard scenario) 0.00605, C4 (Standard scenario) 3.13e-7, D (Standard scenario) 0.00735
- Materials for energy recovery (MER) [kg]: A1 (Standard scenario) 0, A2 (Standard scenario) 0, A3 (Standard scenario) 0, A4 (Standard scenario) 0, A5 (Standard scenario) 0, B2 (Standard scenario) 0, C1 (Standard scenario) 0, C2 (Standard scenario) 0, C3 (Standard scenario) 0, C4 (Standard scenario) 0, D (Standard scenario) 0
- Materials for recycling (MFR) [kg]: A1 (Standard scenario) 0, A2 (Standard scenario) 0, A3 (Standard scenario) 0.000465, A4 (Standard scenario) 0, A5 (Standard scenario) 0.116, B2 (Standard scenario) 0, C1 (Standard scenario) 0, C2 (Standard scenario) 0, C3 (Standard scenario) 1.01, C4 (Standard scenario) 0, D (Standard scenario) 0
- Non hazardous waste dispose (NHWD) [kg]: A1 (Standard scenario) 11.2, A2 (Standard scenario) 0.371, A3 (Standard scenario) 0.196, A4 (Standard scenario) 1.14, A5 (Standard scenario) 0.0709, B2 (Standard scenario) 0.0469, C1 (Standard scenario) 0.0128, C2 (Standard scenario) 0.0876, C3 (Standard scenario) 0.502, C4 (Standard scenario) 1.33, D (Standard scenario) -3.59
- Radioactive waste disposed (RWD) [kg]: A1 (Standard scenario) 0.00316, A2 (Standard scenario) 3.84e-5, A3 (Standard scenario) 3.23e-5, A4 (Standard scenario) 0.000329, A5 (Standard scenario) 7.72e-5, B2 (Standard scenario) 5.83e-6, C1 (Standard scenario) 7.56e-5, C2 (Standard scenario) 9.07e-6, C3 (Standard scenario) 2.55e-5, C4 (Standard scenario) 1.71e-6, D (Standard scenario) -0.000396

## Impact indicators
- Abiotic depletion potential - non-fossil resources (ADPE) [kg Sb-Äqv.]: A1 (Standard scenario) 0.0106, A2 (Standard scenario) 9.83e-6, A3 (Standard scenario) 0.000303, A4 (Standard scenario) 5.57e-5, A5 (Standard scenario) 4.76e-6, B2 (Standard scenario) 1.22e-5, C1 (Standard scenario) 4.31e-6, C2 (Standard scenario) 2.32e-6, C3 (Standard scenario) 1.08e-5, C4 (Standard scenario) 1.24e-6, D (Standard scenario) 0.00329
- Abiotic depletion potential - fossil resources (ADPF) [MJ]: A1 (Standard scenario) 1230, A2 (Standard scenario) 5.85, A3 (Standard scenario) 17.4, A4 (Standard scenario) 48.6, A5 (Standard scenario) 11, B2 (Standard scenario) 1.89, C1 (Standard scenario) 10.7, C2 (Standard scenario) 1.38, C3 (Standard scenario) 5.53, C4 (Standard scenario) 0.292, D (Standard scenario) -223
- Acidification potential, Accumulated Exceedance (AP) [mol H+ eqv.]: A1 (Standard scenario) 0.61, A2 (Standard scenario) 0.00225, A3 (Standard scenario) 0.011, A4 (Standard scenario) 0.072, A5 (Standard scenario) 0.0113, B2 (Standard scenario) 0.00241, C1 (Standard scenario) 0.0111, C2 (Standard scenario) 0.000531, C3 (Standard scenario) 0.00276, C4 (Standard scenario) 0.000116, D (Standard scenario) -0.138
- Eutrophication potential - freshwater (EP-freshwater) [kg P eqv.]: A1 (Standard scenario) 0.00622, A2 (Standard scenario) 3.91e-6, A3 (Standard scenario) 7.91e-5, A4 (Standard scenario) 2.26e-5, A5 (Standard scenario) 3.73e-6, B2 (Standard scenario) 2.34e-5, C1 (Standard scenario) 3.42e-6, C2 (Standard scenario) 9.24e-7, C3 (Standard scenario) 2.13e-5, C4 (Standard scenario) 3.34e-7, D (Standard scenario) -0.000776
- Eutrophication potential - marine (EP-marine) [kg N eqv.]: A1 (Standard scenario) 0.103, A2 (Standard scenario) 0.000793, A3 (Standard scenario) 0.00189, A4 (Standard scenario) 0.018, A5 (Standard scenario) 0.00496, B2 (Standard scenario) 0.00238, C1 (Standard scenario) 0.00487, C2 (Standard scenario) 0.000187, C3 (Standard scenario) 0.000574, C4 (Standard scenario) 3.79e-5, D (Standard scenario) -0.0207
- Eutrophication potential - terrestrial (EP-terrestrial) [mol N eqv.]: A1 (Standard scenario) 1.11, A2 (Standard scenario) 0.00874, A3 (Standard scenario) 0.0211, A4 (Standard scenario) 0.2, A5 (Standard scenario) 0.0544, B2 (Standard scenario) 0.00871, C1 (Standard scenario) 0.0534, C2 (Standard scenario) 0.00206, C3 (Standard scenario) 0.00623, C4 (Standard scenario) 0.000417, D (Standard scenario) -0.241
- Global Warming Potential - total (GWP-total) [kg CO2-Äqv.]: A1 (Standard scenario) 96.9, A2 (Standard scenario) 0.388, A3 (Standard scenario) 0.642, A4 (Standard scenario) 3.57, A5 (Standard scenario) 1.77, B2 (Standard scenario) 0.0205, C1 (Standard scenario) 0.8, C2 (Standard scenario) 0.0916, C3 (Standard scenario) 2.92, C4 (Standard scenario) 0.0247, D (Standard scenario) -22.3
- Global Warming Potential - fossil fuels (GWP-fossil) [kg CO2-Äqv.]: A1 (Standard scenario) 96.9, A2 (Standard scenario) 0.388, A3 (Standard scenario) 0.642, A4 (Standard scenario) 3.57, A5 (Standard scenario) 1.77, B2 (Standard scenario) 0.0205, C1 (Standard scenario) 0.8, C2 (Standard scenario) 0.0916, C3 (Standard scenario) 2.92, C4 (Standard scenario) 0.0247, D (Standard scenario) -22.3
- Global Warming Potential - biogenic (GWP-biogenic) [kg CO2-Äqv.]: A1 (Standard scenario) 0.536, A2 (Standard scenario) 0.000179, A3 (Standard scenario) -0.956, A4 (Standard scenario) -1.54e-5, A5 (Standard scenario) 0.951, B2 (Standard scenario) -0.412, C1 (Standard scenario) 0.000809, C2 (Standard scenario) 4.23e-5, C3 (Standard scenario) 0.0576, C4 (Standard scenario) 0.000216, D (Standard scenario) -0.0962
- Global Warming Potential - land use and land use change (GWP-luluc) [kg CO2-Äqv.]: A1 (Standard scenario) 0.143, A2 (Standard scenario) 0.000142, A3 (Standard scenario) 0.0015, A4 (Standard scenario) 0.00195, A5 (Standard scenario) 0.00013, B2 (Standard scenario) 0.254, C1 (Standard scenario) 0.000122, C2 (Standard scenario) 3.36e-5, C3 (Standard scenario) 0.000446, C4 (Standard scenario) 7.72e-6, D (Standard scenario) -0.0679
- Depletion potential of the stratospheric ozone layer (ODP) [kg CFC 11-Äquiv.]: A1 (Standard scenario) 9.39e-6, A2 (Standard scenario) 8.56e-8, A3 (Standard scenario) 7.72e-8, A4 (Standard scenario) 7.41e-7, A5 (Standard scenario) 1.73e-7, B2 (Standard scenario) 2.94e-8, C1 (Standard scenario) 1.69e-7, C2 (Standard scenario) 2.02e-8, C3 (Standard scenario) 3.91e-8, C4 (Standard scenario) 3.7e-9, D (Standard scenario) -1.01e-6
- Photochemical Ozone Creation Potential (POCP) [kg NMVOC eqv.]: A1 (Standard scenario) 0.364, A2 (Standard scenario) 0.0025, A3 (Standard scenario) 0.00793, A4 (Standard scenario) 0.0527, A5 (Standard scenario) 0.0143, B2 (Standard scenario) 0.00114, C1 (Standard scenario) 0.014, C2 (Standard scenario) 0.000589, C3 (Standard scenario) 0.00187, C4 (Standard scenario) 0.000115, D (Standard scenario) -0.0686
- Water (user) deprivation potential (WDP) [m3 world eqv.]: A1 (Standard scenario) 76, A2 (Standard scenario) 0.0209, A3 (Standard scenario) 0.733, A4 (Standard scenario) 0.112, A5 (Standard scenario) 0.0144, B2 (Standard scenario) 0.8, C1 (Standard scenario) 0.0113, C2 (Standard scenario) 0.00494, C3 (Standard scenario) 0.072, C4 (Standard scenario) 0.00317, D (Standard scenario) -2.58
- Potential incidence of disease due to PM emissions (PM) [disease incidence]: A1 (Standard scenario) 5.58e-6, A2 (Standard scenario) 3.49e-8, A3 (Standard scenario) 1.19e-7, A4 (Standard scenario) 1.69e-7, A5 (Standard scenario) 1.83e-8, B2 (Standard scenario) 3.48e-8, C1 (Standard scenario) 1.58e-8, C2 (Standard scenario) 8.24e-9, C3 (Standard scenario) 3.07e-8, C4 (Standard scenario) 1.68e-9, D (Standard scenario) -1.47e-6
- Potential Human exposure efficiency relative to U235 (IRP) [kBq U235 eqv.]: A1 (Standard scenario) 3.83, A2 (Standard scenario) 0.0245, A3 (Standard scenario) 0.0352, A4 (Standard scenario) 0.206, A5 (Standard scenario) 0.0481, B2 (Standard scenario) 0.00566, C1 (Standard scenario) 0.047, C2 (Standard scenario) 0.00579, C3 (Standard scenario) 0.0259, C4 (Standard scenario) 0.00115, D (Standard scenario) -0.387
- Potential Comparative Toxic Unit for ecosystems (ETP-fw) [CTUe]: A1 (Standard scenario) 3310, A2 (Standard scenario) 5.22, A3 (Standard scenario) 68.8, A4 (Standard scenario) 36.7, A5 (Standard scenario) 7.39, B2 (Standard scenario) 21.8, C1 (Standard scenario) 6.98, C2 (Standard scenario) 1.23, C3 (Standard scenario) 36.3, C4 (Standard scenario) 18.6, D (Standard scenario) -562
- Potential Comparative Toxic Unit for humans - cancer effects (HTP-c) [CTUh]: A1 (Standard scenario) 6.51e-8, A2 (Standard scenario) 1.69e-10, A3 (Standard scenario) 1.43e-9, A4 (Standard scenario) 1.66e-9, A5 (Standard scenario) 2.55e-10, B2 (Standard scenario) 6.11e-10, C1 (Standard scenario) 1.24e-10, C2 (Standard scenario) 3.99e-11, C3 (Standard scenario) 3.35e-9, C4 (Standard scenario) 1.98e-11, D (Standard scenario) -3.05e-8
- Potential Comparative Toxic Unit for humans - non-cancer effects (HTP-nc) [CTUh]: A1 (Standard scenario) 3.41e-6, A2 (Standard scenario) 5.71e-9, A3 (Standard scenario) 5.89e-8, A4 (Standard scenario) 3.34e-8, A5 (Standard scenario) 1.04e-8, B2 (Standard scenario) 1.49e-8, C1 (Standard scenario) 9.77e-9, C2 (Standard scenario) 1.35e-9, C3 (Standard scenario) 2.32e-8, C4 (Standard scenario) 7.72e-10, D (Standard scenario) -6.31e-7
- Potential Soil quality index (SQP) [dimensionless]: A1 (Standard scenario) 312, A2 (Standard scenario) 5.07, A3 (Standard scenario) 120, A4 (Standard scenario) 18.9, A5 (Standard scenario) 1.58, B2 (Standard scenario) 19, C1 (Standard scenario) 1.39, C2 (Standard scenario) 1.2, C3 (Standard scenario) 3.76, C4 (Standard scenario) 0.543, D (Standard scenario) -98.6

## Review details
Independent verification of the declaration and data, according to EN ISO 14025:2010.

## Data sources
- ecoinvent 3.6 database
- ecoinvent database (general)
