# Photovoltaic solar panel 400-505 Wp

Dataset: ILCD process, EPD, average dataset
Geography: GLO
Reference year: 2025
Valid until: 2030
Classification: The International EPD System: Construction products, Infrastructure & buildings
Method details: Construction products (EN 15804+A2) (version 2.0.1)
Generated by: Roberto Manzanaro, r.manzanaro@ecointelligentgrowth.net
Registration number: EPD-IES-0026515:001
Owner: Soli Tek cells
Compliance: EN 15804+A2 (EF 3.1); ISO 14025
Review: Independent external review by Elisabet Amat
Amounts: rows without a unit in brackets have none in this file; such an amount is in the reference unit of its flow, which a separate flow dataset defines
copyright: true
licenseType: Free of charge for all users and uses
accessRestrictions: Your use of this material is subject to the General Terms of Use published on by EPD International AB:s homepage at https://www.environdec.com/contact/General-terms-of-use/. If you have not accepted EPD International AB:s the General Terms of Use, you are not authorized to exploit this work in any manner.

## Technology and included processes
The materials of the solar panels are: solar cells, ribbons, glass, encapsulant, junction box, silicone and frame (only some models, see below).

The modules by Solitek have an efficiency of around 22.27%. The wafer thickness is 130 um.

All the photovoltaic panels covered in the EPD have an aluminium frame, except for: SOLID Bifacial B108 435W, SOLID Bifacial full black B108 435W, and SOLID AGRO B.72 Increased Transparency 290W.

## Technical purpose
Depending on the model, the solar panels are designed for roof installation or for agricultural applications. Please, see the information about the individual models on the EPD to see the optimal application.

## Reference product
- 1Wp power of solar module: 1

## Inputs
- Use of renewable primary energy as energy carrier (PERE) [MJ]: A1-A3 2.08, A4 0.00333, A5 0.000101, B1 0, B2 0, B3 0, B4 0, B5 0, B6 0, B7 0, C1 0, C2 0.000113, C3 0.00172, C4 0, D -0.36
- Use of renewable primary energy resources used as raw materials (PERM) [MJ]: A1-A3 0.255, A4 0.000461, A5 1.32e-5, B1 0, B2 0, B3 0, B4 0, B5 0, B6 0, B7 0, C1 0, C2 1.56e-5, C3 0.000749, C4 0, D -0.0384
- Total use of renewable primary energy (PERT) [MJ]: A1-A3 2.34, A4 0.00379, A5 0.000115, B1 0, B2 0, B3 0, B4 0, B5 0, B6 0, B7 0, C1 0, C2 0.000128, C3 0.00247, C4 0, D -0.399
- Use of non renewable primary energy as energy carrier (PENRE) [MJ]: A1-A3 0.394, A4 0.00385, A5 6.36e-5, B1 0, B2 0, B3 0, B4 0, B5 0, B6 0, B7 0, C1 0, C2 0.000131, C3 0.000578, C4 0, D -0.0733
- Use of non renewable primary energy resources used as raw materials (PENRM) [MJ]: A1-A3 0.0249, A4 0.00236, A5 1.86e-5, B1 0, B2 0, B3 0, B4 0, B5 0, B6 0, B7 0, C1 0, C2 8.01e-5, C3 0.000135, C4 0, D -0.0056
- Total use of non renewable primary energy resource (PENRT) [MJ]: A1-A3 0.419, A4 0.00621, A5 8.21e-5, B1 0, B2 0, B3 0, B4 0, B5 0, B6 0, B7 0, C1 0, C2 0.000211, C3 0.000713, C4 0, D -0.0789
- Use of secondary material (SM) [kg]: A1-A3 0.00668, A4 0.000111, A5 2.44e-6, B1 0, B2 0, B3 0, B4 0, B5 0, B6 0, B7 0, C1 0, C2 3.76e-6, C3 2.79e-5, C4 0, D -0.00221
- Use of renewable secondary fuels (RSF) [MJ]: A1-A3 0.00115, A4 1.41e-6, A5 2.63e-8, B1 0, B2 0, B3 0, B4 0, B5 0, B6 0, B7 0, C1 0, C2 4.78e-8, C3 1.01e-5, C4 0, D -0.000124
- Use of non renewable secondary fuels (NRSF) [MJ]: A1-A3 0, A4 0, A5 0, B1 0, B2 0, B3 0, B4 0, B5 0, B6 0, B7 0, C1 0, C2 0, C3 0, C4 0, D 0
- Net use of fresh water (FW) [m3]: A1-A3 0.0352, A4 2.94e-5, A5 1.92e-6, B1 0, B2 0, B3 0, B4 0, B5 0, B6 0, B7 0, C1 0, C2 9.96e-7, C3 3.64e-5, C4 0, D -0.00622

## Outputs
- Hazardous waste disposed (HWD) [kg]: A1-A3 0.0397, A4 0.000165, A5 1.15e-5, B1 0, B2 0, B3 0, B4 0, B5 0, B6 0, B7 0, C1 0, C2 5.6e-6, C3 0.000909, C4 0, D -0.0064
- Non harzardous waste disposed (NHWD) [kg]: A1-A3 1.66, A4 0.00501, A5 0.000168, B1 0, B2 0, B3 0, B4 0, B5 0, B6 0, B7 0, C1 0, C2 0.00017, C3 0.0188, C4 0, D -0.266
- Radioactive waste disposed (RWD) [kg]: A1-A3 1.94e-5, A4 7.94e-8, A5 2.18e-9, B1 0, B2 0, B3 0, B4 0, B5 0, B6 0, B7 0, C1 0, C2 2.69e-9, C3 1.77e-8, C4 0, D -3.81e-6
- Components for re-use (CRU) [kg]: A1-A3 0, A4 0, A5 0, B1 0, B2 0, B3 0, B4 0, B5 0, B6 0, B7 0, C1 0, C2 0, C3 0, C4 0, D 0
- Materials for recycling (MFR) [kg]: A1-A3 0.00273, A4 1.8e-6, A5 0.00103, B1 0, B2 0, B3 0, B4 0, B5 0, B6 0, B7 0, C1 0, C2 6.12e-8, C3 0.000135, C4 0, D 0.000465
- Materials for energy recovery (MER) [kg]: A1-A3 1.08e-6, A4 1.51e-8, A5 2.42e-10, B1 0, B2 0, B3 0, B4 0, B5 0, B6 0, B7 0, C1 0, C2 5.12e-10, C3 3.34e-9, C4 0, D -3.06e-7
- Exported electrical energy (EEE) [MJ]: A1-A3 0.00531, A4 3.94e-5, A5 9.4e-7, B1 0, B2 0, B3 0, B4 0, B5 0, B6 0, B7 0, C1 0, C2 1.34e-6, C3 0.000245, C4 0, D -0.00129
- Exported thermal energy (EET) [MJ]: A1-A3 0.00309, A4 5.22e-5, A5 5.96e-7, B1 0, B2 0, B3 0, B4 0, B5 0, B6 0, B7 0, C1 0, C2 1.77e-6, C3 8.98e-6, C4 0, D -0.00162

## Impact indicators
- Global Warming Potential - fossil fuels (GWP-fossil) [kg CO2 eq.]: A1-A3 0.837, A4 0.0172, A5 0.000382, B1 0, B2 0, B3 0, B4 0, B5 0, B6 0, B7 0, C1 0, C2 0.000585, C3 0.0321, C4 0, D -0.175
- Global Warming Potential - biogenic (GWP-biogenic) [kg CO2 eq.]: A1-A3 -0.0016, A4 1.48e-5, A5 0.0111, B1 0, B2 0, B3 0, B4 0, B5 0, B6 0, B7 0, C1 0, C2 5.02e-7, C3 0, C4 0, D 0.00245
- Global Warming Potential - land use and land use change (GWP-luluc) [kg CO2 eq.]: A1-A3 0.0012, A4 8.37e-6, A5 3.34e-7, B1 0, B2 0, B3 0, B4 0, B5 0, B6 0, B7 0, C1 0, C2 2.84e-7, C3 1.86e-6, C4 0, D -0.00023
- Global Warming Potential - total (GWP-total) [kg CO2 eq.]: A1-A3 0.836, A4 0.0173, A5 0.0115, B1 0, B2 0, B3 0, B4 0, B5 0, B6 0, B7 0, C1 0, C2 0.000585, C3 0.0321, C4 0, D -0.172
- Depletion potential of the stratospheric ozone layer (ODP) [kg CFC-11 eq.]: A1-A3 6.19e-8, A4 3.75e-10, A5 4.46e-12, B1 0, B2 0, B3 0, B4 0, B5 0, B6 0, B7 0, C1 0, C2 1.27e-11, C3 4.59e-11, C4 0, D -1.37e-8
- Acidifcation potential, Accumulated Exceedance (AP) [mol H+ eq.]: A1-A3 0.00555, A4 5.62e-5, A5 1.3e-6, B1 0, B2 0, B3 0, B4 0, B5 0, B6 0, B7 0, C1 0, C2 1.91e-6, C3 1.72e-5, C4 0, D -0.00116
- Europhication potential - freshwater (EP-freshwater) [kg P eq.]: A1-A3 0.000459, A4 1.21e-6, A5 4.12e-8, B1 0, B2 0, B3 0, B4 0, B5 0, B6 0, B7 0, C1 0, C2 4.09e-8, C3 5.18e-7, C4 0, D -6.78e-5
- Europhication potential - marine (EP-marine) [kg N eq.]: A1-A3 0.00118, A4 1.94e-5, A5 1.28e-6, B1 0, B2 0, B3 0, B4 0, B5 0, B6 0, B7 0, C1 0, C2 6.57e-7, C3 7.02e-6, C4 0, D -0.000224
- Europhication potential - terrestrial (EP-terrestrial) [mol N eq.]: A1-A3 0.0113, A4 0.000204, A5 4.91e-6, B1 0, B2 0, B3 0, B4 0, B5 0, B6 0, B7 0, C1 0, C2 6.92e-6, C3 7.09e-5, C4 0, D -0.00231
- Photochemical Ozone Creation Potential (POCP) [kg NMVOC eq.]: A1-A3 0.00413, A4 8.39e-5, A5 1.7e-6, B1 0, B2 0, B3 0, B4 0, B5 0, B6 0, B7 0, C1 0, C2 2.85e-6, C3 1.71e-5, C4 0, D -0.000799
- Abiotic depletion potential - non-fossil resources (ADPE) [kg Sb eq.]: A1-A3 6.63e-5, A4 5.65e-8, A5 8.04e-12, B1 0, B2 0, B3 0, B4 0, B5 0, B6 0, B7 0, C1 0, C2 1.92e-9, C3 0, C4 0, D -5.73e-6
- Abiotic depletion potential - fossil resources (ADPF) [MJ]: A1-A3 10.9, A4 0.246, A5 0.00269, B1 0, B2 0, B3 0, B4 0, B5 0, B6 0, B7 0, C1 0, C2 0.00835, C3 0.0232, C4 0, D -2.22
- Water (user) deprivation potential (WDP) [m3 world eq. deprived]: A1-A3 6.02, A4 0.00121, A5 0.000151, B1 0, B2 0, B3 0, B4 0, B5 0, B6 0, B7 0, C1 0, C2 4.1e-5, C3 0.0014, C4 0, D -0.266
- Global Warming Potential (GWP-GHG) [kg CO2 eq.]: A1-A3 0.838, A4 0.0172, A5 0.000383, B1 0, B2 0, B3 0, B4 0, B5 0, B6 0, B7 0, C1 0, C2 0.000585, C3 0.0321, C4 0, D -0.175
- Particulate Matter emissions (PM) [Disease incidence]: A1-A3 4.88e-8, A4 1.37e-9, A5 2.85e-11, B1 0, B2 0, B3 0, B4 0, B5 0, B6 0, B7 0, C1 0, C2 4.65e-11, C3 1.88e-10, C4 0, D -1.3e-8
- Ionizing radiation, human health (IRP) [kBq U235 eq.]: A1-A3 0.0776, A4 0.000327, A5 8.83e-6, B1 0, B2 0, B3 0, B4 0, B5 0, B6 0, B7 0, C1 0, C2 1.11e-5, C3 7.22e-5, C4 0, D -0.0152
- Eco-toxicity - freshwater (ETP-fw) [CTUe]: A1-A3 8.1, A4 0.12, A5 0.00498, B1 0, B2 0, B3 0, B4 0, B5 0, B6 0, B7 0, C1 0, C2 0.00406, C3 0.297, C4 0, D -1.37
- Human toxicity, cancer effect (HTP-c) [CTUh]: A1-A3 6.68e-10, A4 8.17e-12, A5 3.56e-13, B1 0, B2 0, B3 0, B4 0, B5 0, B6 0, B7 0, C1 0, C2 2.77e-13, C3 3.8e-11, C4 0, D -1.23e-10
- Human toxicity, non-cancer effects (HTP-nc) [CTUh]: A1-A3 2.73e-8, A4 1.73e-10, A5 8.51e-12, B1 0, B2 0, B3 0, B4 0, B5 0, B6 0, B7 0, C1 0, C2 5.87e-12, C3 2.48e-9, C4 0, D -4.53e-9
- Land use related impacts/Soil quality (SQP) [dimensionless]: A1-A3 4.15, A4 0.145, A5 0.00189, B1 0, B2 0, B3 0, B4 0, B5 0, B6 0, B7 0, C1 0, C2 0.00493, C3 0.0309, C4 0, D -0.683

## Use advice
The end-of-life scenarios are modelled according to solar panel waste treatment in Sweden.

## Data sources
- ecoinvent database (general)
- ecoinvent 3.9.1 database
