# Photovoltaic solar panel - SPICN6(LAR)-66-420-440/IH

Dataset: ILCD process, EPD, representative dataset
Geography: GLO
Reference year: 2023
Valid until: 2028
Classification: The International EPD System: Construction products
Method details: 2019:14-c-PCR-016 Photovoltaic modules and parts thereof
Generated by: , 1414160782@qq.com
Registration number: EPD-IES-0009965:002 (S-P-09965)
Owner: QingHai Huanghe Hydropower Development CO.,Ltd.Xining Solar Power Branch
Compliance: EN 15804+A2 (EF 3.0); ISO 14025
Review: Claudia A. Peña, Addere Consultores
Amounts: rows without a unit in brackets have none in this file; such an amount is in the reference unit of its flow, which a separate flow dataset defines
copyright: true
accessRestrictions: Your use of this material is subject to the General Terms of Use published on by EPD International AB:s homepage at https://www.environdec.com/contact/General-terms-of-use/. If you have not accepted EPD International AB:s the General Terms of Use, you are not authorized to exploit this work in any manner.

## Geography
China and Spain

## Technology and included processes
Total weight excluding the package of the representative product is 21.78 kg,the main material are Glass,Al frame,Coextruded POE-High cutoff,Rear cover-CPC,Coextruded POE-High Transmittance,Cell（132 half）,Adhesive for frame and Junction box, et al.

## Technical purpose
To identify the hotspot of environmental impact in the whole production and supply chain and to communicate the environmental performance and adopt the European client’s requirements（B2B）

## Reference product
- The reference flow of the model is one unit of the PV module SPICN6(LAR)-66-420/IH, SPICN6(LAR)-66-425/IH,SPICN6(LAR)-66-430/IH,SPICN6(LAR)-66-435/IH,SPICN6(LAR)-66-440/IH produced by HHDC.: 1

## Inputs
- Use of renewable primary energy as energy carrier (PERE) [MJ]: A1-A3 1.36124, A4 0.00483791, A5 6.94312e-6, B1 0, B2 0.00101986, B3 0, B4 0, B5 0, B6 0, B7 0, C1 0, C2 0.000136859, C3 0.00474827, C4 1.37866e-6, D -0.757679
- Use of renewable primary energy resources used as raw materials (PERM) [MJ]: A1-A3 0.0278079, A4 0, A5 0, B1 0, B2 0, B3 0, B4 0, B5 0, B6 0, B7 0, C1 0, C2 0, C3 0, C4 0, D 0
- Total use of renewable primary energy (PERT) [MJ]: A1-A3 1.38904, A4 0.00483791, A5 6.94312e-6, B1 0, B2 0.00101986, B3 0, B4 0, B5 0, B6 0, B7 0, C1 0, C2 0.000136859, C3 0.00474827, C4 1.37866e-6, D -0.757679
- Use of non renewable primary energy as energy carrier (PENRE) [MJ]: A1-A3 4.45308, A4 0.435927, A5 0.000410539, B1 0, B2 0.00708336, B3 0, B4 0, B5 0, B6 0, B7 0, C1 0, C2 0.00810284, C3 0.0555477, C4 0.000161622, D -3.28158
- Use of non renewable primary energy resources used as raw materials (PENRM) [MJ]: A1-A3 0.000164496, A4 0, A5 0, B1 0, B2 0, B3 0, B4 0, B5 0, B6 0, B7 0, C1 0, C2 0, C3 0, C4 0, D 0
- Total use of non renewable primary energy resource (PENRT) [MJ]: A1-A3 4.45324, A4 0.435927, A5 0.000410539, B1 0, B2 0.00708336, B3 0, B4 0, B5 0, B6 0, B7 0, C1 0, C2 0.00810284, C3 0.0555477, C4 0.000161622, D -3.28158
- Use of secondary material (SM) [kg]: A1-A3 0, A4 0, A5 0, B1 0, B2 0, B3 0, B4 0, B5 0, B6 0, B7 0, C1 0, C2 0, C3 0, C4 0, D 0
- Use of renewable secondary fuels (RSF) [MJ]: A1-A3 0, A4 0, A5 0, B1 0, B2 0, B3 0, B4 0, B5 0, B6 0, B7 0, C1 0, C2 0, C3 0, C4 0, D 0
- Use of non renewable secondary fuels (NRSF) [MJ]: A1-A3 0, A4 0, A5 0, B1 0, B2 0, B3 0, B4 0, B5 0, B6 0, B7 0, C1 0, C2 0, C3 0, C4 0, D 0
- Net use of fresh water (FW) [m3]: A1-A3 0.00524618, A4 4.60016e-5, A5 5.19769e-8, B1 0, B2 0.00116973, B3 0, B4 0, B5 0, B6 0, B7 0, C1 0, C2 1.02446e-6, C3 0.00012933, C4 1.73173e-7, D -0.0105428

## Outputs
- Hazardous waste disposed (HWD) [kg]: A1-A3 0.00087281, A4 1.01665e-6, A5 1.09966e-9, B1 0, B2 1.17449e-8, B3 0, B4 0, B5 0, B6 0, B7 0, C1 0, C2 2.17043e-8, C3 2.23121e-7, C4 2.44328e-10, D -1.19561e-5
- Non harzardous waste disposed (NHWD) [kg]: A1-A3 0.0569726, A4 0.0230031, A5 1.74341e-5, B1 0, B2 8.83402e-5, B3 0, B4 0, B5 0, B6 0, B7 0, C1 0, C2 0.000343568, C3 0.00102057, C4 0.00109828, D -0.0322403
- Radioactive waste disposed (RWD) [kg]: A1-A3 1.79902e-5, A4 2.8816e-6, A5 2.75034e-9, B1 0, B2 4.32228e-8, B3 0, B4 0, B5 0, B6 0, B7 0, C1 0, C2 5.42887e-8, C3 1.44881e-7, C4 1.05902e-9, D -8.51327e-6
- Components for re-use (CRU) [kg]: A1-A3 0, A4 0, A5 0, B1 0, B2 0, B3 0, B4 0, B5 0, B6 0, B7 0, C1 0, C2 0, C3 0, C4 0, D 0
- Materials for recycling (MFR) [kg]: A1-A3 0.00133224, A4 0, A5 0.00257023, B1 0, B2 0, B3 0, B4 0, B5 0, B6 0, B7 0, C1 0, C2 0, C3 0.00218712, C4 0, D 0
- Materials for energy recovery (MER) [kg]: A1-A3 2.55814e-7, A4 0, A5 0, B1 0, B2 0, B3 0, B4 0, B5 0, B6 0, B7 0, C1 0, C2 0, C3 0, C4 0, D 0
- Exported electrical energy (EEE) [MJ]: A1-A3 0, A4 0, A5 0, B1 0, B2 0, B3 0, B4 0, B5 0, B6 0, B7 0, C1 0, C2 0, C3 0.00204814, C4 0, D 0
- Exported thermal energy (EET) [MJ]: A1-A3 0, A4 0, A5 0, B1 0, B2 0, B3 0, B4 0, B5 0, B6 0, B7 0, C1 0, C2 0, C3 0.0011694, C4 0, D 0

## Impact indicators
- Global Warming Potential - fossil fuels (GWP-fossil) [kg CO2 eq.]: A1-A3 0.38722, A4 0.0296281, A5 2.74021e-5, B1 0, B2 0.000403879, B3 0, B4 0, B5 0, B6 0, B7 0, C1 0, C2 0.000542854, C3 0.00482499, C4 5.7848e-6, D -0.262203
- Global Warming Potential - biogenic (GWP-biogenic) [kg CO2 eq.]: A1-A3 -0.00324842, A4 1.09522e-5, A5 1.24856e-8, B1 0, B2 1.70226e-6, B3 0, B4 0, B5 0, B6 0, B7 0, C1 0, C2 2.46145e-7, C3 0.00456453, C4 3.77735e-9, D -0.00149016
- Global Warming Potential - land use and land use change (GWP-luluc) [kg CO2 eq.]: A1-A3 0.000449716, A4 1.34402e-5, A5 1.29641e-8, B1 0, B2 8.32929e-7, B3 0, B4 0, B5 0, B6 0, B7 0, C1 0, C2 2.55514e-7, C3 5.51548e-6, C4 5.46356e-9, D -0.000420523
- Global Warming Potential - total (GWP-total) [kg CO2 eq.]: A1-A3 0.384421, A4 0.0296525, A5 2.74275e-5, B1 0, B2 0.000406414, B3 0, B4 0, B5 0, B6 0, B7 0, C1 0, C2 0.000543356, C3 0.00939504, C4 5.79404e-6, D -0.265946
- Depletion potential of the stratospheric ozone layer (ODP) [kg CFC-11 eq.]: A1-A3 5.49859e-8, A4 6.58608e-9, A5 6.18233e-12, B1 0, B2 2.69244e-11, B3 0, B4 0, B5 0, B6 0, B7 0, C1 0, C2 1.2204e-10, C3 7.49854e-10, C4 2.34038e-12, D -1.30662e-8
- Acidifcation potential, Accumulated Exceedance (AP) [mol H+ eq.]: A1-A3 0.00266919, A4 0.000252591, A5 7.76442e-8, B1 0, B2 2.31477e-6, B3 0, B4 0, B5 0, B6 0, B7 0, C1 0, C2 2.15825e-6, C3 5.21638e-5, C4 5.44027e-8, D -0.0013988
- Europhication potential - freshwater (EP-freshwater) [kg P eq.]: A1-A3 0.000151457, A4 1.9685e-6, A5 0, B1 0, B2 2.84212e-7, B3 0, B4 0, B5 0, B6 0, B7 0, C1 0, C2 4.0773e-8, C3 1.93504e-6, C4 5.2965e-10, D -0.000147916
- Europhication potential - marine (EP-marine) [kg N eq.]: A1-A3 0.000516121, A4 6.56704e-5, A5 2.06855e-9, B1 0, B2 4.40353e-7, B3 0, B4 0, B5 0, B6 0, B7 0, C1 0, C2 6.28335e-7, C3 4.45268e-5, C4 1.89121e-8, D -0.00027429
- Europhication potential - terrestrial (EP-terrestrial) [mol N eq.]: A1-A3 0.00562074, A4 0.000724362, A5 1.51608e-8, B1 0, B2 4.20317e-6, B3 0, B4 0, B5 0, B6 0, B7 0, C1 0, C2 6.8618e-6, C3 0.000161838, C4 2.07076e-7, D -0.00288159
- Photochemical Ozone Creation Potential (POCP) [kg NMVOC eq.]: A1-A3 0.00151853, A4 0.000205112, A5 1.65054e-7, B1 0, B2 1.35494e-6, B3 0, B4 0, B5 0, B6 0, B7 0, C1 0, C2 2.10934e-6, C3 0.000116411, C4 6.02414e-8, D -0.000775326
- Abiotic depletion potential - non-fossil resources (ADPE) [kg Sb eq.]: A1-A3 4.13147e-5, A4 8.56503e-8, A5 6.33317e-8, B1 0, B2 1.95779e-9, B3 0, B4 0, B5 0, B6 0, B7 0, C1 0, C2 2.47395e-9, C3 2.32974e-7, C4 1.31956e-11, D -2.3117e-5
- Abiotic depletion potential - fossil resources (ADPF) [MJ]: A1-A3 4.45289, A4 0.435909, A5 1.25533e-10, B1 0, B2 0.0070855, B3 0, B4 0, B5 0, B6 0, B7 0, C1 0, C2 0.00810263, C3 0.0555416, C4 0.000161595, D -3.28151
- Water (user) deprivation potential (WDP) [m3 world eq. deprived]: A1-A3 0.207846, A4 0.00140007, A5 0.000410528, B1 0, B2 0.0500171, B3 0, B4 0, B5 0, B6 0, B7 0, C1 0, C2 2.68326e-5, C3 0.00511365, C4 7.27277e-6, D -0.291823
- Global Warming Potential (GWP-GHG) [kg CO2 eq.]: A1-A3 0.377206, A4 0.0294953, A5 2.72106e-5, B1 0, B2 0.000384671, B3 0, B4 0, B5 0, B6 0, B7 0, C1 0, C2 0.00053908, C3 0.00468068, C4 5.74209e-6, D -0.256331

## Use advice
The Full Recycling EoL (C3 & C4) Procedure (FRELP) is a process that has developed from EU research into recycling procedures.The life span of PV panels is about 25 years. The first batch PV modules that were put in use in world will reach end of life around year 2025.

## Data sources
- ecoinvent database (general)
- ecoinvent 3.8 database
