# Photovoltaic modules of NEG9R.25, NEG9R.28 and NEG9RC.27

Dataset: ILCD process, EPD, representative dataset
Geography: GLO
Reference year: 2024
Valid until: 2029
Classification: The International EPD System: Construction products
Method details: 2019:14-c-PCR-016 Photovoltaic modules and parts thereof
Generated by: , freddey.land@gmail.com
Registration number: EPD-IES-0015109:002
Owner: Trinasolar
Compliance: EN 15804+A2 (EF 3.0); ISO 14025
Review: Independent external review by Jiang Zhu, TUV Rheinland (China) Ltd.
Amounts: rows without a unit in brackets have none in this file; such an amount is in the reference unit of its flow, which a separate flow dataset defines
copyright: true
licenseType: Free of charge for all users and uses
accessRestrictions: Your use of this material is subject to the General Terms of Use published on by EPD International AB:s homepage at https://www.environdec.com/contact/General-terms-of-use/. If you have not accepted EPD International AB:s the General Terms of Use, you are not authorized to exploit this work in any manner.

## Technology and included processes
the products in this EPD are PV modules which are N types which using new assembly tecnology with smaller size but bigger Power. Ultra-low Degradation, longer warranty, higher output.

## Technical purpose
The PV modules in this EPD can be used both in ground installation and residential and C&I rooftops.

## Reference product
- PV module . Unit: capacity (Wp). Value: 1.0: 1

## Inputs
- Use of renewable primary energy as energy carrier (PERE) [MJ]: A1-A3 0.685, A4 0.00207, A5 0.000206, B1 ND, B2 0.00137, B3 ND, B4 ND, B5 ND, B6 ND, B7 ND, C1 0.000201, C2 9.62e-5, C3 0.00353, C4 0.000128, D -0.215
- Use of renewable primary energy resources used as raw materials (PERM) [MJ]: A1-A3 0.00905, A4 0, A5 0, B1 ND, B2 0, B3 ND, B4 ND, B5 ND, B6 ND, B7 ND, C1 0, C2 0, C3 0, C4 0, D 0
- Total use of renewable primary energy (PERT) [MJ]: A1-A3 0.694, A4 0.00207, A5 0.000206, B1 ND, B2 0.00137, B3 ND, B4 ND, B5 ND, B6 ND, B7 ND, C1 0.000201, C2 9.62e-5, C3 0.00353, C4 0.000128, D -0.215
- Use of non renewable primary energy as energy carrier (PENRE) [MJ]: A1-A3 4.2, A4 0.206, A5 0.018, B1 ND, B2 0.0144, B3 ND, B4 ND, B5 ND, B6 ND, B7 ND, C1 0.018, C2 0.0062, C3 0.0185, C4 0.00472, D -0.504
- Use of non renewable primary energy resources used as raw materials (PENRM) [MJ]: A1-A3 0.116, A4 0, A5 0, B1 ND, B2 0, B3 ND, B4 ND, B5 ND, B6 ND, B7 ND, C1 0, C2 0, C3 0, C4 0, D 0
- Total use of non renewable primary energy resource (PENRT) [MJ]: A1-A3 4.32, A4 0.206, A5 0.018, B1 ND, B2 0.0144, B3 ND, B4 ND, B5 ND, B6 ND, B7 ND, C1 0.018, C2 0.0062, C3 0.0185, C4 0.00472, D -0.504
- Use of secondary material (SM) [kg]: A1-A3 0, A4 0, A5 0, B1 ND, B2 0, B3 ND, B4 ND, B5 ND, B6 ND, B7 ND, C1 0, C2 0, C3 0, C4 0, D 0
- Use of renewable secondary fuels (RSF) [MJ]: A1-A3 0, A4 0, A5 0, B1 ND, B2 0, B3 ND, B4 ND, B5 ND, B6 ND, B7 ND, C1 0, C2 0, C3 0, C4 0, D 0
- Use of non renewable secondary fuels (NRSF) [MJ]: A1-A3 0, A4 0, A5 0, B1 ND, B2 0, B3 ND, B4 ND, B5 ND, B6 ND, B7 ND, C1 0, C2 0, C3 0, C4 0, D 0
- Net use of fresh water (FW) [m3]: A1-A3 0.00965, A4 2.28e-5, A5 2.01e-6, B1 ND, B2 0.000924, B3 ND, B4 ND, B5 ND, B6 ND, B7 ND, C1 1.78e-6, C2 8.83e-7, C3 1.43e-5, C4 9.7e-6, D -0.00143

## Outputs
- Hazardous waste disposed (HWD) [kg]: A1-A3 0.00029, A4 3.89e-6, A5 2.56e-6, B1 ND, B2 7.96e-7, B3 ND, B4 ND, B5 ND, B6 ND, B7 ND, C1 1.69e-7, C2 1.53e-7, C3 5.79e-7, C4 0.000242, D -1.22e-5
- Non harzardous waste disposed (NHWD) [kg]: A1-A3 0.0468, A4 0.0069, A5 0.000108, B1 ND, B2 0.000167, B3 ND, B4 ND, B5 ND, B6 ND, B7 ND, C1 2.64e-5, C2 0.000303, C3 4.91e-5, C4 0.0123, D -0.00849
- Radioactive waste disposed (RWD) [kg]: A1-A3 6.79e-6, A4 3.69e-8, A5 5.58e-9, B1 ND, B2 2.54e-8, B3 ND, B4 ND, B5 ND, B6 ND, B7 ND, C1 5.5e-9, C2 2.01e-9, C3 1.25e-7, C4 2.02e-9, D -2.12e-6
- Components for re-use (CRU) [kg]: A1-A3 0, A4 0, A5 0, B1 ND, B2 0, B3 ND, B4 ND, B5 ND, B6 ND, B7 ND, C1 0, C2 0, C3 0, C4 0, D 0
- Materials for recycling (MFR) [kg]: A1-A3 0, A4 0, A5 0.000612, B1 ND, B2 0, B3 ND, B4 ND, B5 ND, B6 ND, B7 ND, C1 0, C2 0, C3 0.0304, C4 0, D 0
- Materials for energy recovery (MER) [kg]: A1-A3 0, A4 0, A5 0, B1 ND, B2 0, B3 ND, B4 ND, B5 ND, B6 ND, B7 ND, C1 0, C2 0, C3 0, C4 0, D 0
- Exported electrical energy (EEE) [MJ]: A1-A3 0, A4 0, A5 0.00184, B1 ND, B2 0, B3 ND, B4 ND, B5 ND, B6 ND, B7 ND, C1 0, C2 0, C3 0, C4 0.016, D 0
- Exported thermal energy (EET) [MJ]: A1-A3 0, A4 0, A5 0.00365, B1 ND, B2 0, B3 ND, B4 ND, B5 ND, B6 ND, B7 ND, C1 0, C2 0, C3 0, C4 0.0313, D 0

## Impact indicators
- Global Warming Potential - fossil fuels (GWP-fossil) [kg CO2 eq.]: A1-A3 0.356, A4 0.0157, A5 0.00152, B1 ND, B2 0.0012, B3 ND, B4 ND, B5 ND, B6 ND, B7 ND, C1 0.00136, C2 0.000437, C3 0.000864, C4 0.0133, D -0.0342
- Global Warming Potential - biogenic (GWP-biogenic) [kg CO2 eq.]: A1-A3 0.00156, A4 1.82e-6, A5 0.000231, B1 ND, B2 1.97e-6, B3 ND, B4 ND, B5 ND, B6 ND, B7 ND, C1 1.17e-6, C2 3.95e-7, C3 2.99e-5, C4 3.26e-6, D -0.000738
- Global Warming Potential - land use and land use change (GWP-luluc) [kg CO2 eq.]: A1-A3 0.000487, A4 1.04e-5, A5 2.08e-7, B1 ND, B2 1.59e-6, B3 ND, B4 ND, B5 ND, B6 ND, B7 ND, C1 2.07e-7, C2 2.12e-7, C3 1.98e-6, C4 1.34e-7, D -0.000585
- Global Warming Potential - total (GWP-total) [kg CO2 eq.]: A1-A3 0.358, A4 0.0157, A5 0.00175, B1 ND, B2 0.0012, B3 ND, B4 ND, B5 ND, B6 ND, B7 ND, C1 0.00136, C2 0.000438, C3 0.000896, C4 0.0133, D -0.0355
- Depletion potential of the stratospheric ozone layer (ODP) [kg CFC-11 eq.]: A1-A3 3.37e-7, A4 2.65e-10, A5 2.19e-11, B1 ND, B2 2.34e-10, B3 ND, B4 ND, B5 ND, B6 ND, B7 ND, C1 2.16e-11, C2 9.52e-12, C3 1.56e-11, C4 1.11e-11, D -9.65e-10
- Acidifcation potential, Accumulated Exceedance (AP) [mol H+ eq.]: A1-A3 0.00223, A4 0.000307, A5 1.25e-5, B1 ND, B2 6.35e-6, B3 ND, B4 ND, B5 ND, B6 ND, B7 ND, C1 1.25e-5, C2 1.43e-6, C3 4.69e-6, C4 4.09e-6, D -0.000323
- Europhication potential - freshwater (EP-freshwater) [kg P eq.]: A1-A3 0.000156, A4 7.76e-7, A5 6.21e-8, B1 ND, B2 4.34e-7, B3 ND, B4 ND, B5 ND, B6 ND, B7 ND, C1 6.15e-8, C2 3.06e-8, C3 7.16e-7, C4 3.69e-7, D -2.38e-5
- Europhication potential - marine (EP-marine) [kg N eq.]: A1-A3 0.000413, A4 7.87e-5, A5 5.92e-6, B1 ND, B2 1.29e-6, B3 ND, B4 ND, B5 ND, B6 ND, B7 ND, C1 5.75e-6, C2 4.9e-7, C3 1.17e-6, C4 3.39e-5, D -3.52e-5
- Europhication potential - terrestrial (EP-terrestrial) [mol N eq.]: A1-A3 0.00445, A4 0.000867, A5 6.28e-5, B1 ND, B2 1.32e-5, B3 ND, B4 ND, B5 ND, B6 ND, B7 ND, C1 6.25e-5, C2 5.18e-6, C3 1.13e-5, C4 2.05e-5, D -0.000356
- Photochemical Ozone Creation Potential (POCP) [kg NMVOC eq.]: A1-A3 0.00131, A4 0.000245, A5 1.86e-5, B1 ND, B2 4.25e-6, B3 ND, B4 ND, B5 ND, B6 ND, B7 ND, C1 1.85e-5, C2 2.13e-6, C3 3.52e-6, C4 5.57e-6, D -0.000143
- Abiotic depletion potential - non-fossil resources (ADPE) [kg Sb eq.]: A1-A3 1.73e-5, A4 2.68e-8, A5 5.24e-10, B1 ND, B2 5.46e-9, B3 ND, B4 ND, B5 ND, B6 ND, B7 ND, C1 5.1e-10, C2 1.4e-9, C3 1.56e-9, C4 6.66e-10, D -2.6e-6
- Abiotic depletion potential - fossil resources (ADPF) [MJ]: A1-A3 4.32, A4 0.206, A5 0.018, B1 ND, B2 0.0144, B3 ND, B4 ND, B5 ND, B6 ND, B7 ND, C1 0.018, C2 0.0062, C3 0.0186, C4 0.00472, D -0.504
- Water (user) deprivation potential (WDP) [m3 world eq. deprived]: A1-A3 0.259, A4 0.000676, A5 4.4e-5, B1 ND, B2 0.0396, B3 ND, B4 ND, B5 ND, B6 ND, B7 ND, C1 4.28e-5, C2 2.53e-5, C3 0.000182, C4 0.000173, D -0.0056
- Global Warming Potential (GWP-GHG) [kg CO2 eq.]: A1-A3 0.368, A4 0.0158, A5 0.00175, B1 ND, B2 0.00122, B3 ND, B4 ND, B5 ND, B6 ND, B7 ND, C1 0.00136, C2 0.00044, C3 0.000944, C4 0.0133, D -0.0371
- Particulate Matter emissions (PM) [Disease incidence]: A1-A3 2.44e-8, A4 8.56e-10, A5 3.46e-10, B1 ND, B2 8.07e-11, B3 ND, B4 ND, B5 ND, B6 ND, B7 ND, C1 3.45e-10, C2 3.48e-11, C3 4.56e-11, C4 3.3e-11, D -2.35e-9
- Ionizing radiation, human health (IRP) [kBq U235 eq.]: A1-A3 0.0276, A4 0.000156, A5 2.25e-5, B1 ND, B2 0.000105, B3 ND, B4 ND, B5 ND, B6 ND, B7 ND, C1 2.22e-5, C2 8.29e-6, C3 0.000484, C4 8.35e-6, D -0.00806
- Eco-toxicity - freshwater (ETP-fw) [CTUe]: A1-A3 3.75, A4 0.103, A5 0.0091, B1 ND, B2 0.00526, B3 ND, B4 ND, B5 ND, B6 ND, B7 ND, C1 0.00842, C2 0.00306, C3 0.00298, C4 0.103, D -0.252
- Human toxicity, cancer effect (HTP-c) [CTUh]: A1-A3 1.84e-10, A4 6.85e-12, A5 4.34e-13, B1 ND, B2 2.84e-12, B3 ND, B4 ND, B5 ND, B6 ND, B7 ND, C1 4.16e-13, C2 1.99e-13, C3 2.75e-13, C4 1.02e-12, D -1.17e-10
- Human toxicity, non-cancer effects (HTP-nc) [CTUh]: A1-A3 6.62e-9, A4 9.74e-11, A5 3.75e-12, B1 ND, B2 4.01e-11, B3 ND, B4 ND, B5 ND, B6 ND, B7 ND, C1 3.03e-12, C2 4.37e-12, C3 6.68e-12, C4 1.7e-10, D -2.61e-9
- Land use related impacts/Soil quality (SQP) [dimensionless]: A1-A3 1.08, A4 0.0862, A5 0.00131, B1 ND, B2 0.00299, B3 ND, B4 ND, B5 ND, B6 ND, B7 ND, C1 0.00126, C2 0.00369, C3 0.00283, C4 0.00742, D -0.156

## Use advice
This report is subject to several limitations and uncertainties, and caution should be taken when using the results for comparison or making commitments based on them. The results are only informational for the analyzed PV modules in this report and referenced year and may not be representative of other PV modules or production processes outside the studied scope.
The indicator Ionising radiation deals mainly with the eventual impact of low-dose ionizing radiation on human health of the nuclear fuel cycle. It does not consider effects due to possible nuclear accidents, occupational exposure nor radioactive waste disposal in underground facilities. Potential ionizing radiation from the soil, from radon and some construction materials is also not measured by this indicator.

## Data sources
- ecoinvent database (general)
- ecoinvent 3.9.1 database
