# LONGi Solar Monocrystalline Silicon Photovoltaic Modules

Dataset: ILCD process, EPD, specific dataset
Geography: GLO
Reference year: 2023
Valid until: 2028
Classification: The International EPD System: Construction products
Method details: 2019:14-c-PCR-016 Photovoltaic modules and parts thereof
Generated by: , gaoyuanshan@longi.com
Registration number: EPD-IES-0009079:004 (S-P-09079)
Owner: LONGi Green Energy Technology Co., Ltd.
Compliance: EN 15804+A2 (EF 3.0); ISO 14025
Review: Independent external review by Bill Kung
Amounts: rows without a unit in brackets have none in this file; such an amount is in the reference unit of its flow, which a separate flow dataset defines
copyright: true
licenseType: Free of charge for all users and uses
accessRestrictions: Your use of this material is subject to the General Terms of Use published on by EPD International AB:s homepage at https://www.environdec.com/contact/General-terms-of-use/. If you have not accepted EPD International AB:s the General Terms of Use, you are not authorized to exploit this work in any manner.

## Technology and included processes
The solar photovoltaic module components mainly include PV cells, solar glass, Frames, EVA/POE, and Junction Box. Manufacturing includes polysilicon production, ingot pulling, wafer slicing, cell production and module assembling. The module will be transported to the project site for installation, after 25-30 years of service the module will be send to end-of-life treatment.

## Technical purpose
LONGi Solar PV modules are widely used to generate electricity on ultra-large ground power stations and Large-scale industrial and commercial projects.

## Reference product
- Solar photovoltaic module: 1

## Inputs
- Use of renewable primary energy as energy carrier (PERE) [MJ]: A1-A3 3.9, A4 0.0052, A5 0.035, C1 0, C2 6.9e-5, C3 3.8e-5, C4 8.1e-5, D -0.47
- Use of renewable primary energy resources used as raw materials (PERM) [MJ]: A1-A3 0, A4 0, A5 0, C1 0, C2 0, C3 0, C4 0, D 0
- Total use of renewable primary energy (PERT) [MJ]: A1-A3 3.9, A4 0.0052, A5 0.035, C1 0, C2 6.9e-5, C3 3.8e-5, C4 8.1e-5, D -0.47
- Use of non renewable primary energy as energy carrier (PENRE) [MJ]: A1-A3 8, A4 0.39, A5 0.24, C1 0, C2 0.0043, C3 0.0037, C4 0.0022, D -1.4
- Use of non renewable primary energy resources used as raw materials (PENRM) [MJ]: A1-A3 0, A4 0, A5 0, C1 0, C2 0, C3 0, C4 0, D 0
- Total use of non renewable primary energy resource (PENRT) [MJ]: A1-A3 8, A4 0.39, A5 0.24, C1 0, C2 0.0043, C3 0.0037, C4 0.0022, D -1.4
- Use of secondary material (SM) [kg]: A1-A3 0, A4 0, A5 0, C1 0, C2 0, C3 0, C4 0, D 0
- Use of renewable secondary fuels (RSF) [MJ]: A1-A3 0, A4 0, A5 0, C1 0, C2 0, C3 0, C4 0, D 0
- Use of non renewable secondary fuels (NRSF) [MJ]: A1-A3 0, A4 0, A5 0, C1 0, C2 0, C3 0, C4 0, D 0
- Net use of fresh water (FW) [m3]: A1-A3 4e-5, A4 0, A5 0, C1 0, C2 0, C3 0, C4 0, D 0

## Outputs
- Hazardous waste disposed (HWD) [kg]: A1-A3 0.00019, A4 0, A5 0, B1 ND, B2 0, B3 ND, B4 ND, B5 ND, B6 0, B7 0, C1 0, C2 0, C3 0, C4 0, D 0
- Non harzardous waste disposed (NHWD) [kg]: A1-A3 0.002, A4 0, A5 0.00072, B1 ND, B2 0, B3 ND, B4 ND, B5 ND, B6 0, B7 0, C1 0, C2 0, C3 0, C4 0, D 0
- Radioactive waste disposed (RWD) [kg]: A1-A3 0, A4 0, A5 0, B1 ND, B2 0, B3 ND, B4 ND, B5 ND, B6 0, B7 0, C1 0, C2 0, C3 0, C4 0, D 0
- Components for re-use (CRU) [kg]: A1-A3 0, A4 0, A5 0, B1 ND, B2 0, B3 ND, B4 ND, B5 ND, B6 0, B7 0, C1 0, C2 0, C3 0, C4 0.0013, D 0
- Materials for recycling (MFR) [kg]: A1-A3 0, A4 0, A5 0.0018, B1 ND, B2 0, B3 ND, B4 ND, B5 ND, B6 0, B7 0, C1 0, C2 0, C3 0, C4 0.029, D 0
- Materials for energy recovery (MER) [kg]: A1-A3 0, A4 0, A5 0, B1 ND, B2 0, B3 ND, B4 ND, B5 ND, B6 0, B7 0, C1 0, C2 0, C3 0, C4 0, D 0
- Exported electrical energy (EEE) [MJ]: A1-A3 0, A4 0, A5 0, B1 ND, B2 0, B3 ND, B4 ND, B5 ND, B6 0, B7 0, C1 0, C2 0, C3 0, C4 0.011, D 0
- Exported thermal energy (EET) [MJ]: A1-A3 0, A4 0, A5 0, B1 ND, B2 0, B3 ND, B4 ND, B5 ND, B6 0, B7 0, C1 0, C2 0, C3 0, C4 0.011, D 0

## Impact indicators
- Global Warming Potential - fossil fuels (GWP-fossil) [kg CO2 eq.]: A1-A3 0.55, A4 0.025, A5 0.017, C1 0, C2 0.00027, C3 0.0067, C4 0.00059, D -0.1
- Global Warming Potential - biogenic (GWP-biogenic) [kg CO2 eq.]: A1-A3 0.0047, A4 4.6e-5, A5 0.0052, C1 0, C2 7.3e-7, C3 0.0067, C4 0.0058, D -0.0014
- Global Warming Potential - land use and land use change (GWP-luluc) [kg CO2 eq.]: A1-A3 0.0012, A4 0.00013, A5 2.2e-5, C1 0, C2 1.9e-6, C3 8.7e-7, C4 1.8e-7, D -0.00017
- Global Warming Potential - total (GWP-total) [kg CO2 eq.]: A1-A3 0.55, A4 0.025, A5 0.023, C1 0, C2 0.00027, C3 0.013, C4 0.0064, D -0.11
- Depletion potential of the stratospheric ozone layer (ODP) [kg CFC-11 eq.]: A1-A3 1.3e-7, A4 5.3e-9, A5 8.1e-10, C1 0, C2 5.7e-11, C3 4.4e-11, C4 2.1e-11, D -6.4e-9
- Acidifcation potential, Accumulated Exceedance (AP) [mol H+ eq.]: A1-A3 0.0033, A4 0.00035, A5 0.0008, C1 0, C2 1.5e-6, C3 6e-6, C4 1.3e-6, D -0.00048
- Europhication potential - freshwater (EP-freshwater) [kg P eq.]: A1-A3 0.00027, A4 1.7e-6, A5 6.2e-5, C1 0, C2 2.2e-8, C3 3.2e-7, C4 1.9e-6, D -4.7e-5
- Europhication potential - marine (EP-marine) [kg N eq.]: A1-A3 0.0007, A4 9.8e-5, A5 4.2e-5, C1 0, C2 5.3e-7, C3 7.6e-6, C4 4.5e-6, D -9.6e-5
- Europhication potential - terrestrial (EP-terrestrial) [mol N eq.]: A1-A3 0.0063, A4 0.0011, A5 0.00057, C1 0, C2 5.7e-6, C3 3.2e-5, C4 4e-6, D -0.00096
- Photochemical Ozone Creation Potential (POCP) [kg NMVOC eq.]: A1-A3 0.0027, A4 0.00029, A5 0.00016, C1 0, C2 1.6e-6, C3 1.4e-5, C4 2.8e-6, D -0.00027
- Abiotic depletion potential - non-fossil resources (ADPE) [kg Sb eq.]: A1-A3 4.4e-5, A4 7e-8, A5 1.9e-5, C1 0, C2 9.1e-10, C3 -1.3e-9, C4 8.7e-10, D -2e-7
- Abiotic depletion potential - fossil resources (ADPF) [MJ]: A1-A3 7.4, A4 0.36, A5 0.23, C1 0, C2 0.004, C3 0.0034, C4 0.0021, D -1.3
- Water (user) deprivation potential (WDP) [m3 world eq. deprived]: A1-A3 1.1, A4 0.0012, A5 0.017, C1 0, C2 1.6e-5, C3 0.00034, C4 3.7e-5, D -0.23
- Global Warming Potential (GWP-GHG) [kg CO2 eq.]: A1-A3 0.54, A4 0.025, A5 0.017, C1 0, C2 0.00027, C3 0.0066, C4 0.0049, D -0.1
- Particulate Matter emissions (PM) [Disease incidence]: A1-A3 ND, A4 ND, A5 ND, B1 ND, B2 ND, B3 ND, B4 ND, B5 ND, B6 ND, B7 ND, C1 ND, C2 ND, C3 ND, C4 ND, D ND
- Ionizing radiation, human health (IRP) [kBq U235 eq.]: A1-A3 ND, A4 ND, A5 ND, B1 ND, B2 ND, B3 ND, B4 ND, B5 ND, B6 ND, B7 ND, C1 ND, C2 ND, C3 ND, C4 ND, D ND
- Eco-toxicity - freshwater (ETP-fw) [CTUe]: A1-A3 ND, A4 ND, A5 ND, B1 ND, B2 ND, B3 ND, B4 ND, B5 ND, B6 ND, B7 ND, C1 ND, C2 ND, C3 ND, C4 ND, D ND
- Human toxicity, cancer effect (HTP-c) [CTUh]: A1-A3 ND, A4 ND, A5 ND, B1 ND, B2 ND, B3 ND, B4 ND, B5 ND, B6 ND, B7 ND, C1 ND, C2 ND, C3 ND, C4 ND, D ND
- Human toxicity, non-cancer effects (HTP-nc) [CTUh]: A1-A3 ND, A4 ND, A5 ND, B1 ND, B2 ND, B3 ND, B4 ND, B5 ND, B6 ND, B7 ND, C1 ND, C2 ND, C3 ND, C4 ND, D ND
- Land use related impacts/Soil quality (SQP) [dimensionless]: A1-A3 ND, A4 ND, A5 ND, B1 ND, B2 ND, B3 ND, B4 ND, B5 ND, B6 ND, B7 ND, C1 ND, C2 ND, C3 ND, C4 ND, D ND

## Use advice
Disclaimer: The results of this ILCD type III environmental impact indicators shall be used with care as the uncertainties of these results are high or as there is limited experience with the indicator

## Data sources
- ecoinvent database (general)
- ecoinvent 3.8 database
