# Tongwei TWMNF-66HD (TNC-G12-66 Half Cell Bifacial Module) (photovoltaic module)

Dataset: ILCD process, EPD, average dataset
Geography: CN
Reference year: 2024
Valid until: 2029
Classification: OEKOBAU.DAT: Gebäudetechnik / Elektro
Generated by: Kiwa GmbH (Berlin)
Registration number: EPD-Kiwa-EE-000419-EN
Owner: Tongwei Co., Ltd.
Compliance: EN 15804+A2 (EF 3.1); ISO 14025
Review: Independent external review by Elisabet Amat - Greenize Projects S.L.U.
Amounts: rows without a unit in brackets have none in this file; such an amount is in the reference unit of its flow, which a separate flow dataset defines
copyright: true
licenseType: Free of charge for all users and uses
accessRestrictions: None.

## General comment
This EPD is based on the life cycle assessment of the photovoltaic module TWMNF-66HD which is produced and distributed by Tongwei Co., Ltd., located in Hefei City (P. R. China). The EPD refers to the specific product.

EPD type: Cradle to Grave + Module D

Kiwa-Ecobility Experts assumes no liability for manufacturer's information, LCA data and evidence.

Functional unit:
1 Wp of manufactured photovoltaic module, from cradle-to-grave, with activities needed for a study period for a defined reference ser-vice life (≥80% of the labelled power output).
Note: The EPD results have been calculated for the declared / functional unit of m^2 and Wp. The results displayed in this dataset refer to the declared unit of m^2. The m^2 results can be converted into the Wp functional unit with a conversion factor (1/233.39) or can be seen in the EPD document.

## Geography
The product is produced and manufactured in Hefei City, Anhui Province, P. R. China and the main mar-ket areas are China, the European Union, the Middle East, Latin America, etc.
The geographical reference area is China and Europe.

## Time period
The production data have been collected for the year 2024 (01/01/2024 – 31/07/2024) and are there-fore up-to-date.

## Technology and included processes
TWMNF-66HD is part of Tongwei G12-TNC series of photovoltaic module products, which adopts the new efficient N-type TNC cell independently developed by Tongwei for module packaging. And inte-grate the industry's leading multi-main gate design to reduce hidden crack loss, non-destructive slicing technology cutting surface smooth and flat, high-density packaging technology to improve the "screen ratio" of components to ensure the perfect balance of efficiency and reliability, the use of optical gap film technology to improve the power of components and other technologies. The product has the industry-leading characteristics of high power, high efficiency, high double-sided rate, high power gen-eration, high yield, etc. According to the calculation of 10 typical projects in the world, G12-TNC has advantages in BOS cost and LCOE compared with G12-TPC, bringing better return on investment for customers. In addition, Tongwei module size is consistent with the mainstream of the industry, compat-ible with various types of photovoltaic brackets, and can provide a variety of installation options.
TWMNF-66HD has a power output range from 700 W to 725 W and a weight of 37.9 kg. 725 W is cho-sen as the representative product power output. The manufacturing site is located in No.888, Changning Road, High-tech District, Hefei City, Anhui Prov-ince, 230088, P.R. China.

## Technical purpose
Tongwei solar PV modules are widely used in various "PV+" applications, such as industrial, commercial distributed, and large-scale centralized power stations, to meet the growing global demand for clean energy.

## Scenarios
- Standard scenario: Transport to manufacturer (A2): It was assumed that all transportation from suppliers is carried out using trucks. The environmental profile used for this purpose is "T0001 - Lorry (Truck), unspecified (default) | market group for (GLO)." Production process (A3) | Production waste: The production waste data was based on the data sheets provided by the manufacturer. It is assumed that the waste scenarios for both production waste and end-of-life waste are similar. Production process (A3) | Energy consumption: The energy consumption data was sourced from the manufacturer based on the onsite production data. Since the production takes place in China, the electricity grid mix for China is applied, using the environmental profile "Electricity, medium voltage {CN} | market group for | Cut-off, U."

## Reference product
- Tongwei TWMNF-66HD: 1

## Inputs
- Use of net fresh water (FW) [m3]: A1 (Standard scenario) 2.52, A2 (Standard scenario) 0.000556, A3 (Standard scenario) 0.0227, A4 (Standard scenario) 0.00679, A5 (Standard scenario) 0.000811, B2 (Standard scenario) 0.0276, C1 (Standard scenario) 0.000588, C2 (Standard scenario) 0.000196, C3 (Standard scenario) 0.00389, C4 (Standard scenario) 0.000321, D (Standard scenario) -0.15
- Use of non renewable primary energy (PENRE) [MJ]: A1 (Standard scenario) 1250, A2 (Standard scenario) 4.85, A3 (Standard scenario) 16.7, A4 (Standard scenario) 82, A5 (Standard scenario) 12, B2 (Standard scenario) 2.37, C1 (Standard scenario) 11.7, C2 (Standard scenario) 1.7, C3 (Standard scenario) 6.06, C4 (Standard scenario) 0.352, D (Standard scenario) -241
- Use of non renewable primary energy resources used as raw materials (PENRM) [MJ]: A1 (Standard scenario) 36.4, A2 (Standard scenario) 0, A3 (Standard scenario) 0.128, A4 (Standard scenario) 0, A5 (Standard scenario) 0, B2 (Standard scenario) 0, C1 (Standard scenario) 0, C2 (Standard scenario) 0, C3 (Standard scenario) 0, C4 (Standard scenario) 0, D (Standard scenario) 0
- Use of non renewable secondary fuels (NRSF) [MJ]: A1 (Standard scenario) 0, A2 (Standard scenario) 0, A3 (Standard scenario) 0, A4 (Standard scenario) 0, A5 (Standard scenario) 0, B2 (Standard scenario) 0, C1 (Standard scenario) 0, C2 (Standard scenario) 0, C3 (Standard scenario) 0, C4 (Standard scenario) 0, D (Standard scenario) 0
- Use of renewable primary energy (PERE) [MJ]: A1 (Standard scenario) 188, A2 (Standard scenario) 0.0572, A3 (Standard scenario) 9.53, A4 (Standard scenario) 0.73, A5 (Standard scenario) 0.0939, B2 (Standard scenario) 3.63, C1 (Standard scenario) 0.0875, C2 (Standard scenario) 0.0201, C3 (Standard scenario) 0.592, C4 (Standard scenario) 0.00885, D (Standard scenario) -38.1
- Use of renewable primary energy resources used as raw materials (PERM) [MJ]: A1 (Standard scenario) 0, A2 (Standard scenario) 0, A3 (Standard scenario) 6.98, A4 (Standard scenario) 0, A5 (Standard scenario) 0, B2 (Standard scenario) 0, C1 (Standard scenario) 0, C2 (Standard scenario) 0, C3 (Standard scenario) 0, C4 (Standard scenario) 0, D (Standard scenario) 0
- Use of renewable secondary fuels (RSF) [MJ]: A1 (Standard scenario) 0, A2 (Standard scenario) 0, A3 (Standard scenario) 0, A4 (Standard scenario) 0, A5 (Standard scenario) 0, B2 (Standard scenario) 0, C1 (Standard scenario) 0, C2 (Standard scenario) 0, C3 (Standard scenario) 0, C4 (Standard scenario) 0, D (Standard scenario) 0
- Use of secondary material (SM) [kg]: A1 (Standard scenario) 0, A2 (Standard scenario) 0, A3 (Standard scenario) 0, A4 (Standard scenario) 0, A5 (Standard scenario) 0, B2 (Standard scenario) 0, C1 (Standard scenario) 0, C2 (Standard scenario) 0, C3 (Standard scenario) 0, C4 (Standard scenario) 0, D (Standard scenario) 0
- Total use of non renewable primary energy resource (PENRT) [MJ]: A1 (Standard scenario) 1280, A2 (Standard scenario) 4.85, A3 (Standard scenario) 16.9, A4 (Standard scenario) 82, A5 (Standard scenario) 12, B2 (Standard scenario) 2.37, C1 (Standard scenario) 11.7, C2 (Standard scenario) 1.7, C3 (Standard scenario) 6.07, C4 (Standard scenario) 0.352, D (Standard scenario) -241
- Total use of renewable primary energy resources (PERT) [MJ]: A1 (Standard scenario) 188, A2 (Standard scenario) 0.0572, A3 (Standard scenario) 16.5, A4 (Standard scenario) 0.73, A5 (Standard scenario) 0.0939, B2 (Standard scenario) 3.63, C1 (Standard scenario) 0.0875, C2 (Standard scenario) 0.0201, C3 (Standard scenario) 0.592, C4 (Standard scenario) 0.00886, D (Standard scenario) -38.1

## Outputs
- Components for re-use (CRU) [kg]: A1 (Standard scenario) 0, A2 (Standard scenario) 0, A3 (Standard scenario) 0, A4 (Standard scenario) 0, A5 (Standard scenario) 0, B2 (Standard scenario) 0, C1 (Standard scenario) 0, C2 (Standard scenario) 0, C3 (Standard scenario) 0, C4 (Standard scenario) 0, D (Standard scenario) 0
- Exported electrical energy (EEE) [MJ]: A1 (Standard scenario) 0, A2 (Standard scenario) 0, A3 (Standard scenario) -0.0225, A4 (Standard scenario) 0, A5 (Standard scenario) 0, B2 (Standard scenario) 0, C1 (Standard scenario) 0, C2 (Standard scenario) 0, C3 (Standard scenario) 0, C4 (Standard scenario) 0, D (Standard scenario) -7.22
- Exported thermal energy (EET) [MJ]: A1 (Standard scenario) 0, A2 (Standard scenario) 0, A3 (Standard scenario) -0.0388, A4 (Standard scenario) 0, A5 (Standard scenario) 0, B2 (Standard scenario) 0, C1 (Standard scenario) 0, C2 (Standard scenario) 0, C3 (Standard scenario) 0, C4 (Standard scenario) 0, D (Standard scenario) -12.4
- Hazardous waste disposed (HWD) [kg]: A1 (Standard scenario) 0.0414, A2 (Standard scenario) 1.16e-5, A3 (Standard scenario) 0.000225, A4 (Standard scenario) 0.000152, A5 (Standard scenario) 3.22e-5, B2 (Standard scenario) 4.2e-6, C1 (Standard scenario) 3.16e-5, C2 (Standard scenario) 4.07e-6, C3 (Standard scenario) 0.00613, C4 (Standard scenario) 3.57e-7, D (Standard scenario) 0.00744
- Materials for energy recovery (MER) [kg]: A1 (Standard scenario) 0, A2 (Standard scenario) 0, A3 (Standard scenario) 0, A4 (Standard scenario) 0, A5 (Standard scenario) 0, B2 (Standard scenario) 0, C1 (Standard scenario) 0, C2 (Standard scenario) 0, C3 (Standard scenario) 0, C4 (Standard scenario) 0, D (Standard scenario) 0
- Materials for recycling (MFR) [kg]: A1 (Standard scenario) 0, A2 (Standard scenario) 0, A3 (Standard scenario) 0.000467, A4 (Standard scenario) 0, A5 (Standard scenario) 0.108, B2 (Standard scenario) 0, C1 (Standard scenario) 0, C2 (Standard scenario) 0, C3 (Standard scenario) 1.02, C4 (Standard scenario) 0, D (Standard scenario) 0
- Non hazardous waste dispose (NHWD) [kg]: A1 (Standard scenario) 10.9, A2 (Standard scenario) 0.29, A3 (Standard scenario) 0.172, A4 (Standard scenario) 2.3, A5 (Standard scenario) 0.0631, B2 (Standard scenario) 0.0467, C1 (Standard scenario) 0.0131, C2 (Standard scenario) 0.102, C3 (Standard scenario) 0.534, C4 (Standard scenario) 1.63, D (Standard scenario) -3.67
- Radioactive waste disposed (RWD) [kg]: A1 (Standard scenario) 0.0031, A2 (Standard scenario) 3e-5, A3 (Standard scenario) 2.85e-5, A4 (Standard scenario) 0.000519, A5 (Standard scenario) 7.92e-5, B2 (Standard scenario) 5.74e-6, C1 (Standard scenario) 7.78e-5, C2 (Standard scenario) 1.05e-5, C3 (Standard scenario) 2.67e-5, C4 (Standard scenario) 1.98e-6, D (Standard scenario) -0.000404

## Impact indicators
- Abiotic depletion potential - non-fossil resources (ADPE) [kg Sb-Äqv.]: A1 (Standard scenario) 0.0105, A2 (Standard scenario) 7.67e-6, A3 (Standard scenario) 0.000227, A4 (Standard scenario) 0.000102, A5 (Standard scenario) 4.84e-6, B2 (Standard scenario) 1.22e-5, C1 (Standard scenario) 4.44e-6, C2 (Standard scenario) 2.7e-6, C3 (Standard scenario) 1.15e-5, C4 (Standard scenario) 1.23e-6, D (Standard scenario) 0.00328
- Abiotic depletion potential - fossil resources (ADPF) [MJ]: A1 (Standard scenario) 1200, A2 (Standard scenario) 4.57, A3 (Standard scenario) 15.9, A4 (Standard scenario) 77.3, A5 (Standard scenario) 11.3, B2 (Standard scenario) 1.88, C1 (Standard scenario) 11.1, C2 (Standard scenario) 1.61, C3 (Standard scenario) 5.71, C4 (Standard scenario) 0.332, D (Standard scenario) -226
- Acidification potential, Accumulated Exceedance (AP) [mol H+ eqv.]: A1 (Standard scenario) 0.607, A2 (Standard scenario) 0.00176, A3 (Standard scenario) 0.00959, A4 (Standard scenario) 0.0896, A5 (Standard scenario) 0.0116, B2 (Standard scenario) 0.00241, C1 (Standard scenario) 0.0114, C2 (Standard scenario) 0.000617, C3 (Standard scenario) 0.00284, C4 (Standard scenario) 0.000128, D (Standard scenario) -0.14
- Eutrophication potential - freshwater (EP-freshwater) [kg P eqv.]: A1 (Standard scenario) 0.00595, A2 (Standard scenario) 3.05e-6, A3 (Standard scenario) 6.88e-5, A4 (Standard scenario) 3.93e-5, A5 (Standard scenario) 3.79e-6, B2 (Standard scenario) 2.33e-5, C1 (Standard scenario) 3.52e-6, C2 (Standard scenario) 1.07e-6, C3 (Standard scenario) 2.16e-5, C4 (Standard scenario) 3.4e-7, D (Standard scenario) -0.000797
- Eutrophication potential - marine (EP-marine) [kg N eqv.]: A1 (Standard scenario) 0.103, A2 (Standard scenario) 0.000619, A3 (Standard scenario) 0.00171, A4 (Standard scenario) 0.0226, A5 (Standard scenario) 0.00509, B2 (Standard scenario) 0.00238, C1 (Standard scenario) 0.00501, C2 (Standard scenario) 0.000217, C3 (Standard scenario) 0.000597, C4 (Standard scenario) 4.2e-5, D (Standard scenario) -0.0209
- Eutrophication potential - terrestrial (EP-terrestrial) [mol N eqv.]: A1 (Standard scenario) 1.11, A2 (Standard scenario) 0.00682, A3 (Standard scenario) 0.019, A4 (Standard scenario) 0.251, A5 (Standard scenario) 0.0558, B2 (Standard scenario) 0.0087, C1 (Standard scenario) 0.0549, C2 (Standard scenario) 0.0024, C3 (Standard scenario) 0.00649, C4 (Standard scenario) 0.000465, D (Standard scenario) -0.246
- Global Warming Potential - total (GWP-total) [kg CO2-Äqv.]: A1 (Standard scenario) 95.5, A2 (Standard scenario) 0.303, A3 (Standard scenario) 0.633, A4 (Standard scenario) 5.56, A5 (Standard scenario) 1.67, B2 (Standard scenario) 0.0196, C1 (Standard scenario) 0.823, C2 (Standard scenario) 0.107, C3 (Standard scenario) 2.9, C4 (Standard scenario) 0.0256, D (Standard scenario) -22.8
- Global Warming Potential - fossil fuels (GWP-fossil) [kg CO2-Äqv.]: A1 (Standard scenario) 94.9, A2 (Standard scenario) 0.303, A3 (Standard scenario) 1.47, A4 (Standard scenario) 5.55, A5 (Standard scenario) 0.84, B2 (Standard scenario) 0.177, C1 (Standard scenario) 0.822, C2 (Standard scenario) 0.106, C3 (Standard scenario) 2.83, C4 (Standard scenario) 0.0253, D (Standard scenario) -22.6
- Global Warming Potential - biogenic (GWP-biogenic) [kg CO2-Äqv.]: A1 (Standard scenario) 0.521, A2 (Standard scenario) 0.00014, A3 (Standard scenario) -0.837, A4 (Standard scenario) 0.000523, A5 (Standard scenario) 0.832, B2 (Standard scenario) -0.412, C1 (Standard scenario) 0.000833, C2 (Standard scenario) 4.91e-5, C3 (Standard scenario) 0.0713, C4 (Standard scenario) 0.000218, D (Standard scenario) -0.0959
- Global Warming Potential - land use and land use change (GWP-luluc) [kg CO2-Äqv.]: A1 (Standard scenario) 0.138, A2 (Standard scenario) 0.000111, A3 (Standard scenario) 0.00134, A4 (Standard scenario) 0.00277, A5 (Standard scenario) 0.000133, B2 (Standard scenario) 0.254, C1 (Standard scenario) 0.000126, C2 (Standard scenario) 3.9e-5, C3 (Standard scenario) 0.000455, C4 (Standard scenario) 7.89e-6, D (Standard scenario) -0.0689
- Depletion potential of the stratospheric ozone layer (ODP) [kg CFC 11-Äquiv.]: A1 (Standard scenario) 9.21e-6, A2 (Standard scenario) 6.68e-8, A3 (Standard scenario) 6.88e-8, A4 (Standard scenario) 1.17e-6, A5 (Standard scenario) 1.78e-7, B2 (Standard scenario) 2.93e-8, C1 (Standard scenario) 1.74e-7, C2 (Standard scenario) 2.35e-8, C3 (Standard scenario) 4.13e-8, C4 (Standard scenario) 4.31e-9, D (Standard scenario) -1.02e-6
- Photochemical Ozone Creation Potential (POCP) [kg NMVOC eqv.]: A1 (Standard scenario) 0.361, A2 (Standard scenario) 0.00195, A3 (Standard scenario) 0.00882, A4 (Standard scenario) 0.067, A5 (Standard scenario) 0.0146, B2 (Standard scenario) 0.00114, C1 (Standard scenario) 0.0144, C2 (Standard scenario) 0.000685, C3 (Standard scenario) 0.00195, C4 (Standard scenario) 0.000129, D (Standard scenario) -0.0695
- Water (user) deprivation potential (WDP) [m3 world eqv.]: A1 (Standard scenario) 72.9, A2 (Standard scenario) 0.0163, A3 (Standard scenario) 0.783, A4 (Standard scenario) 0.197, A5 (Standard scenario) 0.0143, B2 (Standard scenario) 0.69, C1 (Standard scenario) 0.0117, C2 (Standard scenario) 0.00574, C3 (Standard scenario) 0.0807, C4 (Standard scenario) 0.00326, D (Standard scenario) -2.73
- Potential incidence of disease due to PM emissions (PM) [disease incidence]: A1 (Standard scenario) 5.65e-6, A2 (Standard scenario) 2.72e-8, A3 (Standard scenario) 1.08e-7, A4 (Standard scenario) 2.93e-7, A5 (Standard scenario) 1.85e-8, B2 (Standard scenario) 3.48e-8, C1 (Standard scenario) 1.63e-8, C2 (Standard scenario) 9.57e-9, C3 (Standard scenario) 3.2e-8, C4 (Standard scenario) 1.94e-9, D (Standard scenario) -1.5e-6
- Potential Human exposure efficiency relative to U235 (IRP) [kBq U235 eqv.]: A1 (Standard scenario) 3.72, A2 (Standard scenario) 0.0191, A3 (Standard scenario) 0.0315, A4 (Standard scenario) 0.325, A5 (Standard scenario) 0.0493, B2 (Standard scenario) 0.00555, C1 (Standard scenario) 0.0484, C2 (Standard scenario) 0.00673, C3 (Standard scenario) 0.0269, C4 (Standard scenario) 0.00133, D (Standard scenario) -0.398
- Potential Comparative Toxic Unit for ecosystems (ETP-fw) [CTUe]: A1 (Standard scenario) 3190, A2 (Standard scenario) 4.07, A3 (Standard scenario) 58.2, A4 (Standard scenario) 60.9, A5 (Standard scenario) 7.56, B2 (Standard scenario) 21.8, C1 (Standard scenario) 7.18, C2 (Standard scenario) 1.43, C3 (Standard scenario) 42.4, C4 (Standard scenario) 18.8, D (Standard scenario) -564
- Potential Comparative Toxic Unit for humans - cancer effects (HTP-c) [CTUh]: A1 (Standard scenario) 6.27e-8, A2 (Standard scenario) 1.32e-10, A3 (Standard scenario) 1.21e-9, A4 (Standard scenario) 2.4e-9, A5 (Standard scenario) 2.41e-10, B2 (Standard scenario) 6.09e-10, C1 (Standard scenario) 1.27e-10, C2 (Standard scenario) 4.64e-11, C3 (Standard scenario) 3.34e-9, C4 (Standard scenario) 2e-11, D (Standard scenario) -3.08e-8
- Potential Comparative Toxic Unit for humans - non-cancer effects (HTP-nc) [CTUh]: A1 (Standard scenario) 3.22e-6, A2 (Standard scenario) 4.45e-9, A3 (Standard scenario) 4.81e-8, A4 (Standard scenario) 5.72e-8, A5 (Standard scenario) 1.06e-8, B2 (Standard scenario) 1.48e-8, C1 (Standard scenario) 1.01e-8, C2 (Standard scenario) 1.57e-9, C3 (Standard scenario) 2.33e-8, C4 (Standard scenario) 7.74e-10, D (Standard scenario) -6.38e-7
- Potential Soil quality index (SQP) [dimensionless]: A1 (Standard scenario) 313, A2 (Standard scenario) 3.96, A3 (Standard scenario) 105, A4 (Standard scenario) 36, A5 (Standard scenario) 1.6, B2 (Standard scenario) 19, C1 (Standard scenario) 1.43, C2 (Standard scenario) 1.39, C3 (Standard scenario) 3.94, C4 (Standard scenario) 0.631, D (Standard scenario) -96.3

## Review details
Independent verification of the declaration and data, according to EN ISO 14025:2010.

## Data sources
- ecoinvent 3.6 database
- ecoinvent database (general)
