# TOPCon Bifacial Solar Module

Dataset: ILCD process, EPD, specific dataset
Geography: GLO
Reference year: 2025
Valid until: 2030
Classification: The International EPD System: Construction products, Infrastructure & buildings
Method details: Construction products (EN 15804A2)
Generated by: , Jjyotsana@sphera.com
Registration number: EPD-IES-0023773:002
Owner: ReNew Private Limited
Compliance: EN 15804+A2 (EF 3.1); ISO 14025
Review: Independent external review by Sunil Kumar CS
Amounts: rows without a unit in brackets have none in this file; such an amount is in the reference unit of its flow, which a separate flow dataset defines
copyright: true
licenseType: Free of charge for all users and uses
accessRestrictions: Your use of this material is subject to the General Terms of Use published on by EPD International AB:s homepage at https://www.environdec.com/contact/General-terms-of-use/. If you have not accepted EPD International AB:s the General Terms of Use, you are not authorized to exploit this work in any manner.

## Technology and included processes
The declared products is M10, 144 Cells TOPCon Bifacial Solar Module.The Topcon Product has specification such as up to 80% bifaciality factor, N-type Topcon, Power Generation – Green Energy, 30 Years service life. TOPCon technology (Tunnel Oxide Passivated Contact) enhances efficiency by reducing recombination losses and improving energy output

## Technical purpose
The M10, 144 Cells TOPCon Bifacial Solar Module is used for electricity generation

## Reference product
- 1 Wp- M10, 144 Cells TOPCon Bifacial Solar Module: 1

## Inputs
- Use of renewable primary energy as energy carrier (PERE) [MJ]: A1-A3 0.938, A4 0.000183, A5 0.062, B1 0, B2 1.28e-10, B3 0, B4 0, B5 0, B6 0, B7 0, C1 0, C2 1.17e-5, C3 0, C4 0.00594, D -0.323
- Use of renewable primary energy resources used as raw materials (PERM) [MJ]: A1-A3 0.0497, A4 0, A5 -0.0497, B1 0, B2 0, B3 0, B4 0, B5 0, B6 0, B7 0, C1 0, C2 0, C3 0, C4 0, D 0
- Total use of renewable primary energy (PERT) [MJ]: A1-A3 0.988, A4 0.000183, A5 0.0123, B1 0, B2 1.28e-10, B3 0, B4 0, B5 0, B6 0, B7 0, C1 0, C2 1.17e-5, C3 0, C4 0.00594, D -0.323
- Use of non renewable primary energy as energy carrier (PENRE) [MJ]: A1-A3 4.15, A4 0.0669, A5 0.305, B1 0, B2 1.28e-10, B3 0, B4 0, B5 0, B6 0, B7 0, C1 0, C2 0.00427, C3 0, C4 0.0341, D -0.918
- Use of non renewable primary energy resources used as raw materials (PENRM) [MJ]: A1-A3 0.0114, A4 0, A5 -0.0114, B1 0, B2 6.15e-8, B3 0, B4 0, B5 0, B6 0, B7 0, C1 0, C2 0, C3 0, C4 0, D 0
- Total use of non renewable primary energy resource (PENRT) [MJ]: A1-A3 4.16, A4 0.0669, A5 0.294, B1 0, B2 0, B3 0, B4 0, B5 0, B6 0, B7 0, C1 0, C2 0.00427, C3 0, C4 0.0341, D -0.918
- Use of secondary material (SM) [kg]: A1-A3 0, A4 0, A5 0, B1 0, B2 6.15e-8, B3 0, B4 0, B5 0, B6 0, B7 0, C1 0, C2 0, C3 0, C4 0, D 0
- Use of renewable secondary fuels (RSF) [MJ]: A1-A3 0, A4 0, A5 0, B1 0, B2 0, B3 0, B4 0, B5 0, B6 0, B7 0, C1 0, C2 0, C3 0, C4 0, D 0
- Use of non renewable secondary fuels (NRSF) [MJ]: A1-A3 0, A4 0, A5 0, B1 0, B2 0, B3 0, B4 0, B5 0, B6 0, B7 0, C1 0, C2 0, C3 0, C4 0, D 0
- Net use of fresh water (FW) [m3]: A1-A3 0.00179, A4 3.53e-7, A5 0.000182, B1 0, B2 0, B3 0, B4 0, B5 0, B6 0, B7 0, C1 0, C2 2.25e-8, C3 0, C4 9e-6, D -0.000325

## Outputs
- Hazardous waste disposed (HWD) [kg]: A1-A3 1.47e-8, A4 1.01e-12, A5 -9.86e-10, B1 0, B2 8.64e-19, B3 0, B4 0, B5 0, B6 0, B7 0, C1 0, C2 6.41e-14, C3 0, C4 8.49e-12, D -2e-10
- Non harzardous waste disposed (NHWD) [kg]: A1-A3 0.0299, A4 1.18e-6, A5 0.0127, B1 0, B2 1.39e-12, B3 0, B4 0, B5 0, B6 0, B7 0, C1 0, C2 7.52e-8, C3 0, C4 0.172, D -0.0237
- Radioactive waste disposed (RWD) [kg]: A1-A3 7.53e-5, A4 1.38e-8, A5 8.03e-9, B1 0, B2 1.06e-14, B3 0, B4 0, B5 0, B6 0, B7 0, C1 0, C2 8.81e-10, C3 0, C4 3.58e-7, D -3.15e-5
- Components for re-use (CRU) [kg]: A1-A3 0, A4 0, A5 0, B1 0, B2 0, B3 0, B4 0, B5 0, B6 0, B7 0, C1 0, C2 0, C3 0, C4 0, D 0
- Materials for recycling (MFR) [kg]: A1-A3 0, A4 0, A5 0, B1 0, B2 0, B3 0, B4 0, B5 0, B6 0, B7 0, C1 0, C2 0, C3 0, C4 0, D 0
- Materials for energy recovery (MER) [kg]: A1-A3 0, A4 0, A5 0, B1 0, B2 0, B3 0, B4 0, B5 0, B6 0, B7 0, C1 0, C2 0, C3 0, C4 0, D 0
- Exported electrical energy (EEE) [MJ]: A1-A3 0, A4 0, A5 0, B1 0, B2 0, B3 0, B4 0, B5 0, B6 0, B7 0, C1 0, C2 0, C3 0, C4 0, D 0
- Exported thermal energy (EET) [MJ]: A1-A3 0, A4 0, A5 0, B1 0, B2 0, B3 0, B4 0, B5 0, B6 0, B7 0, C1 0, C2 0, C3 0, C4 0, D 0

## Impact indicators
- Global Warming Potential - fossil fuels (GWP-fossil) [kg CO2 eq.]: A1-A3 0.332, A4 0.00513, A5 0.0902, B1 0, B2 2.49e-9, B3 0, B4 0, B5 0, B6 0, B7 0, C1 0, C2 0.000327, C3 0, C4 0.00258, D -0.0866
- Global Warming Potential - biogenic (GWP-biogenic) [kg CO2 eq.]: A1-A3 -0.00321, A4 3.37e-6, A5 0.00319, B1 0, B2 3.85e-13, B3 0, B4 0, B5 0, B6 0, B7 0, C1 0, C2 2.14e-7, C3 0, C4 1.77e-5, D -0.00028
- Global Warming Potential - land use and land use change (GWP-luluc) [kg CO2 eq.]: A1-A3 0.000298, A4 1.64e-7, A5 3.64e-6, B1 0, B2 1.32e-13, B3 0, B4 0, B5 0, B6 0, B7 0, C1 0, C2 1.04e-8, C3 0, C4 1.54e-5, D -2.86e-5
- Global Warming Potential - total (GWP-total) [kg CO2 eq.]: A1-A3 0.329, A4 0.00513, A5 0.0934, B1 0, B2 2.49e-9, B3 0, B4 0, B5 0, B6 0, B7 0, C1 0, C2 0.000327, C3 0, C4 0.00262, D -0.0869
- Depletion potential of the stratospheric ozone layer (ODP) [kg CFC-11 eq.]: A1-A3 1.32e-12, A4 2.56e-16, A5 2.47e-14, B1 0, B2 1.73e-22, B3 0, B4 0, B5 0, B6 0, B7 0, C1 0, C2 1.63e-17, C3 0, C4 6.96e-15, D -2e-13
- Acidifcation potential, Accumulated Exceedance (AP) [mol H+ eq.]: A1-A3 0.0024, A4 3e-5, A5 0.000686, B1 0, B2 6.32e-12, B3 0, B4 0, B5 0, B6 0, B7 0, C1 0, C2 1.92e-6, C3 0, C4 1.83e-5, D -0.000495
- Europhication potential - freshwater (EP-freshwater) [kg P eq.]: A1-A3 9.56e-7, A4 8.04e-10, A5 8.57e-9, B1 0, B2 4.43e-15, B3 0, B4 0, B5 0, B6 0, B7 0, C1 0, C2 5.12e-11, C3 0, C4 5.86e-9, D -6.54e-8
- Europhication potential - marine (EP-marine) [kg N eq.]: A1-A3 0.000348, A4 1.45e-5, A5 0.000345, B1 0, B2 1e-12, B3 0, B4 0, B5 0, B6 0, B7 0, C1 0, C2 9.27e-7, C3 0, C4 4.71e-6, D -8.85e-5
- Europhication potential - terrestrial (EP-terrestrial) [mol N eq.]: A1-A3 0.00385, A4 0.000159, A5 0.00377, B1 0, B2 1.12e-11, B3 0, B4 0, B5 0, B6 0, B7 0, C1 0, C2 1.02e-5, C3 0, C4 5.19e-5, D -0.00103
- Photochemical Ozone Creation Potential (POCP) [kg NMVOC eq.]: A1-A3 0.00108, A4 2.9e-5, A5 0.000934, B1 0, B2 5.4e-12, B3 0, B4 0, B5 0, B6 0, B7 0, C1 0, C2 1.86e-6, C3 0, C4 1.44e-5, D -0.00024
- Abiotic depletion potential - non-fossil resources (ADPE) [kg Sb eq.]: A1-A3 7.08e-6, A4 6.13e-11, A5 -6.89e-8, B1 0, B2 5.6e-17, B3 0, B4 0, B5 0, B6 0, B7 0, C1 0, C2 3.91e-12, C3 0, C4 1.68e-10, D -2.1e-6
- Abiotic depletion potential - fossil resources (ADPF) [MJ]: A1-A3 4.16, A4 0.0669, A5 0.294, B1 0, B2 6.15e-8, B3 0, B4 0, B5 0, B6 0, B7 0, C1 0, C2 0.00427, C3 0, C4 0.0341, D -0.918
- Water (user) deprivation potential (WDP) [m3 world eq. deprived]: A1-A3 0.0589, A4 1.09e-5, A5 0.00699, B1 0, B2 5.57e-11, B3 0, B4 0, B5 0, B6 0, B7 0, C1 0, C2 6.93e-7, C3 0, C4 0.000295, D -0.00891
- Global Warming Potential (GWP-GHG) [kg CO2 eq.]: A1-A3 0.331, A4 0.0051, A5 0.0905, B1 0, B2 2.46e-9, B3 0, B4 0, B5 0, B6 0, B7 0, C1 0, C2 0.000325, C3 0, C4 0.00258, D -0.0864
- Particulate Matter emissions (PM) [Disease incidence]: A1-A3 3.33e-8, A4 1.35e-10, A5 7.54e-9, B1 0, B2 0, B3 0, B4 0, B5 0, B6 0, B7 0, C1 0, C2 8.87e-12, C3 0, C4 2.3e-10, D -5.53e-9
- Ionizing radiation, human health (IRP) [kBq U235 eq.]: A1-A3 0.00834, A4 1.26e-6, A5 0.000371, B1 0, B2 0, B3 0, B4 0, B5 0, B6 0, B7 0, C1 0, C2 8.05e-8, C3 0, C4 4.14e-5, D -0.00428
- Eco-toxicity - freshwater (ETP-fw) [CTUe]: A1-A3 3.03, A4 0.0302, A5 0.0471, B1 0, B2 0, B3 0, B4 0, B5 0, B6 0, B7 0, C1 0, C2 0.00193, C3 0, C4 0.0196, D -1.17
- Human toxicity, cancer effect (HTP-c) [CTUh]: A1-A3 6.14e-10, A4 4.78e-13, A5 3.24e-11, B1 0, B2 0, B3 0, B4 0, B5 0, B6 0, B7 0, C1 0, C2 3.05e-14, C3 0, C4 4.63e-13, D -5.89e-11
- Human toxicity, non-cancer effects (HTP-nc) [CTUh]: A1-A3 3.63e-8, A4 1.01e-11, A5 1.86e-10, B1 0, B2 0, B3 0, B4 0, B5 0, B6 0, B7 0, C1 0, C2 6.46e-13, C3 0, C4 1.79e-11, D -7.8e-10
- Land use related impacts/Soil quality (SQP) [dimensionless]: A1-A3 1.56, A4 0.000158, A5 0.014, B1 0, B2 0, B3 0, B4 0, B5 0, B6 0, B7 0, C1 0, C2 1.01e-5, C3 0, C4 0.00934, D -0.412

## Use advice
The system boundary of the EPD follows the modularity approach defined by the EN 15804:2012+A2:2019. The type of EPD is cradle to gate with options, modulesB1-B7, C1–C4 and module D.

## Data sources
- GaBi database (general)
- Sphera MLC (fka GaBi) CUP 2024.02
