# Mono-crystalline photovoltaic module (Mono-crystalline Dual glass, N-Type, solar photovoltaic, modules) (Renesola Co., Ltd.)

Dataset: ILCD process, EPD, representative dataset
Geography: CN
Reference year: 2024
Valid until: 2030
Classification: OEKOBAU.DAT: Gebäudetechnik / Elektro
Generated by: Kiwa-Ecobility Experts, Kiwa GmbH (Berlin)
Registration number: EPD-Kiwa-EE-000423-EN
Owner: Renesola Co., Ltd.
Compliance: EN 15804+A2 (EF 3.1); ISO 14025
Review: Independent external review by Lucas Pedro Berman, Senda
Amounts: rows without a unit in brackets have none in this file; such an amount is in the reference unit of its flow, which a separate flow dataset defines
copyright: true
licenseType: Free of charge for all users and uses
accessRestrictions: None.

## General comment
This EPD is based on the life cycle assessment of the photovoltaic module which is produced and distributed by Renesola Haian Co., Ltd., located in No.66, Lifa Avenue, Haian Development Area (Chengdong Town) Nantong City, Jiangsu Province, P. R. China. The EPD refers to the representative product. EPD type: Cradle to Gate with options + Modules C and D Kiwa-Ecobility Experts assumes no liability for manufacturer's information, LCA data and evidence.
The displayed results within this dataset refer to 1 m^2 of manufactured module. However, the declared unit of the product is Wp. The indicator results for the declared unit can be found in the EPD document.

## Geography
The geographical reference area is China and Europe.

## Time period
The production data have been collected for the year 2024 (01/06/2023 – 31/05/2024) and are therefore up-to-date.

## Technology and included processes
Renesola solar PV modules are designed to convert light energy into electrical energy through the photovoltaic effect. These modules incorporate advanced TOPCon solar cells and utilize LECO techniques, non-destructive cutting methods, high-reliability junction box automatic welding, and dualglass encapsulation. These features contribute to high efficiency, improved bifaciality, a low temperature coefficient, enhanced performance under weak light conditions, and superior safety and reliability. The production process, carried out in Nantong City, China, involves assembling solar cells with EVA, glass, frames, and electrical connections to create the finished solar module. This EPD represents multiple modules with minor variations in size, number of cells, and power, as outlined in Table 1. The results are calculated based on a representative product model, ‘RS9-675 ~ 720 NBG-E1’, which features the highest power rating, mass, and material utilisation among all the modules. The variation in results between each module is less than 10%. The manufacturing site is located in No.66, Lifa Avenue, Haian Development Area (Chengdong Town) Nantong City, Jiangsu Province, P. R. China.
The manufacturing process includes the following steps: 1. Sorting of cells: Selecting and combining cells with the same or similar performance. 2. Series Welding: Serial welding of cells carried out with high-speed serial welding machine. 3. Laminated lay: Laying the cells string with glass, EVA, etc., adjusting the distance of the cell sheet, and preparing for lamination. 4. EL1: Detecting the internal defects of cells and modules. 5. Laminating: The air is pumped out of the modules and then heated to melt the EVA, bonding the cells, glass and substrate together; Finally cooling the modules out. 6. Mounting junction box: Attaching a junction box to the lead on the back of the modules to facilitate the connection between the modules and other devices or cells. 7. Mounting frame: adding Silicone filler between the frame and the glass to increase the strength of the modules and seal the modules. 8. Solidify: Coagulate the silica gel. 9. Production compliance test: Test its electrical performance, voltage resistance and grounding. 10. Clean out: Clean the surface of the modules. 11. EL2: Detecting internal defects in cells and modules. 12. Packaging: The completed photovoltaic modules are packaged and labelled with product specifications, technical parameters, factory engineering details, and application information.

## Technical purpose
Renesola solar PV modules are tailored to local conditions and flexibly arranged in ground power plants and distributed projects, suitable for various fields, including solar power stations, rooftop photovoltaic systems, industrial and commercial buildings, etc. In terms of industry, we use green power system for high energy consuming industries such as petrochemicals and smelting. In terms of architecture, we use BIPV system and household photovoltaic building system. In terms of agriculture, we launch new photovoltaic formats for planting and fishing.

## Scenarios
- Standard scenario: Transport to manufacturer (A2): It was assumed that all transportation from suppliers is carried out using trucks. The environmental profile used for this purpose is "T0001 - Lorry (Truck), unspecified (default) | market group for (GLO)."

## Reference product
- Mono-crystalline photovoltaic module (Mono-crystalline Dual glass, N-Type, solar photovoltaic, modules) (Renesola Co., Ltd.): 1

## Inputs
- Use of net fresh water (FW) [m3]: A1 (Standard scenario) 0.0146, A2 (Standard scenario) 4.53e-6, A3 (Standard scenario) 8.59e-5, A4 (Standard scenario) 1.98e-5, A5 (Standard scenario) 3.6e-6, B2 (Standard scenario) 0.000119, C1 (Standard scenario) 2.52e-6, C2 (Standard scenario) 8.15e-7, C3 (Standard scenario) 1.81e-5, C4 (Standard scenario) 1.45e-6, D (Standard scenario) -0.00066
- Use of non renewable secondary fuels (NRSF) [MJ]: A1 (Standard scenario) 0, A2 (Standard scenario) 0, A3 (Standard scenario) 0, A4 (Standard scenario) 0, A5 (Standard scenario) 0, B2 (Standard scenario) 0, C1 (Standard scenario) 0, C2 (Standard scenario) 0, C3 (Standard scenario) 0, C4 (Standard scenario) 0, D (Standard scenario) 0
- Use of non renewable primary energy (PENRE) [MJ]: A1 (Standard scenario) 7.03, A2 (Standard scenario) 0.0396, A3 (Standard scenario) 0.063, A4 (Standard scenario) 0.264, A5 (Standard scenario) 0.0513, B2 (Standard scenario) 0.0102, C1 (Standard scenario) 0.05, C2 (Standard scenario) 0.00751, C3 (Standard scenario) 0.0286, C4 (Standard scenario) 0.00164, D (Standard scenario) -1.04
- Use of non renewable primary energy resources used as raw materials (PENRM) [MJ]: A1 (Standard scenario) 0.145, A2 (Standard scenario) 0, A3 (Standard scenario) 0.00219, A4 (Standard scenario) 0, A5 (Standard scenario) 0, B2 (Standard scenario) 0, C1 (Standard scenario) 0, C2 (Standard scenario) 0, C3 (Standard scenario) 0, C4 (Standard scenario) 0, D (Standard scenario) 0.00919
- Total use of non-renewable primary energy resources (PENRT) [MJ]: A1 (Standard scenario) 7.21, A2 (Standard scenario) 0.0396, A3 (Standard scenario) 0.0651, A4 (Standard scenario) 0.264, A5 (Standard scenario) 0.0513, B2 (Standard scenario) 0.0102, C1 (Standard scenario) 0.05, C2 (Standard scenario) 0.00751, C3 (Standard scenario) 0.0286, C4 (Standard scenario) 0.00165, D (Standard scenario) -1.04
- Use of renewable primary energy (PERE) [MJ]: A1 (Standard scenario) 1.09, A2 (Standard scenario) 0.000466, A3 (Standard scenario) 0.0374, A4 (Standard scenario) 0.0022, A5 (Standard scenario) 0.000409, B2 (Standard scenario) 0.0157, C1 (Standard scenario) 0.000374, C2 (Standard scenario) 9.79e-5, C3 (Standard scenario) 0.00283, C4 (Standard scenario) 4.31e-5, D (Standard scenario) -0.166
- Use of renewable primary energy resources used as raw materials (PERM) [MJ]: A1 (Standard scenario) 0, A2 (Standard scenario) 0, A3 (Standard scenario) 0.0249, A4 (Standard scenario) 0, A5 (Standard scenario) 0, B2 (Standard scenario) 0, C1 (Standard scenario) 0, C2 (Standard scenario) 0, C3 (Standard scenario) 0, C4 (Standard scenario) 0, D (Standard scenario) 0
- Total use of renewable primary energy resources (PERT) [MJ]: A1 (Standard scenario) 1.09, A2 (Standard scenario) 0.000466, A3 (Standard scenario) 0.0621, A4 (Standard scenario) 0.0022, A5 (Standard scenario) 0.000409, B2 (Standard scenario) 0.0157, C1 (Standard scenario) 0.000374, C2 (Standard scenario) 9.79e-5, C3 (Standard scenario) 0.00283, C4 (Standard scenario) 4.31e-5, D (Standard scenario) -0.166
- Use of renewable secondary fuels (RSF) [MJ]: A1 (Standard scenario) 0, A2 (Standard scenario) 0, A3 (Standard scenario) 0, A4 (Standard scenario) 0, A5 (Standard scenario) 0, B2 (Standard scenario) 0, C1 (Standard scenario) 0, C2 (Standard scenario) 0, C3 (Standard scenario) 0, C4 (Standard scenario) 0, D (Standard scenario) 0
- Use of secondary material (SM) [kg]: A1 (Standard scenario) 0.00677, A2 (Standard scenario) 0, A3 (Standard scenario) 1.59e-6, A4 (Standard scenario) 0, A5 (Standard scenario) 0, B2 (Standard scenario) 0, C1 (Standard scenario) 0, C2 (Standard scenario) 0, C3 (Standard scenario) 0, C4 (Standard scenario) 0, D (Standard scenario) 0

## Outputs
- Components for re-use (CRU) [kg]: A1 (Standard scenario) 0, A2 (Standard scenario) 0, A3 (Standard scenario) 0, A4 (Standard scenario) 0, A5 (Standard scenario) 0, B2 (Standard scenario) 0, C1 (Standard scenario) 0, C2 (Standard scenario) 0, C3 (Standard scenario) 0, C4 (Standard scenario) 0, D (Standard scenario) 0
- Exported electrical energy (EEE) [MJ]: A1 (Standard scenario) 0, A2 (Standard scenario) 0, A3 (Standard scenario) -9.49e-5, A4 (Standard scenario) 0, A5 (Standard scenario) 0, B2 (Standard scenario) 0, C1 (Standard scenario) 0, C2 (Standard scenario) 0, C3 (Standard scenario) 0, C4 (Standard scenario) 0, D (Standard scenario) -0.0327
- Exported thermal energy (EET) [MJ]: A1 (Standard scenario) 0, A2 (Standard scenario) 0, A3 (Standard scenario) -0.000164, A4 (Standard scenario) 0, A5 (Standard scenario) 0, B2 (Standard scenario) 0, C1 (Standard scenario) 0, C2 (Standard scenario) 0, C3 (Standard scenario) 0, C4 (Standard scenario) 0, D (Standard scenario) -0.0561
- Hazardous waste disposed (HWD) [kg]: A1 (Standard scenario) 0.000239, A2 (Standard scenario) 9.45e-8, A3 (Standard scenario) 9.45e-7, A4 (Standard scenario) 4.29e-7, A5 (Standard scenario) 1.37e-7, B2 (Standard scenario) 1.81e-8, C1 (Standard scenario) 1.35e-7, C2 (Standard scenario) 1.8e-8, C3 (Standard scenario) 2.52e-5, C4 (Standard scenario) 1.67e-9, D (Standard scenario) 3.05e-5
- Materials for energy recovery (MER) [kg]: A1 (Standard scenario) 0, A2 (Standard scenario) 0, A3 (Standard scenario) 0, A4 (Standard scenario) 0, A5 (Standard scenario) 0, B2 (Standard scenario) 0, C1 (Standard scenario) 0, C2 (Standard scenario) 0, C3 (Standard scenario) 0, C4 (Standard scenario) 0, D (Standard scenario) 0
- Materials for recycling (MFR) [kg]: A1 (Standard scenario) 0, A2 (Standard scenario) 0, A3 (Standard scenario) 1.88e-6, A4 (Standard scenario) 0, A5 (Standard scenario) 0.000308, B2 (Standard scenario) 0, C1 (Standard scenario) 0, C2 (Standard scenario) 0, C3 (Standard scenario) 0.00436, C4 (Standard scenario) 0, D (Standard scenario) 0
- Non-hazardous waste disposed (NHWD) [kg]: A1 (Standard scenario) 0.0608, A2 (Standard scenario) 0.00236, A3 (Standard scenario) 0.000639, A4 (Standard scenario) 0.00582, A5 (Standard scenario) 0.000267, B2 (Standard scenario) 0.000201, C1 (Standard scenario) 5.61e-5, C2 (Standard scenario) 0.00044, C3 (Standard scenario) 0.00243, C4 (Standard scenario) 0.00721, D (Standard scenario) -0.0156
- Radioactive waste disposed (RWD) [kg]: A1 (Standard scenario) 1.76e-5, A2 (Standard scenario) 2.45e-7, A3 (Standard scenario) 1.41e-7, A4 (Standard scenario) 1.69e-6, A5 (Standard scenario) 3.38e-7, B2 (Standard scenario) 2.48e-8, C1 (Standard scenario) 3.33e-7, C2 (Standard scenario) 4.75e-8, C3 (Standard scenario) 1.25e-7, C4 (Standard scenario) 9.15e-9, D (Standard scenario) -1.81e-6

## Impact indicators
- Abiotic depletion potential - non-fossil resources (ADPE) [kg Sb-eq.]: A1 (Standard scenario) 5.44e-5, A2 (Standard scenario) 6.26e-8, A3 (Standard scenario) 1.65e-7, A4 (Standard scenario) 2.85e-7, A5 (Standard scenario) 2.05e-8, B2 (Standard scenario) 5.26e-8, C1 (Standard scenario) 1.89e-8, C2 (Standard scenario) 1.19e-8, C3 (Standard scenario) 5.22e-8, C4 (Standard scenario) 6.56e-9, D (Standard scenario) 1.32e-5
- Abiotic depletion potential - fossil resources (ADPF) [MJ]: A1 (Standard scenario) 6.73, A2 (Standard scenario) 0.0372, A3 (Standard scenario) 0.0613, A4 (Standard scenario) 0.249, A5 (Standard scenario) 0.0483, B2 (Standard scenario) 0.00811, C1 (Standard scenario) 0.0475, C2 (Standard scenario) 0.00708, C3 (Standard scenario) 0.027, C4 (Standard scenario) 0.00155, D (Standard scenario) -0.971
- Acidification potential, Accumulated Exceedance (AP) [mol H+-eq.]: A1 (Standard scenario) 0.00331, A2 (Standard scenario) 1.43e-5, A3 (Standard scenario) 2.55e-5, A4 (Standard scenario) 0.000369, A5 (Standard scenario) 4.96e-5, B2 (Standard scenario) 1.04e-5, C1 (Standard scenario) 4.88e-5, C2 (Standard scenario) 2.64e-6, C3 (Standard scenario) 1.32e-5, C4 (Standard scenario) 6.13e-7, D (Standard scenario) -0.000613
- Eutrophication potential - freshwater (EP-freshwater) [kg P-eq.]: A1 (Standard scenario) 3.44e-5, A2 (Standard scenario) 2.49e-8, A3 (Standard scenario) 2.16e-7, A4 (Standard scenario) 1.16e-7, A5 (Standard scenario) 1.65e-8, B2 (Standard scenario) 1.01e-7, C1 (Standard scenario) 1.5e-8, C2 (Standard scenario) 4.03e-9, C3 (Standard scenario) 1.04e-7, C4 (Standard scenario) 1.73e-9, D (Standard scenario) -3.53e-6
- Eutrophication potential - marine (EP-marine) [kg N-eq.]: A1 (Standard scenario) 0.000565, A2 (Standard scenario) 5.05e-6, A3 (Standard scenario) 5.39e-6, A4 (Standard scenario) 9.19e-5, A5 (Standard scenario) 2.17e-5, B2 (Standard scenario) 1.03e-5, C1 (Standard scenario) 2.14e-5, C2 (Standard scenario) 9.41e-7, C3 (Standard scenario) 2.73e-6, C4 (Standard scenario) 1.99e-7, D (Standard scenario) -9.1e-5
- Eutrophication potential - terrestrial (EP-terrestrial) [mol N-eq.]: A1 (Standard scenario) 0.00608, A2 (Standard scenario) 5.57e-5, A3 (Standard scenario) 5.82e-5, A4 (Standard scenario) 0.00102, A5 (Standard scenario) 0.000238, B2 (Standard scenario) 3.75e-5, C1 (Standard scenario) 0.000235, C2 (Standard scenario) 1.04e-5, C3 (Standard scenario) 2.99e-5, C4 (Standard scenario) 2.21e-6, D (Standard scenario) -0.00107
- Potential Comparative Toxic Unit for ecosystems (ETP-fw) [CTUe]: A1 (Standard scenario) 18.2, A2 (Standard scenario) 0.0332, A3 (Standard scenario) 0.13, A4 (Standard scenario) 0.188, A5 (Standard scenario) 0.0342, B2 (Standard scenario) 0.0941, C1 (Standard scenario) 0.0307, C2 (Standard scenario) 0.00587, C3 (Standard scenario) 0.188, C4 (Standard scenario) 0.0781, D (Standard scenario) -2.59
- Global Warming Potential - biogenic (GWP-biogenic) [kg CO2-eq.]: A1 (Standard scenario) 0.00374, A2 (Standard scenario) 1.14e-6, A3 (Standard scenario) -0.00297, A4 (Standard scenario) -7.9e-8, A5 (Standard scenario) 0.00298, B2 (Standard scenario) -0.00178, C1 (Standard scenario) 3.56e-6, C2 (Standard scenario) 2.63e-7, C3 (Standard scenario) 0.000313, C4 (Standard scenario) 1.13e-6, D (Standard scenario) -0.0006
- Global Warming Potential - fossil fuels (GWP-fossil) [kg CO2-eq.]: A1 (Standard scenario) 0.531, A2 (Standard scenario) 0.00247, A3 (Standard scenario) 0.00518, A4 (Standard scenario) 0.0183, A5 (Standard scenario) 0.00376, B2 (Standard scenario) 0.000764, C1 (Standard scenario) 0.00351, C2 (Standard scenario) 0.000462, C3 (Standard scenario) 0.0132, C4 (Standard scenario) 0.000128, D (Standard scenario) -0.0975
- Global Warming Potential - land use and land use change (GWP-luluc) [kg CO2-eq.]: A1 (Standard scenario) 0.000777, A2 (Standard scenario) 9.06e-7, A3 (Standard scenario) 5.7e-6, A4 (Standard scenario) 1e-5, A5 (Standard scenario) 5.74e-7, B2 (Standard scenario) 0.0011, C1 (Standard scenario) 5.39e-7, C2 (Standard scenario) 1.65e-7, C3 (Standard scenario) 2.21e-6, C4 (Standard scenario) 3.98e-8, D (Standard scenario) -0.000288
- Global Warming Potential - total (GWP-total) [kg CO2-eq.]: A1 (Standard scenario) 0.535, A2 (Standard scenario) 0.00247, A3 (Standard scenario) 0.00219, A4 (Standard scenario) 0.0183, A5 (Standard scenario) 0.00673, B2 (Standard scenario) 8.46e-5, C1 (Standard scenario) 0.00352, C2 (Standard scenario) 0.000462, C3 (Standard scenario) 0.0135, C4 (Standard scenario) 0.000129, D (Standard scenario) -0.0984
- Potential Comparative Toxic Unit for humans - cancer effects (HTP-c) [CTUh]: A1 (Standard scenario) 3.43e-10, A2 (Standard scenario) 1.08e-12, A3 (Standard scenario) 3.71e-12, A4 (Standard scenario) 8.5e-12, A5 (Standard scenario) 1e-12, B2 (Standard scenario) 2.63e-12, C1 (Standard scenario) 5.44e-13, C2 (Standard scenario) 2.04e-13, C3 (Standard scenario) 1.55e-11, C4 (Standard scenario) 1.04e-13, D (Standard scenario) -1.37e-10
- Potential Comparative Toxic Unit for humans - non-cancer effects (HTP-nc) [CTUh]: A1 (Standard scenario) 1.85e-8, A2 (Standard scenario) 3.63e-11, A3 (Standard scenario) 9.53e-11, A4 (Standard scenario) 1.71e-10, A5 (Standard scenario) 4.57e-11, B2 (Standard scenario) 6.39e-11, C1 (Standard scenario) 4.3e-11, C2 (Standard scenario) 6.86e-12, C3 (Standard scenario) 1.09e-10, C4 (Standard scenario) 4.07e-12, D (Standard scenario) -3.02e-9
- Potential Human exposure efficiency relative to U235 (IRP) [kgBq U235-eq.]: A1 (Standard scenario) 0.0215, A2 (Standard scenario) 0.000156, A3 (Standard scenario) 0.000154, A4 (Standard scenario) 0.00105, A5 (Standard scenario) 0.000211, B2 (Standard scenario) 2.39e-5, C1 (Standard scenario) 0.000207, C2 (Standard scenario) 3.05e-5, C3 (Standard scenario) 0.000128, C4 (Standard scenario) 6.17e-6, D (Standard scenario) -0.0018
- Depletion potential of the stratospheric ozone layer (ODP) [kg CFC-11-eq.]: A1 (Standard scenario) 5.18e-8, A2 (Standard scenario) 5.44e-10, A3 (Standard scenario) 3.4e-10, A4 (Standard scenario) 3.79e-9, A5 (Standard scenario) 7.64e-10, B2 (Standard scenario) 1.26e-10, C1 (Standard scenario) 7.46e-10, C2 (Standard scenario) 1.05e-10, C3 (Standard scenario) 1.86e-10, C4 (Standard scenario) 1.98e-11, D (Standard scenario) -4.53e-9
- Potential incidence of disease due to PM emissions (PM) [Disease incidence]: A1 (Standard scenario) 2.96e-8, A2 (Standard scenario) 2.22e-10, A3 (Standard scenario) 3.33e-10, A4 (Standard scenario) 8.63e-10, A5 (Standard scenario) 7.81e-11, B2 (Standard scenario) 1.5e-10, C1 (Standard scenario) 6.95e-11, C2 (Standard scenario) 4.17e-11, C3 (Standard scenario) 1.46e-10, C4 (Standard scenario) 8.93e-12, D (Standard scenario) -6.34e-9
- Photochemical Ozone Creation Potential (POCP) [kg NMVOC-eq.]: A1 (Standard scenario) 0.00199, A2 (Standard scenario) 1.59e-5, A3 (Standard scenario) 1.85e-5, A4 (Standard scenario) 0.00027, A5 (Standard scenario) 6.26e-5, B2 (Standard scenario) 4.92e-6, C1 (Standard scenario) 6.17e-5, C2 (Standard scenario) 2.96e-6, C3 (Standard scenario) 9.06e-6, C4 (Standard scenario) 6.08e-7, D (Standard scenario) -0.000302
- Potential Soil quality index (SQP) [dimensionless]: A1 (Standard scenario) 1.73, A2 (Standard scenario) 0.0323, A3 (Standard scenario) 0.382, A4 (Standard scenario) 0.0966, A5 (Standard scenario) 0.00677, B2 (Standard scenario) 0.082, C1 (Standard scenario) 0.00613, C2 (Standard scenario) 0.00604, C3 (Standard scenario) 0.0177, C4 (Standard scenario) 0.0029, D (Standard scenario) -0.417
- Water (user) deprivation potential (WDP) [m3 world eq. deprived]: A1 (Standard scenario) 0.421, A2 (Standard scenario) 0.000133, A3 (Standard scenario) 0.00274, A4 (Standard scenario) 0.00057, A5 (Standard scenario) 6.86e-5, B2 (Standard scenario) 0.00298, C1 (Standard scenario) 5e-5, C2 (Standard scenario) 2.54e-5, C3 (Standard scenario) 0.000371, C4 (Standard scenario) 1.64e-5, D (Standard scenario) -0.0119

## Review details
Independent verification of the declaration and data, according to EN ISO 14025:2010.

## Data sources
- ecoinvent 3.6 database
- ecoinvent database (general)
