# BIPV Modules, PhotonWall, Facade Cladding, Photovoltaic Roof Tile, Ventilated Facade with sub-structure

Dataset: ILCD process, EPD, average dataset
Reference year: 2024
Valid until: 2029
Method details: NPCR Part A: Construction products and services. Ver. 1.0. March 2021
Generated by: LCA.no AS
Registration number: 663/2024
Owner: ML System S.A.
Compliance: EN 15804+A2; ISO 14025; ISO 21930
Review: Independent external review by Ph.D. Eng. Halina Prejzner
Amounts: rows without a unit in brackets have none in this file; such an amount is in the reference unit of its flow, which a separate flow dataset defines
copyright: true
licenseType: Free of charge for all users and uses
accessRestrictions: None

## General comment
The data selected for LCA originate from ITB-LCI questionnaires completed by ML System. No specific data collected is older than five years and no generic datasets used are older than ten years. The representativeness, completeness, reliability, and consistency are judged as good. The database, ecoinvent 3.9 is utilized for the background system. As a result, both upstream- and downstream activities are based on average supply mixes for the specific country or region depending on the given dataset and KOBiZE data is used (Polish electricity mix and combustion factors for fuels). Specific (LCI) data quality analysis was a part of the input data verification. The time related quality of the data used is valid (5 years).

The allocation rules used for this EPD are based on general ITB’s document PCR A. In the modules A1-A3, material losses in the assembly of the products in the factory are defined on the averaged specific values for the site. Input and output data from the production is inventoried and allocated to the products on the mass basis. The declaration covers a wide range of products (averaged). Their production resources and processing stages are basically similar, so it is possible to average the production by product volume.

All data obtained from the survey at the solar glass supplier and module manufacturer were taken into consideration, all available data from production have been considered, i.e. all raw materials/elements used as per assembly process, utilized thermal energy, and electric power consumption. Thus, material and energy flows contributing less than 1 % of mass or energy have been considered. It can be assumed that the total sum of neglected processes does not exceed 5 % of energy usage and mass per module A, B, C or D. Machines and facilities required during production are neglected. The production of etiquettes, tape and glue was also not considered.

## Technical purpose
The concept behind building integrated photovoltaics is to adapt PV modules to various building applications, primarily as alternatives to traditional construction materials used for building roofs, facades , fronts, curtain wall louvres, skylights, balustrades and specific window joinery panes. The essential component of product is the system of glass-to-glass modules. Bonding two glass panes with plastic films produces safety glass, a product that is popular in civil engineering and architecture, where its applications span partitions, balustrades, canopies, etc. All module types are available in various forms, depending on the vision of the architects (to adapt to the installation method and building form). Information on ML System products is available at: https://mlsystem.pl/bipv-modules/

## Reference product
- BIPV Modules, PhotonWall, Facade Cladding, Photovoltaic Roof Tile, Ventilated Facade with sub-structure: 1; General reminder flow; measured

## Inputs
- Use of renewable primary energy (PERE) [MJ]: A1 367, A2 1.81, A3 54.7, A4 0.239, A5 0.87, B1 0, B2 8.37, C1 0.436, C2 0.34, C3 0.489, C4 0.00954, D -14.6
- Use of renewable primary energy resources used as raw materials (PERM) [MJ]: A1 6.62, A2 0.00962, A3 0.00388, A4 0, A5 0, B1 0, B2 0, C1 0, C2 0, C3 0, C4 0, D 0
- Total use of renewable primary energy resource (PERT) [MJ]: A1 479, A2 1.82, A3 54.7, A4 0.239, A5 0.87, B1 0, B2 8.38, C1 0.436, C2 0.34, C3 0.489, C4 0.00954, D -14.6
- Use of non renewable primary energy (PENRE) [MJ]: A1 1430, A2 105, A3 689, A4 0.333, A5 11.7, B1 0, B2 47, C1 5.9, C2 23.7, C3 -2.58, C4 0, D -92.8
- Use of non renewable primary energy resources used as raw materials (PENRM) [MJ]: A1 13.3, A2 0.796, A3 120, A4 0, A5 0, B1 0, B2 0.156, C1 0, C2 0, C3 9.2, C4 0, D 0
- Total use of non renewable primary energy resource (PENRT) [MJ]: A1 1340, A2 106, A3 809, A4 17.9, A5 11.7, B1 0, B2 50.8, C1 5.9, C2 23.7, C3 6.63, C4 0.595, D -112
- Use of secondary material (SM) [kg]: A1 2.32, A2 0.0327, A3 0.069, A4 0.000112, A5 0.00107, B1 0, B2 0.0452, C1 0.000537, C2 0.00796, C3 0.000605, C4 3.55e-6, D -0.254
- Use of renewable secondary fuels (RSF) [MJ]: A1 0.159, A2 0.000438, A3 0.000308, A4 1.23e-6, A5 5.98e-6, B1 0, B2 0.00613, C1 2.99e-6, C2 8.76e-5, C3 3.41e-6, C4 9.28e-8, D -0.00387
- Use of non renewable secondary fuels (NRSF) [MJ]: A1 0.00917, A2 0, A3 0.00499, A4 0, A5 0.0095, B1 0, B2 0.00889, C1 0.00476, C2 0, C3 0.00535, C4 0, D -0.00139
- Use of net fresh water (FW) [m3]: A1 3.08, A2 0.00856, A3 1.89, A4 0.000852, A5 0.00319, B1 0, B2 0.127, C1 0.0016, C2 0.00299, C3 0.00192, C4 0.000102, D -0.124

## Outputs
- Hazardous waste disposed (HWD) [kg]: A1 0.0972, A2 0.0473, A3 0.365, A4 0.000417, A5 0.000121, B1 0, B2 0.000136, C1 6.08e-5, C2 0.0266, C3 0.0003, C4 1.87e-5, D -0.0325
- Non hazardous waste dispose (NHWD) [kg]: A1 1.78, A2 1.72, A3 0.00922, A4 0.86, A5 0.00631, B1 0, B2 0.0562, C1 0.00316, C2 0.473, C3 0.0691, C4 2.21, D -3.8
- Radioactive waste disposed (RWD) [kg]: A1 0.00098, A2 3.34e-5, A3 5.74e-6, A4 0.000112, A5 8.8e-6, B1 0, B2 0.000109, C1 4.41e-6, C2 1.77e-6, C3 3.55, C4 3.37e-6, D -0.000494
- Components for re-use (CRU) [kg]: A1 0.307, A2 0, A3 0.00464, A4 0, A5 0, B1 0, B2 0, C1 0, C2 0, C3 4.95e-6, C4 0, D 0
- Materials for recycling (MFR) [kg]: A1 0.000922, A2 0.000568, A3 0.253, A4 1.03e-6, A5 1.21e-5, B1 0, B2 0.0221, C1 6.08e-6, C2 7.35e-5, C3 2.4e-8, C4 3.38e-8, D -0.00377
- Materials for energy recovery (MER) [kg]: A1 1.35, A2 1.14e-6, A3 0.513, A4 8.34e-9, A5 1.06e-7, B1 0, B2 0.0149, C1 5.32e-8, C2 5.94e-7, C3 6.83e-6, C4 4e-10, D 2.87e-5
- Exported electrical energy (EEE) [MJ]: A1 1.43, A2 0.138, A3 0.533, A4 0, A5 0.035, B1 0, B2 0.0688, C1 0.0175, C2 0, C3 4.8e-6, C4 0, D -0.184
- Exported thermal energy (EET) [MJ]: A1 0, A2 0, A3 0, A4 0, A5 0, B1 0, B2 0, C1 0, C2 0, C3 0, C4 0, D 0

## Impact indicators
- Acidification potential, Accumulated Exceedance (AP) [mol H+ eqv.]: A1 0.539, A2 0.00756, A3 0.453, A4 0.00454, A5 0.00769, B1 0, B2 0.0262, C1 0.00385, C2 0.00648, C3 0.0217, C4 0.000201, D -0.189
- Global Warming Potential - total (GWP-total) [kg CO2 eqv.]: A1 128, A2 2.93, A3 45.2, A4 1.12, A5 0.706, B1 0, B2 3.45, C1 0.354, C2 1.61, C3 1.17, C4 0.024, D -10
- Global Warming Potential - biogenic (GWP-biogenic) [kg CO2 eqv.]: A1 0.618, A2 0.00291, A3 0.125, A4 0.00298, A5 0.0202, B1 0, B2 0.0388, C1 0.0101, C2 0.00546, C3 0.0114, C4 0.000235, D -0.0934
- Global Warming Potential - fossil fuels (GWP-fossil) [kg CO2 eqv.]: A1 127, A2 2.94, A3 45.1, A4 1.12, A5 0.693, B1 0, B2 3.41, C1 0.347, C2 1.6, C3 1.18, C4 0.0237, D -9.91
- Global Warming Potential - land use and land use change (GWP-luluc) [kg CO2 eqv.]: A1 0.358, A2 0.00286, A3 0.00715, A4 0.00044, A5 0.000243, B1 0, B2 0.0057, C1 0.000122, C2 0.000628, C3 0.000137, C4 2.4e-5, D -0.0258
- Potential Comparative Toxic Unit for ecosystems (ETP-fw) [CTUe]: A1 0, A2 0, A3 0, A4 0, A5 0, B1 0, B2 0, C1 0, C2 0, C3 0, C4 0, D 0
- Potential incidence of disease due to PM emissions (PM) [disease incidence]: A1 0, A2 0, A3 0, A4 0, A5 0, B1 0, B2 0, C1 0, C2 0, C3 0, C4 0, D 0
- Eutrophication potential - marine (EP-marine) [kg N eqv.]: A1 0.13, A2 0.00248, A3 0.0648, A4 0.00137, A5 0.00111, B1 0, B2 0.00438, C1 0.000557, C2 0.00196, C3 0.00941, C4 6.95e-5, D -0.0169
- Eutrophication potential - freshwater (EP-freshwater) [kg P eqv.]: A1 0.0124, A2 0.000384, A3 0.0723, A4 7.22e-5, A5 0.00131, B1 0, B2 0.00269, C1 0.000659, C2 0.000107, C3 0.00074, C4 6.78e-6, D -0.0111
- Eutrophication potential - terrestrial (EP-terrestrial) [mol N eqv.]: A1 1.38, A2 0.0295, A3 0.565, A4 0.015, A5 0.0094, B1 0, B2 0.0428, C1 0.00471, C2 0.0213, C3 0.101, C4 0.000755, D -0.21
- Potential Comparative Toxic Unit for humans - cancer effects (HTP-c) [CTUh]: A1 0, A2 0, A3 0, A4 0, A5 0, B1 0, B2 0, C1 0, C2 0, C3 0, C4 0, D 0
- Potential Comparative Toxic Unit for humans - non-cancer effects (HTP-nc) [CTUh]: A1 0, A2 0, A3 0, A4 0, A5 0, B1 0, B2 0, C1 0, C2 0, C3 0, C4 0, D 0
- Potential Human exposure efficiency relative to U235 (IRP) [kBq U235 eqv.]: A1 0, A2 0, A3 0, A4 0, A5 0, B1 0, B2 0, C1 0, C2 0, C3 0, C4 0, D 0
- Potential Soil quality index (SQP) [unitless]: A1 0, A2 0, A3 0, A4 0, A5 0, B1 0, B2 0, C1 0, C2 0, C3 0, C4 0, D 0
- Depletion potential of the stratospheric ozone layer (ODP) [kg CFC 11 eqv.]: A1 1.9e-5, A2 2e-7, A3 4.9e-7, A4 2.59e-7, A5 1.42e-8, B1 0, B2 3.26e-7, C1 7.09e-9, C2 3.7e-7, C3 8.78e-9, C4 7.3e-9, D -8.33e-7
- Photochemical Ozone Creation Potential (POCP) [kg NMVOC eqv.]: A1 0.642, A2 0.00282, A3 0.179, A4 0.00458, A5 0.00263, B1 0, B2 0.0151, C1 0.00132, C2 0.00654, C3 0.0253, C4 0.000218, D -0.0593
- Abiotic depletion potential - fossil resources (ADPF) [MJ]: A1 1440, A2 106, A3 809, A4 16.6, A5 11.7, B1 0, B2 50.4, C1 5.88, C2 23.7, C3 6.62, C4 0.552, D -112
- Abiotic depletion potential - non-fossil resources (ADPE) [kg Sb-eqv.]: A1 0.00846, A2 2.28e-5, A3 1.89e-5, A4 3.98e-6, A5 3.38e-6, B1 0, B2 0.000145, C1 1.69e-6, C2 5.67e-6, C3 1.91e-6, C4 7.98e-8, D -0.00158
- Water (user) deprivation potential (WDP) [m3 world eqv.]: A1 206, A2 0.319, A3 12.7, A4 0.0762, A5 0.243, B1 0, B2 5.3, C1 0.122, C2 0.109, C3 0.15, C4 0.00316, D -4.61
- Global warming potential except emissions and uptake of biogenic carbon (GWP-IOBC/GHG) [kg CO2 eqv.]: 0

## Use advice
This EPD is based on a cradle-to-grave LCA and covers all the life cycle modules A1-A3, A4-A5, B1-B7, C1-C4, and D, in which 100 weight-% of the product has been accounted in accordance with EN 15804+A2 and ITB PCR A (cradle to grave). Energy and water consumption, emissions as well as information on generated wastes were inventoried and were included in the calculation. It can be assumed that the total sum of omitted processes does not exceed 5% of all impact categories. In accordance with EN 15804+A2, machines and facilities (capital goods) required for the production as well as transportation of employees were not included in LCA. The boundaries of the system are shown in Figure 2.

## Data sources
- ecoinvent database (all versions)
