# Astronergy Photovoltaic Modules CHSM54M-HC and CHSM54M(BL)-HC

Dataset: ILCD process, EPD, specific dataset
Geography: GLO
Reference year: 2024
Valid until: 2029
Classification: The International EPD System: Construction products
Method details: 2019:14-c-PCR-016 Photovoltaic modules and parts thereof
Generated by: Dandan Li, dandan.li@startalers.cn
Registration number: EPD-IES-0011631:001 (S-P-11631)
Owner: Chint New Energy Technology Co., Ltd.
Compliance: EN 15804+A2 (EF 3.0); ISO 14025
Review: Independent external review by Marcel Gómez Ferrer, Marcel Gómez Consultoria Ambiental
Amounts: rows without a unit in brackets have none in this file; such an amount is in the reference unit of its flow, which a separate flow dataset defines
accessRestrictions: Your use of this material is subject to the General Terms of Use published on by EPD International AB:s homepage at https://www.environdec.com/contact/General-terms-of-use/. If you have not accepted EPD International AB:s the General Terms of Use, you are not authorized to exploit this work in any manner.
copyright: true

## Technology and included processes
This dataset describes 1 Wp (Watt-peak) of manufactured PV module with mono-Si cells, with activities needed for a reference service of life (RSL) of 25 years (≥80% of the labelled power output).

## Technical purpose
The PV module can be installed both as rooftop and ground-mounted type.

## Reference product
- 1 Wp of manufactured photovoltaic module: 1

## Inputs
- Use of renewable primary energy as energy carrier (PERE) [MJ]: A1-A3 1.08, A4 0.00209, A5 0.0291, B1 ND, B2 3.21e-5, B3 ND, B4 ND, B5 ND, B6 0, B7 ND, C1 0.00017, C2 0.000104, C3 0.0215, C4 0.00012, D -0.123
- Use of renewable primary energy resources used as raw materials (PERM) [MJ]: A1-A3 0.0289, A4 0, A5 -0.0289, B1 ND, B2 0, B3 ND, B4 ND, B5 ND, B6 0, B7 ND, C1 0, C2 0, C3 0, C4 0, D 0
- Total use of renewable primary energy (PERT) [MJ]: A1-A3 1.11, A4 0.00209, A5 0.000196, B1 ND, B2 3.21e-5, B3 ND, B4 ND, B5 ND, B6 0, B7 ND, C1 0.00017, C2 0.000104, C3 0.0215, C4 0.00012, D -0.123
- Use of non renewable primary energy as energy carrier (PENRE) [MJ]: A1-A3 6.07, A4 0.164, A5 0.0191, B1 ND, B2 0.00032, B3 ND, B4 ND, B5 ND, B6 0, B7 ND, C1 0.0175, C2 0.00641, C3 0.0521, C4 0.213, D -0.957
- Use of non renewable primary energy resources used as raw materials (PENRM) [MJ]: A1-A3 0.211, A4 0, A5 0, B1 ND, B2 0, B3 ND, B4 ND, B5 ND, B6 0, B7 ND, C1 0, C2 0, C3 0, C4 -0.211, D 0
- Total use of non renewable primary energy resource (PENRT) [MJ]: A1-A3 6.28, A4 0.164, A5 0.0191, B1 ND, B2 0.00032, B3 ND, B4 ND, B5 ND, B6 0, B7 ND, C1 0.0175, C2 0.00641, C3 0.0521, C4 0.00185, D -0.957
- Use of secondary material (SM) [kg]: A1-A3 0.00345, A4 0, A5 0, B1 ND, B2 0, B3 ND, B4 ND, B5 ND, B6 0, B7 ND, C1 0, C2 0, C3 0, C4 0, D 0
- Use of renewable secondary fuels (RSF) [MJ]: A1-A3 0, A4 0, A5 0, B1 ND, B2 0, B3 ND, B4 ND, B5 ND, B6 0, B7 ND, C1 0, C2 0, C3 0, C4 0, D 0
- Use of non renewable secondary fuels (NRSF) [MJ]: A1-A3 0, A4 0, A5 0, B1 ND, B2 0, B3 ND, B4 ND, B5 ND, B6 0, B7 ND, C1 0, C2 0, C3 0, C4 0, D 0
- Net use of fresh water (FW) [m3]: A1-A3 0.0146, A4 2.13e-5, A5 2.25e-6, B1 ND, B2 2.64e-5, B3 ND, B4 ND, B5 ND, B6 0, B7 ND, C1 1.68e-6, C2 9.55e-7, C3 8.77e-5, C4 1.82e-5, D -0.000399

## Outputs
- Hazardous waste disposed (HWD) [kg]: A1-A3 0.000848, A4 1.01e-6, A5 1.3e-7, B1 ND, B2 8.43e-10, B3 ND, B4 ND, B5 ND, B6 0, B7 ND, C1 1.19e-7, C2 4.22e-8, C3 1.42e-7, C4 1e-8, D 7.11e-6
- Non harzardous waste disposed (NHWD) [kg]: A1-A3 0.0407, A4 0.00619, A5 0.000107, B1 ND, B2 3.48e-6, B3 ND, B4 ND, B5 ND, B6 0, B7 ND, C1 2.77e-5, C2 0.00033, C3 0.0366, C4 0.0144, D -0.00903
- Radioactive waste disposed (RWD) [kg]: A1-A3 6.37e-6, A4 3.83e-8, A5 3.91e-9, B1 ND, B2 7.34e-10, B3 ND, B4 ND, B5 ND, B6 0, B7 ND, C1 3.47e-9, C2 2.18e-9, C3 8.17e-7, C4 1.59e-9, D -1.61e-6
- Components for re-use (CRU) [kg]: A1-A3 0, A4 0, A5 0, B1 ND, B2 0, B3 ND, B4 ND, B5 ND, B6 0, B7 ND, C1 0, C2 0, C3 0, C4 0, D 0
- Materials for recycling (MFR) [kg]: A1-A3 0.000817, A4 0, A5 0.00175, B1 ND, B2 0, B3 ND, B4 ND, B5 ND, B6 0, B7 ND, C1 0, C2 0, C3 0.035, C4 0, D 0
- Materials for energy recovery (MER) [kg]: A1-A3 1.83e-6, A4 0, A5 0.000582, B1 ND, B2 0, B3 ND, B4 ND, B5 ND, B6 0, B7 ND, C1 0, C2 0, C3 0, C4 0, D 0
- Exported electrical energy (EEE) [MJ]: A1-A3 0, A4 0, A5 0, B1 ND, B2 0, B3 ND, B4 ND, B5 ND, B6 0, B7 ND, C1 0, C2 0, C3 0, C4 0.00165, D 0
- Exported thermal energy (EET) [MJ]: A1-A3 0, A4 0, A5 0, B1 ND, B2 0, B3 ND, B4 ND, B5 ND, B6 0, B7 ND, C1 0, C2 0, C3 0, C4 0.000255, D 0

## Impact indicators
- Global Warming Potential - fossil fuels (GWP-fossil) [kg CO2 eq.]: A1-A3 0.437, A4 0.0124, A5 0.00187, B1 ND, B2 2.35e-5, B3 ND, B4 ND, B5 ND, B6 0, B7 ND, C1 0.00138, C2 0.000467, C3 0.00487, C4 0.000599, D -0.07
- Global Warming Potential - biogenic (GWP-biogenic) [kg CO2 eq.]: A1-A3 -0.00125, A4 4.92e-6, A5 0.00123, B1 ND, B2 1.3e-7, B3 ND, B4 ND, B5 ND, B6 0, B7 ND, C1 5.38e-7, C2 4.28e-7, C3 0.00018, C4 1.61e-6, D 0.000863
- Global Warming Potential - land use and land use change (GWP-luluc) [kg CO2 eq.]: A1-A3 0.000483, A4 7.26e-6, A5 3.04e-7, B1 ND, B2 3.76e-8, B3 ND, B4 ND, B5 ND, B6 0, B7 ND, C1 2.43e-7, C2 2.31e-7, C3 1.22e-5, C4 6.56e-8, D -0.000151
- Global Warming Potential - total (GWP-total) [kg CO2 eq.]: A1-A3 0.436, A4 0.0124, A5 0.0031, B1 ND, B2 2.37e-5, B3 ND, B4 ND, B5 ND, B6 0, B7 ND, C1 0.00138, C2 0.000468, C3 0.00506, C4 0.0006, D -0.0693
- Depletion potential of the stratospheric ozone layer (ODP) [kg CFC-11 eq.]: A1-A3 3.81e-8, A4 2.21e-10, A5 2.48e-11, B1 ND, B2 3.65e-12, B3 ND, B4 ND, B5 ND, B6 0, B7 ND, C1 2.15e-11, C2 1.02e-11, C3 8.76e-11, C4 1.31e-11, D -8.86e-10
- Acidifcation potential, Accumulated Exceedance (AP) [mol H+ eq.]: A1-A3 0.00251, A4 0.00013, A5 1.31e-5, B1 ND, B2 1.26e-7, B3 ND, B4 ND, B5 ND, B6 0, B7 ND, C1 1.26e-5, C2 1.02e-6, C3 2.45e-5, C4 6.33e-7, D -0.000421
- Europhication potential - freshwater (EP-freshwater) [kg P eq.]: A1-A3 0.000132, A4 7.82e-7, A5 7.41e-8, B1 ND, B2 1.03e-8, B3 ND, B4 ND, B5 ND, B6 0, B7 ND, C1 6.12e-8, C2 3.32e-8, C3 4.45e-6, C4 2.53e-8, D -2.32e-5
- Europhication potential - marine (EP-marine) [kg N eq.]: A1-A3 0.000563, A4 3.24e-5, A5 5.96e-6, B1 ND, B2 2.54e-8, B3 ND, B4 ND, B5 ND, B6 0, B7 ND, C1 5.78e-6, C2 2.58e-7, C3 4.35e-6, C4 2.34e-7, D -9.09e-5
- Europhication potential - terrestrial (EP-terrestrial) [mol N eq.]: A1-A3 0.00553, A4 0.000355, A5 6.46e-5, B1 ND, B2 2.56e-7, B3 ND, B4 ND, B5 ND, B6 0, B7 ND, C1 6.28e-5, C2 2.62e-6, C3 3.84e-5, C4 2.3e-6, D -0.00105
- Photochemical Ozone Creation Potential (POCP) [kg NMVOC eq.]: A1-A3 0.00164, A4 0.000111, A5 1.92e-5, B1 ND, B2 8.35e-8, B3 ND, B4 ND, B5 ND, B6 0, B7 ND, C1 1.86e-5, C2 1.59e-6, C3 1.24e-5, C4 8.51e-7, D -0.000293
- Abiotic depletion potential - non-fossil resources (ADPE) [kg Sb eq.]: A1-A3 1.96e-5, A4 3.18e-8, A5 8.8e-10, B1 ND, B2 1.09e-10, B3 ND, B4 ND, B5 ND, B6 0, B7 ND, C1 5.07e-10, C2 1.53e-9, C3 9.7e-9, C4 3.78e-10, D -4.52e-6
- Abiotic depletion potential - fossil resources (ADPF) [MJ]: A1-A3 5.29, A4 0.168, A5 0.0196, B1 ND, B2 0.000301, B3 ND, B4 ND, B5 ND, B6 0, B7 ND, C1 0.0181, C2 0.00664, C3 0.112, C4 0.00192, D -0.879
- Water (user) deprivation potential (WDP) [m3 world eq. deprived]: A1-A3 0.558, A4 0.000626, A5 5.61e-5, B1 ND, B2 0.0011, B3 ND, B4 ND, B5 ND, B6 0, B7 ND, C1 4.52e-5, C2 2.74e-5, C3 0.00116, C4 7.04e-5, D -0.0103
- Global Warming Potential (GWP-GHG) [kg CO2 eq.]: A1-A3 0.437, A4 0.0124, A5 0.00187, B1 ND, B2 2.35e-5, B3 ND, B4 ND, B5 ND, B6 0, B7 ND, C1 0.00138, C2 0.000467, C3 0.00489, C4 0.000599, D -0.0702

## Use advice
System boundary, assumptions, applied PCR should be taken into consideration.

## Data sources
- ecoinvent database (general)
- ecoinvent 3.9 database
