# Gry Table - Rectangular

Dataset: ILCD process, EPD, specific dataset
Geography: SE
Reference year: 2025
Valid until: 2030
Method details: NPCR 026:2022 Part B for Furniture
Generated by: LCA.no AS
Registration number: NEPD-14097-14404
Owner: Nola Industrier Aktiebolag
Compliance: EN 15804+A2; ISO 14025; ISO 21930
Review: Independent external review by Elisabet Amat
Amounts: rows without a unit in brackets have none in this file; such an amount is in the reference unit of its flow, which a separate flow dataset defines
copyright: true
licenseType: Free of charge for all users and uses
accessRestrictions: None

## General comment
Data quality:
Specific data for the product composition are provided by the manufacturer. They represent the production of the declared product and were collected for EPD development in the year of study. Background data is based on registered EPDs according to EN 15804, Ostfold Research databases, ecoinvent and other LCA databases. The data quality of the raw materials in A1 is presented in the table below.

Data has been gathered from sub suppliers and public, current, published EPDs or ecoinvent 3.6 database.

Allocation:
The allocation is made in accordance with the provisions of EN 15804. Incoming energy and water and waste production in-house is allocated equally among all products through mass allocation. Effects of primary production of recycled materials is allocated to the main product in which the material was used. The recycling process and transportation of the material is allocated to this analysis.
Allocation as per EN 15804.

Impacts from primary production of virgin material are assigned to respective component production and includes transportation.

Impacts from repair and replacement are not included in the use stage, as the materials used in the product are designed to last longer than the stated lifespan

Impacts from primary production of recycled materials are assigned to respective component production, and includes recycling and transportation processes.

Emissions from disposal of the product are included and allocated per material. Energy recovery from incineration of relevant materials is included and allocated on a national level.

Cut-off criteria:
All major raw materials and all the essential energy is included. The production processes for raw materials and energy flows with very small amounts (less than 1%) are not included. These cut-off criteria do not apply for hazardous materials and substances.
Energy flows and materials representing less than 1% of the total are excluded. Cut-off does not apply for REACH materials.

## Geography
Global.

## Technical purpose
Gry table is part of a furniture group from Nola that was designed with a focus on comfort, functionality and durability. These characteristics come together in a clear expression of simplicity, enabling Gry to voice contemporary elegance. Each product in the Gry series is crafted with restrained proportions and authentic materials, their outlines softened by rounded steel parts forming each frame. U14-15 Gry Rectangular table
Length: 155 cm
Height: 72 cm
Depth: 71 cm

## Reference product
- Gry Table - Rectangular: 1; General reminder flow; measured

## Inputs
- Use of renewable primary energy (PERE) [MJ]: A1-A3 408.326, A4 0.445046, A5 0.131516, B2 0, B3 0, B4 0, C1 0, C2 0.110897, C3 0.130716, C4 0.0811999, D -92.464
- Use of renewable primary energy resources used as raw materials (PERM) [MJ]: A1-A3 589.018, A4 0, A5 -277.618, B2 0, B3 0, B4 0, C1 0, C2 0, C3 -259.5, C4 0, D 0
- Total use of renewable primary energy resource (PERT) [MJ]: A1-A3 997.343, A4 0.445046, A5 -277.486, B2 0, B3 0, B4 0, C1 0, C2 0.110897, C3 -259.369, C4 0.0811999, D -92.464
- Use of non renewable primary energy (PENRE) [MJ]: A1-A3 1289.49, A4 35.3581, A5 6.3868, B2 0, B3 0, B4 0, C1 0, C2 7.85876, C3 3.02514, C4 4.40544, D -65.1804
- Use of non renewable primary energy resources used as raw materials (PENRM) [MJ]: A1-A3 18.3653, A4 0, A5 -8.0693, B2 0, B3 0, B4 0, C1 0, C2 0, C3 -8.58, C4 0, D 0
- Total use of non renewable primary energy resource (PENRT) [MJ]: A1-A3 1307.85, A4 35.3581, A5 -1.6825, B2 0, B3 0, B4 0, C1 0, C2 7.85876, C3 -5.55486, C4 4.40544, D -65.1804
- Use of secondary material (SM) [kg]: A1-A3 3.71941, A4 0, A5 0, B2 0, B3 0, B4 0, C1 0, C2 0, C3 0, C4 0, D 0
- Use of renewable secondary fuels (RSF) [MJ]: A1-A3 0.604906, A4 0.0155669, A5 0.0038315, B2 0, B3 0, B4 0, C1 0, C2 0.00396908, C3 0.00282119, C4 0.0021513, D 0.202924
- Use of non renewable secondary fuels (NRSF) [MJ]: A1-A3 1.01931, A4 0.0521779, A5 0.0432801, B2 0, B3 0, B4 0, C1 0, C2 0.0141697, C3 0, C4 0.153971, D 1.12092
- Use of net fresh water (FW) [m3]: A1-A3 1.68831, A4 0.00402623, A5 0.0046373, B2 0, B3 0, B4 0, C1 0, C2 0.000827556, C3 0.00485383, C4 0.00397049, D -0.119111

## Outputs
- Hazardous waste disposed (HWD) [kg]: A1-A3 1.20488, A4 0.00193553, A5 0, B2 0, B3 0, B4 0, C1 0, C2 0.000400783, C3 0, C4 17.2276, D -0.0321064
- Non hazardous waste dispose (NHWD) [kg]: A1-A3 16.4754, A4 3.07566, A5 20.19, B2 0, B3 0, B4 0, C1 0, C2 0.37559, C3 0.44, C4 0.159996, D -2.8099
- Radioactive waste disposed (RWD) [kg]: A1-A3 0.0204308, A4 0.000241391, A5 0, B2 0, B3 0, B4 0, C1 0, C2 5.3582e-5, C3 0, C4 2.70894e-5, D -5.81919e-5
- Components for re-use (CRU) [kg]: A1-A3 0, A4 0, A5 0, B2 0, B3 0, B4 0, C1 0, C2 0, C3 0, C4 0, D 0
- Materials for recycling (MFR) [kg]: A1-A3 6.24287, A4 0, A5 0.0974529, B2 0, B3 0, B4 0, C1 0, C2 0, C3 8.78108, C4 0, D 0
- Materials for energy recovery (MER) [kg]: A1-A3 1.9967, A4 0, A5 19.8377, B2 0, B3 0, B4 0, C1 0, C2 0, C3 42.34, C4 0, D 0
- Exported electrical energy (EEE) [MJ]: A1-A3 1.38861, A4 0, A5 13.7989, B2 0, B3 0, B4 0, C1 0, C2 0, C3 11.8584, C4 0, D 0
- Exported thermal energy (EET) [MJ]: A1-A3 21.0083, A4 0, A5 208.763, B2 0, B3 0, B4 0, C1 0, C2 0, C3 179.406, C4 0, D 0

## Impact indicators
- Acidification potential, Accumulated Exceedance (AP) [mol H+ eqv.]: A1-A3 0.309066, A4 0.00955528, A5 0.00434562, B2 0, B3 0, B4 0, C1 0, C2 0.00213032, C3 0.00354586, C4 0.00135988, D -0.0382971
- Global Warming Potential - total (GWP-total) [kg CO2 eqv.]: A1-A3 34.9742, A4 2.27461, A5 30.8732, B2 0, B3 0, B4 0, C1 0, C2 0.521542, C3 25.3329, C4 0.191571, D -7.08957
- Global Warming Potential - biogenic (GWP-biogenic) [kg CO2 eqv.]: A1-A3 -59.3281, A4 0.000932923, A5 30.3198, B2 0, B3 0, B4 0, C1 0, C2 0.000212489, C3 23.9844, C4 0.000143668, D -0.00540115
- Global Warming Potential - fossil fuels (GWP-fossil) [kg CO2 eqv.]: A1-A3 94.2152, A4 2.27301, A5 0.553228, B2 0, B3 0, B4 0, C1 0, C2 0.521147, C3 1.34836, C4 0.191371, D -7.047
- Global Warming Potential - land use and land use change (GWP-luluc) [kg CO2 eqv.]: A1-A3 0.144923, A4 0.000663643, A5 0.000139178, B2 0, B3 0, B4 0, C1 0, C2 0.000182172, C3 8.23759e-5, C4 5.80384e-5, D -0.0371619
- Potential Comparative Toxic Unit for ecosystems (ETP-fw) [CTUe]: A1-A3 672.072, A4 25.8582, A5 7.2602, B2 0, B3 0, B4 0, C1 0, C2 5.78776, C3 15.7282, C4 2.58306, D -414.905
- Potential incidence of disease due to PM emissions (PM) [disease incidence]: A1-A3 2.48542e-6, A4 2.00096e-7, A5 5.3234e-8, B2 0, B3 0, B4 0, C1 0, C2 3.7518e-8, C3 7.1715e-8, C4 2.4926e-8, D -1.00124e-6
- Eutrophication potential - marine (EP-marine) [kg N eqv.]: A1-A3 0.0793636, A4 0.0028731, A5 0.0018739, B2 0, B3 0, B4 0, C1 0, C2 0.000631791, C3 0.00159067, C4 0.000485129, D -0.00891347
- Eutrophication potential - freshwater (EP-freshwater) [kg P eqv.]: A1-A3 0.00117452, A4 1.73333e-5, A5 6.48127e-6, B2 0, B3 0, B4 0, C1 0, C2 4.09259e-6, C3 8.02266e-6, C4 1.90318e-6, D -0.000461035
- Eutrophication potential - terrestrial (EP-terrestrial) [mol N eqv.]: A1-A3 0.840446, A4 0.0317749, A5 0.0199548, B2 0, B3 0, B4 0, C1 0, C2 0.00698723, C3 0.0169506, C4 0.00537233, D -0.0926983
- Potential Comparative Toxic Unit for humans - cancer effects (HTP-c) [CTUh]: A1-A3 7.7572e-8, A4 0, A5 8.02e-10, B2 0, B3 0, B4 0, C1 0, C2 0, C3 1.861e-9, C4 9.1e-11, D -3.0516e-8
- Potential Comparative Toxic Unit for humans - non-cancer effects (HTP-nc) [CTUh]: A1-A3 8.96374e-7, A4 2.5012e-8, A5 3.8496e-8, B2 0, B3 0, B4 0, C1 0, C2 6.253e-9, C3 3.543e-8, C4 2.439e-9, D 5.57686e-7
- Potential Human exposure efficiency relative to U235 (IRP) [kBq U235 eqv.]: A1-A3 7.36536, A4 0.154518, A5 0.0232059, B2 0, B3 0, B4 0, C1 0, C2 0.03435, C3 0.00735113, C4 0.0176193, D -0.0696427
- Potential Soil quality index (SQP) [unitless]: A1-A3 5779.96, A4 40.5589, A5 3.65368, B2 0, B3 0, B4 0, C1 0, C2 5.4179, C3 0.578314, C4 9.59227, D -99.4321
- Depletion potential of the stratospheric ozone layer (ODP) [kg CFC 11 eqv.]: A1-A3 2.72951e-6, A4 5.25252e-7, A5 8.6864e-8, B2 0, B3 0, B4 0, C1 0, C2 1.18807e-7, C3 3.4771e-8, C4 5.9582e-8, D -0.072861
- Photochemical Ozone Creation Potential (POCP) [kg NMVOC eqv.]: A1-A3 0.237171, A4 0.010217, A5 0.00513392, B2 0, B3 0, B4 0, C1 0, C2 0.00213928, C3 0.00438152, C4 0.00154535, D -0.0383345
- Abiotic depletion potential - fossil resources (ADPF) [MJ]: A1-A3 1290.4, A4 35.3562, A5 6.38634, B2 0, B3 0, B4 0, C1 0, C2 7.85822, C3 2.97968, C4 4.40506, D -65.2068
- Abiotic depletion potential - non-fossil resources (ADPE) [kg Sb-eqv.]: A1-A3 0.0197735, A4 3.88186e-5, A5 8.80766e-6, B2 0, B3 0, B4 0, C1 0, C2 1.41161e-5, C3 1.88716e-6, C4 3.32953e-6, D -0.000114309
- Water (user) deprivation potential (WDP) [m3 world eqv.]: A1-A3 15656.4, A4 27.1237, A5 9.95473, B2 0, B3 0, B4 0, C1 0, C2 7.49635, C3 5.17886, C4 8.56962, D 135.477
- Global warming potential except emissions and uptake of biogenic carbon (GWP-IOBC/GHG) [kg CO2 eqv.]: A1-A3 94.7348, A4 2.27454, A5 0.553367, B2 0, B3 0, B4 0, C1 0, C2 0.521527, C3 1.35028, C4 0.192832, D -7.07446

## Use advice
Sweden.

## Data sources
- ecoinvent database (all versions)
