# Clearline Fusion PV16 Solar Photovoltaic Modules

Dataset: ILCD process, EPD, specific dataset
Geography: GLO
Reference year: 2023
Valid until: 2028
Classification: The International EPD System: Construction products
Method details: 2019:14-c-PCR-016 Photovoltaic modules and parts thereof
Generated by: , yildiray.yilmaz@metsims.com
Registration number: EPD-IES-0006949:001 (S-P-06949)
Owner: Viridian Solar Limited
Compliance: EN 15804+A2 (EF 3.0); ISO 14025
Review: Vladimír Kocí, LCAstudio
Amounts: rows without a unit in brackets have none in this file; such an amount is in the reference unit of its flow, which a separate flow dataset defines
copyright: true
accessRestrictions: Your use of this material is subject to the General Terms of Use published on by EPD International AB:s homepage at https://www.environdec.com/contact/General-terms-of-use/. If you have not accepted EPD International AB:s the General Terms of Use, you are not authorized to exploit this work in any manner.

## Geography
Global

## Technology and included processes
This EPD considers environmental performances of Viridian Solar’s two mono-crystalline solar modules, PV16-405-M10 and PV16-335-G1. Differences in the environmental performance of the two investigated solar modules are analyzed and found less than 10%. The results in this EPD are for PV16-405-M10 mono-crystalline module since this product is the company’s mainstream product which has longer lifespan in terms of product availability.

## Technical purpose
The product is mainly installed on roofs and it is used to generate electricity for homes and offices.

## Reference product
- 1 Wp of manufactured photovoltaic module, from cradle-to-grave, with activities needed for a study period for a defined reference service life (≥80% of the labelled power output): 1

## Inputs
- Use of renewable primary energy as energy carrier (PERE) [MJ]: A1-A3 0.642, A4 0.00168, A5 0.000131, B1 ND, B2 ND, B3 ND, B4 ND, B5 ND, B6 ND, B7 ND, C1 0, C2 2.51e-6, C3 0.000212, C4 0.0499, D -0.432
- Use of renewable primary energy resources used as raw materials (PERM) [MJ]: A1-A3 0, A4 0, A5 0, B1 ND, B2 ND, B3 ND, B4 ND, B5 ND, B6 ND, B7 ND, C1 0, C2 0, C3 0, C4 0, D 0
- Total use of renewable primary energy (PERT) [MJ]: A1-A3 0.642, A4 0.00168, A5 0.000131, B1 ND, B2 ND, B3 ND, B4 ND, B5 ND, B6 ND, B7 ND, C1 0, C2 2.51e-6, C3 0.000212, C4 0.0499, D -0.432
- Use of non renewable primary energy as energy carrier (PENRE) [MJ]: A1-A3 7.12, A4 0.217, A5 0.00246, B1 ND, B2 ND, B3 ND, B4 ND, B5 ND, B6 ND, B7 ND, C1 0, C2 0.000372, C3 0.00277, C4 0.984, D -1.49
- Use of non renewable primary energy resources used as raw materials (PENRM) [MJ]: A1-A3 0, A4 0, A5 0, B1 ND, B2 ND, B3 ND, B4 ND, B5 ND, B6 ND, B7 ND, C1 0, C2 0, C3 0, C4 0, D 0
- Total use of non renewable primary energy resource (PENRT) [MJ]: A1-A3 7.12, A4 0.217, A5 0.00246, B1 ND, B2 ND, B3 ND, B4 ND, B5 ND, B6 ND, B7 ND, C1 0, C2 0.000372, C3 0.00277, C4 0.984, D -1.49
- Use of secondary material (SM) [kg]: A1-A3 0, A4 0, A5 0, B1 ND, B2 ND, B3 ND, B4 ND, B5 ND, B6 ND, B7 ND, C1 0, C2 0, C3 0, C4 0, D 0
- Use of renewable secondary fuels (RSF) [MJ]: A1-A3 0, A4 0, A5 0, B1 ND, B2 ND, B3 ND, B4 ND, B5 ND, B6 ND, B7 ND, C1 0, C2 0, C3 0, C4 0, D 0
- Use of non renewable secondary fuels (NRSF) [MJ]: A1-A3 0, A4 0, A5 0, B1 ND, B2 ND, B3 ND, B4 ND, B5 ND, B6 ND, B7 ND, C1 0, C2 0, C3 0, C4 0, D 0
- Net use of fresh water (FW) [m3]: A1-A3 0.00649, A4 2.55e-5, A5 2.13e-6, B1 ND, B2 ND, B3 ND, B4 ND, B5 ND, B6 ND, B7 ND, C1 0, C2 3.4e-8, C3 1.34e-5, C4 4.32e-6, D -0.000537

## Outputs
- Hazardous waste disposed (HWD) [kg]: A1-A3 0, A4 0, A5 0, B1 ND, B2 ND, B3 ND, B4 ND, B5 ND, B6 ND, B7 ND, C1 0, C2 0, C3 0, C4 0, D 0
- Non harzardous waste disposed (NHWD) [kg]: A1-A3 5.63e-5, A4 0, A5 0, B1 ND, B2 ND, B3 ND, B4 ND, B5 ND, B6 ND, B7 ND, C1 0, C2 0, C3 0, C4 0, D 0
- Radioactive waste disposed (RWD) [kg]: A1-A3 0, A4 0, A5 0, B1 ND, B2 ND, B3 ND, B4 ND, B5 ND, B6 ND, B7 ND, C1 0, C2 0, C3 0, C4 0, D 0
- Components for re-use (CRU) [kg]: A1-A3 0, A4 0, A5 0, B1 ND, B2 ND, B3 ND, B4 ND, B5 ND, B6 ND, B7 ND, C1 0, C2 0, C3 0, C4 0, D 0
- Materials for recycling (MFR) [kg]: A1-A3 0, A4 0, A5 0, B1 ND, B2 ND, B3 ND, B4 ND, B5 ND, B6 ND, B7 ND, C1 0, C2 0, C3 0.037, C4 0, D 0
- Materials for energy recovery (MER) [kg]: A1-A3 0, A4 0, A5 0, B1 ND, B2 ND, B3 ND, B4 ND, B5 ND, B6 ND, B7 ND, C1 0, C2 0, C3 0.006, C4 0, D 0
- Exported electrical energy (EEE) [MJ]: A1-A3 0, A4 0, A5 0, B1 ND, B2 ND, B3 ND, B4 ND, B5 ND, B6 ND, B7 ND, C1 0, C2 0, C3 0, C4 0, D 0
- Exported thermal energy (EET) [MJ]: A1-A3 0, A4 0, A5 0, B1 ND, B2 ND, B3 ND, B4 ND, B5 ND, B6 ND, B7 ND, C1 0, C2 0, C3 0, C4 0, D 0

## Impact indicators
- Global Warming Potential - fossil fuels (GWP-fossil) [kg CO2 eq.]: A1-A3 0.714, A4 0.0162, A5 0.000157, B1 ND, B2 ND, B3 ND, B4 ND, B5 ND, B6 ND, B7 ND, C1 0, C2 2.91e-5, C3 0.015, C4 0.000163, D -0.113
- Global Warming Potential - biogenic (GWP-biogenic) [kg CO2 eq.]: A1-A3 -0.00369, A4 7.03e-7, A5 0.0145, B1 ND, B2 ND, B3 ND, B4 ND, B5 ND, B6 ND, B7 ND, C1 0, C2 -3.5e-9, C3 0.000639, C4 1.25e-6, D -0.000599
- Global Warming Potential - land use and land use change (GWP-luluc) [kg CO2 eq.]: A1-A3 0.0003, A4 1.08e-5, A5 1.99e-7, B1 ND, B2 ND, B3 ND, B4 ND, B5 ND, B6 ND, B7 ND, C1 0, C2 2.12e-8, C3 2.3e-7, C4 1.65e-7, D -0.0017
- Global Warming Potential - total (GWP-total) [kg CO2 eq.]: A1-A3 0.711, A4 0.0162, A5 0.0156, B1 ND, B2 ND, B3 ND, B4 ND, B5 ND, B6 ND, B7 ND, C1 0, C2 2.91e-5, C3 0.0157, C4 0.000164, D -0.115
- Depletion potential of the stratospheric ozone layer (ODP) [kg CFC-11 eq.]: A1-A3 6.33e-8, A4 3.33e-9, A5 2.35e-11, B1 ND, B2 ND, B3 ND, B4 ND, B5 ND, B6 ND, B7 ND, C1 0, C2 5.76e-12, C3 7.73e-11, C4 4.96e-11, D -9.73e-9
- Acidifcation potential, Accumulated Exceedance (AP) [mol H+ eq.]: A1-A3 0.00461, A4 0.000438, A5 1.7e-6, B1 ND, B2 ND, B3 ND, B4 ND, B5 ND, B6 ND, B7 ND, C1 0, C2 9.44e-7, C3 3.48e-6, C4 1.38e-6, D -0.000962
- Europhication potential - freshwater (EP-freshwater) [kg P eq.]: A1-A3 0.000198, A4 6.61e-7, A5 3.9e-8, B1 ND, B2 ND, B3 ND, B4 ND, B5 ND, B6 ND, B7 ND, C1 0, C2 9.51e-10, C3 9.98e-8, C4 4.73e-8, D -6.16e-5
- Europhication potential - marine (EP-marine) [kg N eq.]: A1-A3 0.000843, A4 0.000108, A5 1.22e-5, B1 ND, B2 ND, B3 ND, B4 ND, B5 ND, B6 ND, B7 ND, C1 0, C2 2.32e-7, C3 1.71e-6, C4 4.74e-7, D -0.000112
- Europhication potential - terrestrial (EP-terrestrial) [mol N eq.]: A1-A3 0.0087, A4 0.00119, A5 3.55e-6, B1 ND, B2 ND, B3 ND, B4 ND, B5 ND, B6 ND, B7 ND, C1 0, C2 2.58e-6, C3 1.57e-5, C4 5.16e-6, D -0.00116
- Photochemical Ozone Creation Potential (POCP) [kg NMVOC eq.]: A1-A3 0.00262, A4 0.000312, A5 4.58e-6, B1 ND, B2 ND, B3 ND, B4 ND, B5 ND, B6 ND, B7 ND, C1 0, C2 6.68e-7, C3 3.98e-6, C4 1.49e-6, D -0.000376
- Abiotic depletion potential - non-fossil resources (ADPE) [kg Sb eq.]: A1-A3 1.93e-5, A4 2.53e-8, A5 5.07e-10, B1 ND, B2 ND, B3 ND, B4 ND, B5 ND, B6 ND, B7 ND, C1 0, C2 3.98e-11, C3 1.9e-9, C4 5.33e-10, D -6.14e-6
- Abiotic depletion potential - fossil resources (ADPF) [MJ]: A1-A3 7.12, A4 0.217, A5 0.00246, B1 ND, B2 ND, B3 ND, B4 ND, B5 ND, B6 ND, B7 ND, C1 0, C2 0.000372, C3 0.00277, C4 0.00383, D -1.49
- Water (user) deprivation potential (WDP) [m3 world eq. deprived]: A1-A3 0.222, A4 0.000477, A5 8.22e-5, B1 ND, B2 ND, B3 ND, B4 ND, B5 ND, B6 ND, B7 ND, C1 0, C2 6.4e-7, C3 0.000197, C4 0.000167, D -0.0275
- Global Warming Potential (GWP-GHG) [kg CO2 eq.]: A1-A3 0.693, A4 0.0161, A5 0.01, B1 ND, B2 ND, B3 ND, B4 ND, B5 ND, B6 ND, B7 ND, C1 0, C2 2.89e-5, C3 0.015, C4 0.000161, D -0.112
- Particulate Matter emissions (PM) [Disease incidence]: A1-A3 5.83e-8, A4 7.57e-10, A5 1.57e-11, B1 ND, B2 ND, B3 ND, B4 ND, B5 ND, B6 ND, B7 ND, C1 0, C2 9.04e-13, C3 2.3e-11, C4 2.76e-11, D -8e-9
- Ionizing radiation, human health (IRP) [kBq U235 eq.]: A1-A3 0.0207, A4 0.00099, A5 1.65e-5, B1 ND, B2 ND, B3 ND, B4 ND, B5 ND, B6 ND, B7 ND, C1 0, C2 1.68e-6, C3 1.92e-5, C4 1.8e-5, D -0.0132
- Eco-toxicity - freshwater (ETP-fw) [CTUe]: A1-A3 22.8, A4 0.144, A5 0.031, B1 ND, B2 ND, B3 ND, B4 ND, B5 ND, B6 ND, B7 ND, C1 0, C2 0.000228, C3 0.0359, C4 0.00273, D -4.22
- Human toxicity, cancer effect (HTP-c) [CTUh]: A1-A3 5.58e-10, A4 8.98e-12, A5 1.29e-13, B1 ND, B2 ND, B3 ND, B4 ND, B5 ND, B6 ND, B7 ND, C1 0, C2 1.75e-14, C3 2.07e-12, C4 1.17e-13, D -2.85e-10
- Human toxicity, non-cancer effects (HTP-nc) [CTUh]: A1-A3 2.1e-8, A4 1.07e-10, A5 2.38e-11, B1 ND, B2 ND, B3 ND, B4 ND, B5 ND, B6 ND, B7 ND, C1 0, C2 1.47e-13, C3 2.86e-11, C4 1.83e-12, D -6.81e-9
- Land use related impacts/Soil quality (SQP) [dimensionless]: A1-A3 2.08, A4 0.0777, A5 0.0041, B1 ND, B2 ND, B3 ND, B4 ND, B5 ND, B6 ND, B7 ND, C1 0, C2 4.99e-5, C3 0.000978, C4 0.00918, D -0.217

## Use advice
No use advice is needed.

## Data sources
- ecoinvent database (general)
- ecoinvent 3.8 database
