# Tongwei TWMNH-66HS (TNC-G12R-66 Half Cell Bifacial Module) (photovoltaic module)

Dataset: ILCD process, EPD, average dataset
Geography: CN
Reference year: 2024
Valid until: 2029
Classification: OEKOBAU.DAT: Gebäudetechnik / Elektro
Generated by: Kiwa GmbH (Berlin)
Registration number: EPD-Kiwa-EE-000422-EN
Owner: Tongwei Co., Ltd.
Compliance: ISO 14025; EN 15804+A2 (EF 3.1)
Review: Independent external review by Elisabet Amat - Greenize Projects S.L.U.
Amounts: rows without a unit in brackets have none in this file; such an amount is in the reference unit of its flow, which a separate flow dataset defines
copyright: true
licenseType: Free of charge for all users and uses
accessRestrictions: None.

## General comment
This EPD is based on the life cycle assessment of the photovoltaic module TWMNH-66HS which is produced and distributed by Tongwei Co., Ltd., located in Nantong City (P. R. China). The EPD refers to the specific product. EPD type: Cradle to Grave + Module D. Kiwa-Ecobility Experts assumes no liability for manufacturer's information, LCA data and evidence. Functional unit: 1 Wp of manufactured photovoltaic module, from cradle-to-grave, with activities needed for a study period for a defined reference service life (≥80% of the labelled power output). Note: The EPD results have been calculated for the declared / functional unit of m^2 and Wp. The results displayed in this dataset refer to the declared unit of m^2. The m^2 results can be converted into the Wp functional unit with a conversion factor (1/235.08) or can be seen in the EPD document.

## Geography
The product is produced and manufactured in Nantong City, Jiangsu Province, P. R. China, and the main market areas are China, the European Union, the Middle East, Latin America, etc. The geographical reference area is China and Europe.

## Time period
The production data have been collected for the year 2024 (01/01/2024 – 31/07/2024) and are there-fore up-to-date.

## Technology and included processes
TWMNH-66HS is part of Tongwei G12R-TNC series of photovoltaic module products, which adopts the new efficient N-type TNC cell independently developed by Tongwei for module packaging and integrates the industry-leading multi-main gate design to reduce hidden crack loss, non-destructive slicing technology to smooth and flat cutting surface, high-density packaging technology to improve the "screen ratio" of the module to ensure the perfect balance of efficiency and reliability. G12R products are optimized on the traditional 182 products, based on the mainstream mode of transportation, to maximize the utilization of containers and reduce transportation costs. In addition, G12R products with significantly increased product power, reduce integration costs, improve system benefits, bring higher product value, customer value. TWMNH-66HS has a power output range from 610 W to 635 W and a weight of 29.0 kg. 635 W is chosen as the representative product power output. The manufacturing site is located in No. 8, Bonded 10 Road, Economic Development Zone, Nantong City, Jiangsu Province, P. R. China.

## Technical purpose
Tongwei solar PV modules are widely used in various "PV+" applications, such as industrial, commercial distributed, and large-scale centralized power stations, to meet the growing global demand for clean energy.

## Scenarios
- Standard scenario: Transport to manufacturer (A2): It was assumed that all transportation from suppliers is carried out using trucks. The environmental profile used for this purpose is "T0001 - Lorry (Truck), unspecified (default) | market group for (GLO).". Production process (A3) | Production waste: The production waste data was based on the data sheets provided by the manufacturer. It is assumed that the waste scenarios for both production waste and end-of-life waste are similar. Production process (A3) | Energy consumption: The energy consumption data was sourced from the manufacturer based on the onsite production data. Since the production takes place in China, the electricity grid mix for China is applied, using the environmental profile "Electricity, medium voltage {CN} | market group for | Cut-off, U."

## Reference product
- Tongwei TWMNH-66HS (TNC-G12R-66 Half Cell Bifacial Module): 1

## Inputs
- Use of net fresh water (FW) [m3]: A1 (Standard scenario) 2.77, A2 (Standard scenario) 0.000734, A3 (Standard scenario) 0.0212, A4 (Standard scenario) 0.00407, A5 (Standard scenario) 0.000856, B2 (Standard scenario) 0.0283, C1 (Standard scenario) 0.000592, C2 (Standard scenario) 0.000185, C3 (Standard scenario) 0.0052, C4 (Standard scenario) 0.000299, D (Standard scenario) -0.158
- Use of non renewable primary energy (PENRE) [MJ]: A1 (Standard scenario) 1370, A2 (Standard scenario) 6.39, A3 (Standard scenario) 17.8, A4 (Standard scenario) 54.4, A5 (Standard scenario) 12.1, B2 (Standard scenario) 2.38, C1 (Standard scenario) 11.8, C2 (Standard scenario) 1.61, C3 (Standard scenario) 6.89, C4 (Standard scenario) 0.338, D (Standard scenario) -265
- Use of non renewable primary energy resources used as raw materials (PENRM) [MJ]: A1 (Standard scenario) 47.2, A2 (Standard scenario) 0, A3 (Standard scenario) 0.148, A4 (Standard scenario) 0, A5 (Standard scenario) 0, B2 (Standard scenario) 0, C1 (Standard scenario) 0, C2 (Standard scenario) 0, C3 (Standard scenario) 0, C4 (Standard scenario) 0, D (Standard scenario) 0
- Use of non renewable secondary fuels (NRSF) [MJ]: A1 (Standard scenario) 0, A2 (Standard scenario) 0, A3 (Standard scenario) 0, A4 (Standard scenario) 0, A5 (Standard scenario) 0, B2 (Standard scenario) 0, C1 (Standard scenario) 0, C2 (Standard scenario) 0, C3 (Standard scenario) 0, C4 (Standard scenario) 0, D (Standard scenario) 0
- Use of renewable primary energy (PERE) [MJ]: A1 (Standard scenario) 207, A2 (Standard scenario) 0.0754, A3 (Standard scenario) 11.2, A4 (Standard scenario) 0.452, A5 (Standard scenario) 0.0957, B2 (Standard scenario) 3.63, C1 (Standard scenario) 0.088, C2 (Standard scenario) 0.019, C3 (Standard scenario) 0.687, C4 (Standard scenario) 0.0089, D (Standard scenario) -41.5
- Use of renewable primary energy resources used as raw materials (PERM) [MJ]: A1 (Standard scenario) 0, A2 (Standard scenario) 0, A3 (Standard scenario) 8.28, A4 (Standard scenario) 0, A5 (Standard scenario) 0, B2 (Standard scenario) 0, C1 (Standard scenario) 0, C2 (Standard scenario) 0, C3 (Standard scenario) 0, C4 (Standard scenario) 0, D (Standard scenario) 0
- Use of renewable secondary fuels (RSF) [MJ]: A1 (Standard scenario) 0, A2 (Standard scenario) 0, A3 (Standard scenario) 0, A4 (Standard scenario) 0, A5 (Standard scenario) 0, B2 (Standard scenario) 0, C1 (Standard scenario) 0, C2 (Standard scenario) 0, C3 (Standard scenario) 0, C4 (Standard scenario) 0, D (Standard scenario) 0
- Use of secondary material (SM) [kg]: A1 (Standard scenario) 0, A2 (Standard scenario) 0, A3 (Standard scenario) 0, A4 (Standard scenario) 0, A5 (Standard scenario) 0, B2 (Standard scenario) 0, C1 (Standard scenario) 0, C2 (Standard scenario) 0, C3 (Standard scenario) 0, C4 (Standard scenario) 0, D (Standard scenario) 0
- Total use of non renewable primary energy resource (PENRT) [MJ]: A1 (Standard scenario) 1420, A2 (Standard scenario) 6.39, A3 (Standard scenario) 17.9, A4 (Standard scenario) 54.4, A5 (Standard scenario) 12.1, B2 (Standard scenario) 2.38, C1 (Standard scenario) 11.8, C2 (Standard scenario) 1.61, C3 (Standard scenario) 6.9, C4 (Standard scenario) 0.338, D (Standard scenario) -265
- Total use of renewable primary energy resources (PERT) [MJ]: A1 (Standard scenario) 207, A2 (Standard scenario) 0.0754, A3 (Standard scenario) 19.5, A4 (Standard scenario) 0.452, A5 (Standard scenario) 0.0957, B2 (Standard scenario) 3.63, C1 (Standard scenario) 0.088, C2 (Standard scenario) 0.019, C3 (Standard scenario) 0.687, C4 (Standard scenario) 0.00891, D (Standard scenario) -41.5

## Outputs
- Components for re-use (CRU) [kg]: A1 (Standard scenario) 0, A2 (Standard scenario) 0, A3 (Standard scenario) 0, A4 (Standard scenario) 0, A5 (Standard scenario) 0, B2 (Standard scenario) 0, C1 (Standard scenario) 0, C2 (Standard scenario) 0, C3 (Standard scenario) 0, C4 (Standard scenario) 0, D (Standard scenario) 0
- Exported electrical energy (EEE) [MJ]: A1 (Standard scenario) 0, A2 (Standard scenario) 0, A3 (Standard scenario) -0.0251, A4 (Standard scenario) 0, A5 (Standard scenario) 0, B2 (Standard scenario) 0, C1 (Standard scenario) 0, C2 (Standard scenario) 0, C3 (Standard scenario) 0, C4 (Standard scenario) 0, D (Standard scenario) -8.95
- Exported thermal energy (EET) [MJ]: A1 (Standard scenario) 0, A2 (Standard scenario) 0, A3 (Standard scenario) -0.0432, A4 (Standard scenario) 0, A5 (Standard scenario) 0, B2 (Standard scenario) 0, C1 (Standard scenario) 0, C2 (Standard scenario) 0, C3 (Standard scenario) 0, C4 (Standard scenario) 0, D (Standard scenario) -15.4
- Hazardous waste disposed (HWD) [kg]: A1 (Standard scenario) 0.0451, A2 (Standard scenario) 1.53e-5, A3 (Standard scenario) 0.000247, A4 (Standard scenario) 8.83e-5, A5 (Standard scenario) 3.25e-5, B2 (Standard scenario) 4.21e-6, C1 (Standard scenario) 3.18e-5, C2 (Standard scenario) 3.85e-6, C3 (Standard scenario) 0.00686, C4 (Standard scenario) 3.51e-7, D (Standard scenario) 0.00833
- Materials for energy recovery (MER) [kg]: A1 (Standard scenario) 0, A2 (Standard scenario) 0, A3 (Standard scenario) 0, A4 (Standard scenario) 0, A5 (Standard scenario) 0, B2 (Standard scenario) 0, C1 (Standard scenario) 0, C2 (Standard scenario) 0, C3 (Standard scenario) 0, C4 (Standard scenario) 0, D (Standard scenario) 0
- Materials for recycling (MFR) [kg]: A1 (Standard scenario) 0, A2 (Standard scenario) 0, A3 (Standard scenario) 0.000502, A4 (Standard scenario) 0, A5 (Standard scenario) 0.126, B2 (Standard scenario) 0, C1 (Standard scenario) 0, C2 (Standard scenario) 0, C3 (Standard scenario) 1.13, C4 (Standard scenario) 0, D (Standard scenario) 0
- Non hazardous waste dispose (NHWD) [kg]: A1 (Standard scenario) 12, A2 (Standard scenario) 0.382, A3 (Standard scenario) 0.19, A4 (Standard scenario) 1.2, A5 (Standard scenario) 0.0728, B2 (Standard scenario) 0.0467, C1 (Standard scenario) 0.0132, C2 (Standard scenario) 0.0965, C3 (Standard scenario) 0.512, C4 (Standard scenario) 1.43, D (Standard scenario) -4.01
- Radioactive waste disposed (RWD) [kg]: A1 (Standard scenario) 0.00339, A2 (Standard scenario) 3.95e-5, A3 (Standard scenario) 3.31e-5, A4 (Standard scenario) 0.000347, A5 (Standard scenario) 8e-5, B2 (Standard scenario) 5.76e-6, C1 (Standard scenario) 7.83e-5, C2 (Standard scenario) 9.99e-6, C3 (Standard scenario) 2.93e-5, C4 (Standard scenario) 1.86e-6, D (Standard scenario) -0.000432

## Impact indicators
- Abiotic depletion potential - non-fossil resources (ADPE) [kg Sb-Äqv.]: A1 (Standard scenario) 0.0112, A2 (Standard scenario) 1.01e-5, A3 (Standard scenario) 0.00026, A4 (Standard scenario) 5.87e-5, A5 (Standard scenario) 4.95e-6, B2 (Standard scenario) 1.22e-5, C1 (Standard scenario) 4.46e-6, C2 (Standard scenario) 2.55e-6, C3 (Standard scenario) 1.26e-5, C4 (Standard scenario) 1.27e-6, D (Standard scenario) 0.00378
- Abiotic depletion potential - fossil resources (ADPF) [MJ]: A1 (Standard scenario) 1330, A2 (Standard scenario) 6.02, A3 (Standard scenario) 16.9, A4 (Standard scenario) 51.2, A5 (Standard scenario) 11.4, B2 (Standard scenario) 1.88, C1 (Standard scenario) 11.1, C2 (Standard scenario) 1.52, C3 (Standard scenario) 6.49, C4 (Standard scenario) 0.319, D (Standard scenario) -249
- Acidification potential, Accumulated Exceedance (AP) [mol H+ eqv.]: A1 (Standard scenario) 0.647, A2 (Standard scenario) 0.00232, A3 (Standard scenario) 0.0101, A4 (Standard scenario) 0.076, A5 (Standard scenario) 0.0117, B2 (Standard scenario) 0.00241, C1 (Standard scenario) 0.0115, C2 (Standard scenario) 0.000585, C3 (Standard scenario) 0.00334, C4 (Standard scenario) 0.000127, D (Standard scenario) -0.153
- Eutrophication potential - freshwater (EP-freshwater) [kg P eqv.]: A1 (Standard scenario) 0.00652, A2 (Standard scenario) 4.03e-6, A3 (Standard scenario) 7.5e-5, A4 (Standard scenario) 2.38e-5, A5 (Standard scenario) 3.86e-6, B2 (Standard scenario) 2.33e-5, C1 (Standard scenario) 3.54e-6, C2 (Standard scenario) 1.02e-6, C3 (Standard scenario) 2.52e-5, C4 (Standard scenario) 3.61e-7, D (Standard scenario) -0.000849
- Eutrophication potential - marine (EP-marine) [kg N eqv.]: A1 (Standard scenario) 0.111, A2 (Standard scenario) 0.000816, A3 (Standard scenario) 0.00179, A4 (Standard scenario) 0.019, A5 (Standard scenario) 0.00514, B2 (Standard scenario) 0.00238, C1 (Standard scenario) 0.00504, C2 (Standard scenario) 0.000206, C3 (Standard scenario) 0.000709, C4 (Standard scenario) 4.49e-5, D (Standard scenario) -0.0229
- Eutrophication potential - terrestrial (EP-terrestrial) [mol N eqv.]: A1 (Standard scenario) 1.19, A2 (Standard scenario) 0.009, A3 (Standard scenario) 0.02, A4 (Standard scenario) 0.211, A5 (Standard scenario) 0.0564, B2 (Standard scenario) 0.0087, C1 (Standard scenario) 0.0553, C2 (Standard scenario) 0.00227, C3 (Standard scenario) 0.0078, C4 (Standard scenario) 0.000453, D (Standard scenario) -0.266
- Global Warming Potential - total (GWP-total) [kg CO2-Äqv.]: A1 (Standard scenario) 105, A2 (Standard scenario) 0.4, A3 (Standard scenario) 0.527, A4 (Standard scenario) 3.76, A5 (Standard scenario) 1.84, B2 (Standard scenario) 0.0198, C1 (Standard scenario) 0.828, C2 (Standard scenario) 0.101, C3 (Standard scenario) 3.9, C4 (Standard scenario) 0.0365, D (Standard scenario) -24.9
- Global Warming Potential - fossil fuels (GWP-fossil) [kg CO2-Äqv.]: A1 (Standard scenario) 104, A2 (Standard scenario) 0.399, A3 (Standard scenario) 1.52, A4 (Standard scenario) 3.76, A5 (Standard scenario) 0.849, B2 (Standard scenario) 0.178, C1 (Standard scenario) 0.827, C2 (Standard scenario) 0.101, C3 (Standard scenario) 3.84, C4 (Standard scenario) 0.0363, D (Standard scenario) -24.7
- Global Warming Potential - biogenic (GWP-biogenic) [kg CO2-Äqv.]: A1 (Standard scenario) 0.561, A2 (Standard scenario) 0.000184, A3 (Standard scenario) -0.991, A4 (Standard scenario) -1.62e-5, A5 (Standard scenario) 0.987, B2 (Standard scenario) -0.412, C1 (Standard scenario) 0.000838, C2 (Standard scenario) 4.65e-5, C3 (Standard scenario) 0.0579, C4 (Standard scenario) 0.000231, D (Standard scenario) -0.0887
- Global Warming Potential - land use and land use change (GWP-luluc) [kg CO2-Äqv.]: A1 (Standard scenario) 0.153, A2 (Standard scenario) 0.000146, A3 (Standard scenario) 0.00153, A4 (Standard scenario) 0.00206, A5 (Standard scenario) 0.000135, B2 (Standard scenario) 0.254, C1 (Standard scenario) 0.000127, C2 (Standard scenario) 3.69e-5, C3 (Standard scenario) 0.000541, C4 (Standard scenario) 8.44e-6, D (Standard scenario) -0.0763
- Depletion potential of the stratospheric ozone layer (ODP) [kg CFC 11-Äquiv.]: A1 (Standard scenario) 9.99e-6, A2 (Standard scenario) 8.81e-8, A3 (Standard scenario) 7.93e-8, A4 (Standard scenario) 7.81e-7, A5 (Standard scenario) 1.79e-7, B2 (Standard scenario) 2.93e-8, C1 (Standard scenario) 1.75e-7, C2 (Standard scenario) 2.23e-8, C3 (Standard scenario) 7.04e-8, C4 (Standard scenario) 4.03e-9, D (Standard scenario) -1.13e-6
- Photochemical Ozone Creation Potential (POCP) [kg NMVOC eqv.]: A1 (Standard scenario) 0.389, A2 (Standard scenario) 0.00257, A3 (Standard scenario) 0.00772, A4 (Standard scenario) 0.0556, A5 (Standard scenario) 0.0148, B2 (Standard scenario) 0.00114, C1 (Standard scenario) 0.0145, C2 (Standard scenario) 0.000649, C3 (Standard scenario) 0.0023, C4 (Standard scenario) 0.000127, D (Standard scenario) -0.076
- Water (user) deprivation potential (WDP) [m3 world eqv.]: A1 (Standard scenario) 80.3, A2 (Standard scenario) 0.0215, A3 (Standard scenario) 0.697, A4 (Standard scenario) 0.118, A5 (Standard scenario) 0.0149, B2 (Standard scenario) 0.72, C1 (Standard scenario) 0.0117, C2 (Standard scenario) 0.00544, C3 (Standard scenario) 0.122, C4 (Standard scenario) 0.00422, D (Standard scenario) -2.79
- Potential incidence of disease due to PM emissions (PM) [disease incidence]: A1 (Standard scenario) 5.96e-6, A2 (Standard scenario) 3.59e-8, A3 (Standard scenario) 1.13e-7, A4 (Standard scenario) 1.78e-7, A5 (Standard scenario) 1.9e-8, B2 (Standard scenario) 3.48e-8, C1 (Standard scenario) 1.64e-8, C2 (Standard scenario) 9.07e-9, C3 (Standard scenario) 3.58e-8, C4 (Standard scenario) 1.86e-9, D (Standard scenario) -1.65e-6
- Potential Human exposure efficiency relative to U235 (IRP) [kBq U235 eqv.]: A1 (Standard scenario) 4.11, A2 (Standard scenario) 0.0252, A3 (Standard scenario) 0.0361, A4 (Standard scenario) 0.217, A5 (Standard scenario) 0.0498, B2 (Standard scenario) 0.00558, C1 (Standard scenario) 0.0487, C2 (Standard scenario) 0.00637, C3 (Standard scenario) 0.0301, C4 (Standard scenario) 0.00126, D (Standard scenario) -0.418
- Potential Comparative Toxic Unit for ecosystems (ETP-fw) [CTUe]: A1 (Standard scenario) 3410, A2 (Standard scenario) 5.37, A3 (Standard scenario) 62.4, A4 (Standard scenario) 38.7, A5 (Standard scenario) 7.67, B2 (Standard scenario) 21.8, C1 (Standard scenario) 7.23, C2 (Standard scenario) 1.36, C3 (Standard scenario) 49.3, C4 (Standard scenario) 21.1, D (Standard scenario) -614
- Potential Comparative Toxic Unit for humans - cancer effects (HTP-c) [CTUh]: A1 (Standard scenario) 6.93e-8, A2 (Standard scenario) 1.74e-10, A3 (Standard scenario) 1.36e-9, A4 (Standard scenario) 1.75e-9, A5 (Standard scenario) 2.64e-10, B2 (Standard scenario) 6.1e-10, C1 (Standard scenario) 1.28e-10, C2 (Standard scenario) 4.4e-11, C3 (Standard scenario) 3.54e-9, C4 (Standard scenario) 2.09e-11, D (Standard scenario) -3.36e-8
- Potential Comparative Toxic Unit for humans - non-cancer effects (HTP-nc) [CTUh]: A1 (Standard scenario) 3.48e-6, A2 (Standard scenario) 5.87e-9, A3 (Standard scenario) 5.3e-8, A4 (Standard scenario) 3.52e-8, A5 (Standard scenario) 1.08e-8, B2 (Standard scenario) 1.48e-8, C1 (Standard scenario) 1.01e-8, C2 (Standard scenario) 1.48e-9, C3 (Standard scenario) 2.78e-8, C4 (Standard scenario) 8.13e-10, D (Standard scenario) -6.83e-7
- Potential Soil quality index (SQP) [dimensionless]: A1 (Standard scenario) 331, A2 (Standard scenario) 5.22, A3 (Standard scenario) 124, A4 (Standard scenario) 19.9, A5 (Standard scenario) 1.64, B2 (Standard scenario) 19, C1 (Standard scenario) 1.44, C2 (Standard scenario) 1.32, C3 (Standard scenario) 4.23, C4 (Standard scenario) 0.601, D (Standard scenario) -104

## Review details
Independent verification of the declaration and data, according to EN ISO 14025:2010.

## Data sources
- ecoinvent 3.6 database
- ecoinvent database (general)
