# Photovoltaic solar panel - Midsummer BOLD

Dataset: ILCD process, EPD, specific dataset
Geography: SE
Reference year: 2022
Valid until: 2027
Classification: The International EPD System: Construction products
Method details: 2019:14-c-PCR-016 Photovoltaic modules and parts thereof
Generated by: , viktor@vastlca.se
Registration number: EPD-IES-0006690:001 (S-P-06690)
Owner: Midsummer AB
Compliance: EN 15804+A2 (EF 3.0); ISO 14025
Review: Independent external review by Niels Jungbluth
Amounts: rows without a unit in brackets have none in this file; such an amount is in the reference unit of its flow, which a separate flow dataset defines
copyright: true
licenseType: Free of charge for all users and uses
accessRestrictions: Your use of this material is subject to the General Terms of Use published on by EPD International AB:s homepage at https://www.environdec.com/contact/General-terms-of-use/. If you have not accepted EPD International AB:s the General Terms of Use, you are not authorized to exploit this work in any manner.

## Technology and included processes
The product is 1 Wp of BOLD solar module. From cradle-to-grave

BOLD is a CIGS photovoltaic solar module. CIGS stand for Copper-Indium-Gallium-Selenium, a
tetrahedrally bonded semiconductor, with chalcopyrite crystal structure that converts the energy of
light directly into electricity by the photovoltaic (PV) effect. The CIGS absorber and all other materials
that form the finished solar cell are deposited on a stainless-steel substrate. The cells are then
connected in series via bus bars screen printed on top of the cell.
CIGS solar cells are manufactured by sputtering the material onto 156×156 mm stainless steel
substrates. The solar cells from Midsummer are free of cadmium, a toxic material usually used in
CIGS and other thin film solar cells. Flexible CIGS solar modules are gaining increasing market share
thanks to its high efficiency, low weight, flexibility and durability.

## Technical purpose
Electricity generation through application on roofs.

## Reference product
- m2 solar module per Watt peak (Wp): 1

## Inputs
- Use of renewable primary energy as energy carrier (PERE) [MJ]: A1 0.113167, A2 0.00155532, A3 1.21606, A1-A3 1.33078, A4 0.000295028, A5 7.83811e-5, B1 ND, B2 0.000715378, B3 ND, B4 ND, B5 ND, B6 ND, B7 ND, C1 0, C2 0.0004697, C3 0.00283881, C4 1.05418e-5, D -0.381104
- Use of renewable primary energy resources used as raw materials (PERM) [MJ]: A1 0, A2 0, A3 0.0753398, A1-A3 0.0753398, A4 0, A5 0, B1 ND, B2 0, B3 ND, B4 ND, B5 ND, B6 ND, B7 ND, C1 0, C2 0, C3 0, C4 0, D 0
- Total use of renewable primary energy (PERT) [MJ]: A1 0.113167, A2 0.00155532, A3 1.2914, A1-A3 1.40612, A4 0.000295028, A5 7.83811e-5, B1 ND, B2 0.000715378, B3 ND, B4 ND, B5 ND, B6 ND, B7 ND, C1 0, C2 0.0004697, C3 0.00283881, C4 1.05418e-5, D -0.381104
- Use of non renewable primary energy as energy carrier (PENRE) [MJ]: A1 2.29985, A2 0.117155, A3 0.303263, A1-A3 2.72027, A4 0.0222231, A5 0.00227389, B1 ND, B2 0.00173161, B3 ND, B4 ND, B5 ND, B6 ND, B7 ND, C1 0, C2 0.0295224, C3 0.0144664, C4 0.000108231, D -0.745066
- Use of non renewable primary energy resources used as raw materials (PENRM) [MJ]: A1 0.417372, A2 0, A3 0.020304, A1-A3 0.437676, A4 0, A5 0, B1 ND, B2 0, B3 ND, B4 ND, B5 ND, B6 ND, B7 ND, C1 0, C2 0, C3 0, C4 0, D 0
- Total use of non renewable primary energy resource (PENRT) [MJ]: A1 2.71722, A2 0.117155, A3 0.323567, A1-A3 3.15795, A4 0.0222231, A5 0.00227389, B1 ND, B2 0.00173161, B3 ND, B4 ND, B5 ND, B6 ND, B7 ND, C1 0, C2 0.0295224, C3 0.0144664, C4 0.000108231, D -0.745066
- Use of secondary material (SM) [kg]: A1 0, A2 0, A3 0, A1-A3 0, A4 0, A5 0, B1 ND, B2 0, B3 ND, B4 ND, B5 ND, B6 ND, B7 ND, C1 0, C2 0, C3 0, C4 0, D 0
- Use of renewable secondary fuels (RSF) [MJ]: A1 0, A2 0, A3 0, A1-A3 0, A4 0, A5 0, B1 ND, B2 0, B3 ND, B4 ND, B5 ND, B6 ND, B7 ND, C1 0, C2 0, C3 0, C4 0, D 0
- Use of non renewable secondary fuels (NRSF) [MJ]: A1 0, A2 0, A3 0, A1-A3 0, A4 0, A5 0, B1 ND, B2 0, B3 ND, B4 ND, B5 ND, B6 ND, B7 ND, C1 0, C2 0, C3 0, C4 0, D 0
- Net use of fresh water (FW) [m3]: A1 0.0267235, A2 0.000243279, A3 0.00409141, A1-A3 0.0310582, A4 4.61476e-5, A5 2.33291e-5, B1 ND, B2 0.005, B3 ND, B4 ND, B5 ND, B6 ND, B7 ND, C1 0, C2 1.14213e-5, C3 0.000160191, C4 5.07842e-7, D -0.00405769

## Outputs
- Hazardous waste disposed (HWD) [kg]: A1 0, A2 0, A3 0, A1-A3 0, A4 0, A5 0, B1 ND, B2 0, B3 ND, B4 ND, B5 ND, B6 ND, B7 ND, C1 0, C2 0, C3 0, C4 0, D 0
- Non harzardous waste disposed (NHWD) [kg]: A1 0, A2 0, A3 0, A1-A3 0, A4 0, A5 0, B1 ND, B2 0, B3 ND, B4 ND, B5 ND, B6 ND, B7 ND, C1 0, C2 0, C3 0, C4 0, D 0
- Radioactive waste disposed (RWD) [kg]: A1 0, A2 0, A3 0, A1-A3 0, A4 0, A5 0, B1 ND, B2 0, B3 ND, B4 ND, B5 ND, B6 ND, B7 ND, C1 0, C2 0, C3 0, C4 0, D 0
- Components for re-use (CRU) [kg]: A1 0, A2 0, A3 0, A1-A3 0, A4 0, A5 0, B1 ND, B2 0, B3 ND, B4 ND, B5 ND, B6 ND, B7 ND, C1 0, C2 0, C3 0, C4 0, D 0
- Materials for recycling (MFR) [kg]: A1 0, A2 0, A3 0.00067782, A1-A3 0.00067782, A4 0, A5 0, B1 ND, B2 0, B3 ND, B4 ND, B5 ND, B6 ND, B7 ND, C1 0, C2 0, C3 0.0067782, C4 0, D 0
- Materials for energy recovery (MER) [kg]: A1 0, A2 0, A3 0.00090585, A1-A3 0.00090585, A4 0, A5 0.0059697, B1 ND, B2 0, B3 ND, B4 ND, B5 ND, B6 ND, B7 ND, C1 0, C2 0, C3 0.018117, C4 0, D 0
- Exported electrical energy (EEE) [MJ]: A1 0, A2 0, A3 0, A1-A3 0, A4 0, A5 0, B1 ND, B2 0, B3 ND, B4 ND, B5 ND, B6 ND, B7 ND, C1 0, C2 0, C3 0, C4 0, D 0
- Exported thermal energy (EET) [MJ]: A1 0, A2 0, A3 0, A1-A3 0, A4 0, A5 0, B1 ND, B2 0, B3 ND, B4 ND, B5 ND, B6 ND, B7 ND, C1 0, C2 0, C3 0, C4 0, D 0

## Impact indicators
- Global Warming Potential - fossil fuels (GWP-fossil) [kg CO2 eq.]: A1 0.0987388, A2 0.00729833, A3 0.0179852, A1-A3 0.124022, A4 0.00138442, A5 0.00453913, B1 ND, B2 1.26289e-5, B3 ND, B4 ND, B5 ND, B6 ND, B7 ND, C1 0, C2 0.00186311, C3 0.0213614, C4 2.31694e-5, D -0.0290629
- Global Warming Potential - biogenic (GWP-biogenic) [kg CO2 eq.]: A1 0.00203908, A2 6.2217e-6, A3 -0.00892492, A1-A3 -0.00687962, A4 1.1802e-6, A5 0.00567185, B1 ND, B2 4.38516e-7, B3 ND, B4 ND, B5 ND, B6 ND, B7 ND, C1 0, C2 1.69089e-6, C3 4.56937e-6, C4 9.44105e-5, D -0.00199875
- Global Warming Potential - land use and land use change (GWP-luluc) [kg CO2 eq.]: A1 0.000109801, A2 2.866e-6, A3 3.71983e-5, A1-A3 0.000149865, A4 5.43652e-7, A5 1.28511e-7, B1 ND, B2 8.9251e-7, B3 ND, B4 ND, B5 ND, B6 ND, B7 ND, C1 0, C2 8.7694e-7, C3 3.54422e-6, C4 2.94562e-9, D -0.000220626
- Global Warming Potential - total (GWP-total) [kg CO2 eq.]: A1 0.100964, A2 0.00730776, A3 0.00912492, A1-A3 0.117397, A4 0.00138621, A5 0.0102118, B1 ND, B2 1.40002e-5, B3 ND, B4 ND, B5 ND, B6 ND, B7 ND, C1 0, C2 0.00186577, C3 0.0213704, C4 0.000123937, D -0.0315591
- Depletion potential of the stratospheric ozone layer (ODP) [kg CFC-11 eq.]: A1 1.06457e-7, A2 1.68905e-9, A3 3.04348e-9, A1-A3 1.1119e-7, A4 3.20397e-10, A5 2.7091e-11, B1 ND, B2 6.13056e-13, B3 ND, B4 ND, B5 ND, B6 ND, B7 ND, C1 0, C2 4.18826e-10, C3 1.99291e-10, C4 1.23137e-12, D -4.44507e-9
- Acidifcation potential, Accumulated Exceedance (AP) [mol H+ eq.]: A1 0.000958526, A2 2.96169e-5, A3 0.000113996, A1-A3 0.00110214, A4 5.61804e-6, A5 2.37207e-6, B1 ND, B2 8.80211e-8, B3 ND, B4 ND, B5 ND, B6 ND, B7 ND, C1 0, C2 7.40426e-6, C3 6.89669e-6, C4 4.11823e-8, D -8.14352e-5
- Europhication potential - freshwater (EP-freshwater) [kg P eq.]: A1 1.25899e-5, A2 5.11653e-8, A3 9.31627e-7, A1-A3 1.35726e-5, A4 9.70557e-9, A5 4.31391e-9, B1 ND, B2 6.8873e-10, B3 ND, B4 ND, B5 ND, B6 ND, B7 ND, C1 0, C2 1.51484e-8, C3 1.80625e-8, C4 5.00061e-10, D -7.21402e-7
- Europhication potential - marine (EP-marine) [kg N eq.]: A1 0.000154007, A2 8.83117e-6, A3 2.09707e-5, A1-A3 0.000183809, A4 1.67519e-6, A5 1.02417e-6, B1 ND, B2 1.48305e-8, B3 ND, B4 ND, B5 ND, B6 ND, B7 ND, C1 0, C2 2.12927e-6, C3 2.69163e-6, C4 1.51776e-7, D -2.73244e-5
- Europhication potential - terrestrial (EP-terrestrial) [mol N eq.]: A1 0.00180579, A2 9.75025e-5, A3 0.000203927, A1-A3 0.00210722, A4 1.84953e-5, A5 1.07357e-5, B1 ND, B2 1.88263e-7, B3 ND, B4 ND, B5 ND, B6 ND, B7 ND, C1 0, C2 2.35489e-5, C3 2.92691e-5, C4 1.44523e-7, D -0.000314611
- Photochemical Ozone Creation Potential (POCP) [kg NMVOC eq.]: A1 0.000492428, A2 2.98604e-5, A3 6.93131e-5, A1-A3 0.000591602, A4 5.66423e-6, A5 2.70858e-6, B1 ND, B2 4.43598e-8, B3 ND, B4 ND, B5 ND, B6 ND, B7 ND, C1 0, C2 7.23864e-6, C3 7.6849e-6, C4 6.82204e-8, D -0.000120709
- Abiotic depletion potential - non-fossil resources (ADPE) [kg Sb eq.]: A1 5.13803e-5, A2 2.53792e-8, A3 1.09847e-6, A1-A3 5.25042e-5, A4 4.81418e-9, A5 7.86883e-10, B1 ND, B2 8.70902e-10, B3 ND, B4 ND, B5 ND, B6 ND, B7 ND, C1 0, C2 8.49061e-9, C3 7.31873e-9, C4 1.97408e-11, D 6.28675e-8
- Abiotic depletion potential - fossil resources (ADPF) [MJ]: A1 2.14684, A2 0.110347, A3 0.283216, A1-A3 2.54041, A4 0.0209318, A5 0.0021147, B1 ND, B2 0.00172516, B3 ND, B4 ND, B5 ND, B6 ND, B7 ND, C1 0, C2 0.0278083, C3 0.0139113, C4 0.000102082, D -0.724548
- Water (user) deprivation potential (WDP) [m3 world eq. deprived]: A1 0.0625871, A2 0.000330454, A3 0.0257635, A1-A3 0.0886811, A4 6.26839e-5, A5 0.000245806, B1 ND, B2 0.0220718, B3 ND, B4 ND, B5 ND, B6 ND, B7 ND, C1 0, C2 9.21074e-5, C3 0.000251168, C4 1.41971e-6, D -0.00390309
- Global Warming Potential (GWP-GHG) [kg CO2 eq.]: A1 0.0916184, A2 0.00700237, A3 0.017232, A1-A3 0.115853, A4 0.00126804, A5 0.00367932, B1 ND, B2 1.18544e-5, B3 ND, B4 ND, B5 ND, B6 ND, B7 ND, C1 0, C2 0.00163526, C3 0.0186429, C4 7.3656e-5, D -0.0264688
- Particulate Matter emissions (PM) [Disease incidence]: A1 1.25899e-5, A2 5.11653e-8, A3 9.31627e-7, A1-A3 1.35726e-5, A4 9.70557e-9, A5 4.31391e-9, B1 ND, B2 6.8873e-10, B3 ND, B4 ND, B5 ND, B6 ND, B7 ND, C1 0, C2 1.51484e-8, C3 1.80625e-8, C4 5.00061e-10, D -7.21402e-7
- Ionizing radiation, human health (IRP) [kBq U235 eq.]: A1 0.00481049, A2 0.000479076, A3 0.000830751, A1-A3 0.00612032, A4 9.08761e-5, A5 5.00378e-6, B1 ND, B2 6.02222e-5, B3 ND, B4 ND, B5 ND, B6 ND, B7 ND, C1 0, C2 0.000120935, C3 0.000232162, C4 5.48516e-7, D -0.0149729
- Eco-toxicity - freshwater (ETP-fw) [CTUe]: A1 14.4134, A2 0.0861219, A3 0.614802, A1-A3 15.1143, A4 0.0163365, A5 0.0189587, B1 ND, B2 0.000812546, B3 ND, B4 ND, B5 ND, B6 ND, B7 ND, C1 0, C2 0.0226899, C3 0.103481, C4 0.0776514, D -0.570603
- Human toxicity, cancer effect (HTP-c) [CTUh]: A1 4.82171e-10, A2 2.78913e-12, A3 5.88115e-11, A1-A3 5.43772e-10, A4 5.29071e-13, A5 1.32146e-12, B1 ND, B2 2.81722e-14, B3 ND, B4 ND, B5 ND, B6 ND, B7 ND, C1 0, C2 8.29425e-13, C3 4.56016e-12, C4 7.63866e-15, D -4.04654e-11
- Human toxicity, non-cancer effects (HTP-nc) [CTUh]: A1 9.68626e-9, A2 9.03007e-11, A3 7.94822e-10, A1-A3 1.05714e-8, A4 1.71292e-11, A5 3.64046e-11, B1 ND, B2 6.43084e-13, B3 ND, B4 ND, B5 ND, B6 ND, B7 ND, C1 0, C2 2.29498e-11, C3 4.69647e-11, C4 2.5714e-13, D -4.96101e-10
- Land use related impacts/Soil quality (SQP) [dimensionless]: A1 0.51921, A2 0.075814, A3 0.974226, A1-A3 1.56925, A4 0.0143812, A5 0.00144688, B1 ND, B2 0.000402674, B3 ND, B4 ND, B5 ND, B6 ND, B7 ND, C1 0, C2 0.0164247, C3 0.00677569, C4 0.000220534, D -0.547792

## Use advice
As per PCR specifications, the following are not included in the system boundary which is necessary to use the electricity:
• Materials for the mounting system of the module
• Microinverters
• Wiring
• Switches
• One or many solar inverters
• Battery bank
• Battery charger
• Other electrical components and systems necessary to connect the photovoltaic module to the electrical grid shall
• Personnel activities and transport of personnel
• Fasteners (screws) and other additional materials

## Data sources
- ecoinvent database (general)
- ecoinvent 3.8 database
