# Mono-crystalline Single glass, P-Type, solar photovoltaic modules

Dataset: ILCD process, EPD, specific dataset
Reference year: 2023
Valid until: 2028
Classification: EPDNorge: Bygg / Solcellepaneler og komponenter
Method details: NPCR 029:2020 Part B for photovoltaic modules
Generated by: LCA.no AS
Registration number: NEPD-5712-4981-EN
Owner: Phono Solar Technology Co.,Ltd
Compliance: EN 15804+A2; ISO 14025; ISO 21930
Review: Independent external review by Julie Lyslo Skullestad - Aase Teknikk AS
Amounts: rows without a unit in brackets have none in this file; such an amount is in the reference unit of its flow, which a separate flow dataset defines
copyright: true
licenseType: Free of charge for all users and uses
accessRestrictions: None

## General comment
Specific data comes from actual consumption of the module assembly factory (August 2021 – July
2022). This data has been collected by the manufacturer and checked by the LCA practitioner.
Generic data is from Ecoinvent v3.6 and SimaPro v9. Characterization factors from
EN15804:2012 + A2: 2019. Generic data <10 years old.

The allocation is made in accordance with the provisions of ISO 14025. Incoming energy and
water and waste production in-house is allocated equally among all products through mass
allocation. Effects of primary production of recycled materials allocated to the main product in
which the material was used. The recycling process and transportation of the material is allocated
to this analysis

All major raw materials and all essential energy is included. The production process for raw
materials and energy flows with very small amounts (<1%) are not included. This cut-off rule
does not apply for hazardous materials and substances.

## Geography
World

## Time period
"2023-12-22" - "2028-12-22"

## Technology and included processes
This EPD is valid for the following module types:
? PSXXXM4-20/UH
? PSXXXM4-22/WH
? PSXXXM4-24/TH
? PSXXXM6-20/UH
? PSXXXM6-22/WH
? PSXXXM6(H)-24/TH
? PSXXXM6(H)-22/WH
? PSXXXM6(H)-20/UH
? PSXXXM6(H)-18/VH
This study has been conducted according to the requirements of:
- ISO 14044;
- ISO 14025;
- EN15804+A2:2019;
- NPCR part A “Construction products and services” version 2.0;
- NPCR part B “for photovoltaic modules used in the building and construction industry,
including production of cell, wafer, ingot block, solar grade silicon, solar substrates, solar
superstrates and other solar grade semiconductor materials” version 1.1.

## Technical purpose
Mono-crystalline solar photovoltaic modules are designed to be installed on roofs or as standalone systems for local power production. All the modules included in this EPD are single glass
and the solar cells are produced with PERC process. Solar cells are assembled with the EVA, glass,
frame and electrical connections to produce the finished solar module in the production factory
in Nanjing in China.
This EPD represents multiples modules with small variations over the size, the number of cells,
power… (see table of module characteristics in “Technical details”). The results are calculated
based on the maximum inventory amongst the modules. The variation between each module
results is lower than 10 %. The packaging consists of LDPE, PP, paper and a cardboard box, and the panels are delivered on
a wooden pallet.

## Reference product
- Mono-crystalline Single glass, P-Type, solar photovoltaic modules: 1; General reminder flow; measured

## Inputs
- Use of renewable primary energy (PERE) [MJ]: A1-A3 2.35, A4 0.00339, A5 0.000191, C1 0, C2 5.19e-5, C3 0.013, C4 0.000179, D -0.0318
- Use of renewable primary energy resources used as raw materials (PERM) [MJ]: A1-A3 0, A4 0, A5 0, C1 0, C2 0, C3 0, C4 0, D 0
- Total use of renewable primary energy resource (PERT) [MJ]: A1-A3 2.35, A4 0.00339, A5 0.000191, C1 0, C2 5.19e-5, C3 0.013, C4 0.000179, D -0.0318
- Use of non renewable primary energy (PENRE) [MJ]: A1-A3 9.62, A4 0.315, A5 0.00897, C1 0, C2 0.00408, C3 0.00238, C4 0.00372, D -0.315
- Use of non renewable primary energy resources used as raw materials (PENRM) [MJ]: A1-A3 0, A4 0, A5 0, C1 0, C2 0, C3 0, C4 0, D 0
- Total use of non renewable primary energy resource (PENRT) [MJ]: A1-A3 9.61, A4 0.315, A5 0.00897, C1 0, C2 0.00407, C3 0.00238, C4 0.00372, D -0.315
- Use of secondary material (SM) [kg]: A1-A3 0, A4 0, A5 0, C1 0, C2 0, C3 0, C4 0, D 0
- Use of renewable secondary fuels (RSF) [MJ]: A1-A3 0, A4 0, A5 0, C1 0, C2 0, C3 0, C4 0, D 0
- Use of non renewable secondary fuels (NRSF) [MJ]: A1-A3 0, A4 0, A5 0, C1 0, C2 0, C3 0, C4 0, D 0
- Use of net fresh water (FW) [m3]: A1-A3 0.0115, A4 2.45e-5, A5 3.26e-6, C1 0, C2 4.39e-7, C3 9.67e-5, C4 1.98e-6, D -6.72e-5

## Outputs
- Hazardous waste disposed (HWD) [kg]: A1-A3 0.0798, A4 0.000274, A5 0.000516, C1 0, C2 2.82e-6, C3 0.000495, C4 0.00365, D -0.00439
- Non hazardous waste dispose (NHWD) [kg]: A1-A3 0.792, A4 0.0118, A5 0.000492, C1 0, C2 0.000402, C3 0.000228, C4 0.000161, D -0.0198
- Radioactive waste disposed (RWD) [kg]: A1-A3 1.85e-5, A4 2.14e-6, A5 5.85e-8, C1 0, C2 2.76e-8, C3 1.68e-8, C4 1.75e-8, D -5.23e-7
- Components for re-use (CRU) [kg]: A1-A3 0, A4 0, A5 0, C1 0, C2 0, C3 0, C4 0, D 0
- Materials for recycling (MFR) [kg]: A1-A3 0, A4 0, A5 0, C1 0, C2 0, C3 0.105, C4 0, D 0
- Materials for energy recovery (MER) [kg]: A1-A3 0, A4 0, A5 0, C1 0, C2 0, C3 0, C4 0, D 0
- Exported electrical energy (EEE) [MJ]: A1-A3 0, A4 0, A5 0, C1 0, C2 0, C3 0.131, C4 0, D 0.188
- Exported thermal energy (EET) [MJ]: A1-A3 0, A4 0, A5 0, C1 0, C2 0, C3 0.0562, C4 0, D 0

## Impact indicators
- Acidification potential, Accumulated Exceedance (AP) [mol H+ eqv.]: A1-A3 0.00469, A4 0.000367, A5 2.81e-6, C1 0, C2 1.09e-6, C3 1.34e-6, C4 1.97e-6, D -0.000184
- Global Warming Potential - total (GWP-total) [kg CO2 eqv.]: A1-A3 0.836, A4 0.0225, A5 0.00585, C1 0, C2 0.000262, C3 0.00108, C4 0.000606, D -0.028
- Global Warming Potential - biogenic (GWP-biogenic) [kg CO2 eqv.]: A1-A3 -0.00129, A4 7.53e-6, A5 0.00431, C1 0, C2 1.04e-7, C3 3.08e-6, C4 1.27e-6, D -0.000273
- Global Warming Potential - fossil fuels (GWP-fossil) [kg CO2 eqv.]: A1-A3 0.836, A4 0.0224, A5 0.00154, C1 0, C2 0.000261, C3 0, C4 0.000605, D -0.0276
- Global Warming Potential - land use and land use change (GWP-luluc) [kg CO2 eqv.]: A1-A3 0.000744, A4 1.21e-5, A5 2.65e-7, C1 0, C2 9.4e-8, C3 5.19e-7, C4 4.03e-7, D -8.93e-5
- Potential Comparative Toxic Unit for ecosystems (ETP-fw) [CTUe]: A1-A3 28.3, A4 0.23, A5 0.0114, C1 0, C2 0.00318, C3 0.00759, C4 0.0481, D -0.728
- Potential incidence of disease due to PM emissions (PM) [disease incidence]: A1-A3 5.67e-8, A4 1.17e-9, A5 4.2e-11, C1 0, C2 2.4e-11, C3 1.3e-11, C4 1.7e-11, D -2.17e-9
- Eutrophication potential - marine (EP-marine) [kg N eqv.]: A1-A3 0.000986, A4 9.28e-5, A5 9.05e-7, C1 0, C2 3.3e-7, C3 3.65e-7, C4 5.59e-7, D -2.89e-5
- Eutrophication potential - freshwater (EP-freshwater) [kg P eqv.]: A1-A3 4.22e-5, A4 1.29e-7, A5 6.27e-9, C1 0, C2 1.79e-9, C3 5.21e-9, C4 1.37e-8, D -8.95e-7
- Eutrophication potential - terrestrial (EP-terrestrial) [mol N eqv.]: A1-A3 0.00984, A4 0.00103, A5 9.82e-6, C1 0, C2 3.64e-6, C3 4.92e-6, C4 6.43e-6, D -0.000319
- Potential Comparative Toxic Unit for humans - cancer effects (HTP-c) [CTUh]: A1-A3 7.39e-10, A4 1.1e-11, A5 0, C1 0, C2 0, C3 0, C4 2.6e-11, D -3.4e-11
- Potential Comparative Toxic Unit for humans - non-cancer effects (HTP-nc) [CTUh]: A1-A3 3.2e-8, A4 2.07e-10, A5 1.7e-11, C1 0, C2 3e-12, C3 1.3e-11, C4 1.39e-10, D -5.96e-10
- Potential Human exposure efficiency relative to U235 (IRP) [kBq U235 eqv.]: A1-A3 0.0197, A4 0.00135, A5 3.91e-5, C1 0, C2 1.77e-5, C3 3.07e-5, C4 1.28e-5, D -0.000457
- Potential Soil quality index (SQP) [unitless]: A1-A3 28.1, A4 0.2, A5 0.00868, C1 0, C2 0.00718, C3 0.00494, C4 0.00779, D -0.186
- Depletion potential of the stratospheric ozone layer (ODP) [kg CFC 11 eqv.]: A1-A3 5.34e-7, A4 4.83e-9, A5 1.31e-10, C1 0, C2 6.2e-11, C3 1.4e-11, C4 3.6e-11, D -1.44e-9
- Photochemical Ozone Creation Potential (POCP) [kg NMVOC eqv.]: A1-A3 0.00357, A4 0.000275, A5 2.85e-6, C1 0, C2 1.17e-6, C3 1.02e-6, C4 1.66e-6, D -9.34e-5
- Abiotic depletion potential - fossil resources (ADPF) [MJ]: A1-A3 9.63, A4 0.315, A5 0.00898, C1 0, C2 0.00408, C3 0.00242, C4 0.00372, D -0.315
- Abiotic depletion potential - non-fossil resources (ADPE) [kg Sb-eqv.]: A1-A3 4.31e-5, A4 5.75e-8, A5 2.07e-9, C1 0, C2 6e-10, C3 3.33e-9, C4 1.96e-9, D 1.04e-7
- Water (user) deprivation potential (WDP) [m3 world eqv.]: A1-A3 0.456, A4 0.000774, A5 0.000155, C1 0, C2 1.36e-5, C3 0.000212, C4 7.75e-5, D -0.00296
- Global warming potential except emissions and uptake of biogenic carbon (GWP-IOBC/GHG) [kg CO2 eqv.]: 0

## Use advice
The study is based on a cradle to grave analysis i.e., from raw material extraction to the disposal
of waste. A summary of what is included and excluded is shown below

## Data sources
- NEPD-5712-4981_Mono-crystalline-Single-glass--P-Type--solar-photovoltaic-modules.pdf
