# N-type Bifacial Double Glass Photovoltaic Modules JW-HD144N-182 JW-HD156N-182

Dataset: ILCD process, EPD, specific dataset
Geography: GLO
Reference year: 2023
Valid until: 2028
Classification: The International EPD System: Construction products
Method details: 2019:14-c-PCR-016 Photovoltaic modules and parts thereof
Generated by: Dandan Li, dandan.li@startalers.cn
Registration number: EPD-IES-0003811:003 (S-P-03811)
Owner: Jolywood (Taizhou) Solar Technology Co., Ltd.
Compliance: EN 15804+A2 (EF 3.0); ISO 14025
Review: Independent external review by Marcel Gómez Ferrer
Amounts: rows without a unit in brackets have none in this file; such an amount is in the reference unit of its flow, which a separate flow dataset defines
copyright: true
licenseType: Free of charge for all users and uses
accessRestrictions: Your use of this material is subject to the General Terms of Use published on by EPD International AB:s homepage at https://www.environdec.com/contact/General-terms-of-use/. If you have not accepted EPD International AB:s the General Terms of Use, you are not authorized to exploit this work in any manner.

## Technology and included processes
System boundary of this study is cradle to gate with options, modules C1–C4, module D and with optional modules (A1–A3 + C + D and A4-A5, B2). According to the product category rules (PCR), mounting structures like inverter, wiring, etc., are not considered in this study.

## Technical purpose
The PV module can be installed both as rooftop and ground-mounted type.

## Reference product
- 1 Wp of manufactured photovoltaic module: 1

## Inputs
- Use of renewable primary energy as energy carrier (PERE) [MJ]: A1-A3 0.949, A4 0.00276, A5 0.033, B1 ND, B2 2.14e-5, B3 ND, B4 ND, B5 ND, B6 ND, B7 ND, C1 0.00017, C2 0.000113, C3 0.0233, C4 0.000169, D -0.169
- Use of renewable primary energy resources used as raw materials (PERM) [MJ]: A1-A3 0.0328, A4 0, A5 -0.0328, B1 ND, B2 0, B3 ND, B4 ND, B5 ND, B6 ND, B7 ND, C1 0, C2 0, C3 0, C4 0, D 0
- Total use of renewable primary energy (PERT) [MJ]: A1-A3 0.981, A4 0.00276, A5 0.000206, B1 ND, B2 2.14e-5, B3 ND, B4 ND, B5 ND, B6 ND, B7 ND, C1 0.00017, C2 0.000113, C3 0.0233, C4 0.000169, D -0.169
- Use of non renewable primary energy as energy carrier (PENRE) [MJ]: A1-A3 5.61, A4 0.219, A5 0.0193, B1 ND, B2 0.000213, B3 ND, B4 ND, B5 ND, B6 ND, B7 ND, C1 0.0175, C2 0.00694, C3 0.0564, C4 0.515, D -1.25
- Use of non renewable primary energy resources used as raw materials (PENRM) [MJ]: A1-A3 0.513, A4 0, A5 0, B1 ND, B2 0, B3 ND, B4 ND, B5 ND, B6 ND, B7 ND, C1 0, C2 0, C3 0, C4 -0.513, D 0
- Total use of non renewable primary energy resource (PENRT) [MJ]: A1-A3 6.12, A4 0.219, A5 0.0193, B1 ND, B2 0.000213, B3 ND, B4 ND, B5 ND, B6 ND, B7 ND, C1 0.0175, C2 0.00694, C3 0.0564, C4 0.00233, D -1.25
- Use of secondary material (SM) [kg]: A1-A3 0, A4 0, A5 0, B1 ND, B2 0, B3 ND, B4 ND, B5 ND, B6 ND, B7 ND, C1 0, C2 0, C3 0, C4 0, D 0
- Use of renewable secondary fuels (RSF) [MJ]: A1-A3 0, A4 0, A5 0, B1 ND, B2 0, B3 ND, B4 ND, B5 ND, B6 ND, B7 ND, C1 0, C2 0, C3 0, C4 0, D 0
- Use of non renewable secondary fuels (NRSF) [MJ]: A1-A3 0, A4 0, A5 0, B1 ND, B2 0, B3 ND, B4 ND, B5 ND, B6 ND, B7 ND, C1 0, C2 0, C3 0, C4 0, D 0
- Net use of fresh water (FW) [m3]: A1-A3 0.0117, A4 2.85e-5, A5 2.52e-6, B1 ND, B2 1.76e-5, B3 ND, B4 ND, B5 ND, B6 ND, B7 ND, C1 1.68e-6, C2 1.03e-6, C3 9.5e-5, C4 2.64e-5, D -0.000568

## Outputs
- Hazardous waste disposed (HWD) [kg]: A1-A3 0.000668, A4 1.35e-6, A5 1.31e-7, B1 ND, B2 5.62e-10, B3 ND, B4 ND, B5 ND, B6 ND, B7 ND, C1 1.19e-7, C2 4.57e-8, C3 1.54e-7, C4 1.28e-8, D 6.12e-6
- Non harzardous waste disposed (NHWD) [kg]: A1-A3 0.0391, A4 0.00832, A5 0.000116, B1 ND, B2 2.32e-6, B3 ND, B4 ND, B5 ND, B6 ND, B7 ND, C1 2.77e-5, C2 0.000357, C3 0.0468, C4 0.0079, D -0.0118
- Radioactive waste disposed (RWD) [kg]: A1-A3 5.39e-6, A4 4.92e-8, A5 4.09e-9, B1 ND, B2 4.9e-10, B3 ND, B4 ND, B5 ND, B6 ND, B7 ND, C1 3.47e-9, C2 2.36e-9, C3 8.84e-7, C4 2.24e-9, D -2.24e-6
- Components for re-use (CRU) [kg]: A1-A3 0, A4 0, A5 0, B1 ND, B2 0, B3 ND, B4 ND, B5 ND, B6 ND, B7 ND, C1 0, C2 0, C3 0, C4 0, D 0
- Materials for recycling (MFR) [kg]: A1-A3 0.000625, A4 0, A5 0.00164, B1 ND, B2 0, B3 ND, B4 ND, B5 ND, B6 ND, B7 ND, C1 0, C2 0, C3 0.0417, C4 0, D 0
- Materials for energy recovery (MER) [kg]: A1-A3 1.03e-5, A4 0, A5 0.00131, B1 ND, B2 0, B3 ND, B4 ND, B5 ND, B6 ND, B7 ND, C1 0, C2 0, C3 0.000397, C4 0, D 0
- Exported electrical energy (EEE) [MJ]: A1-A3 0, A4 0, A5 0, B1 ND, B2 0, B3 ND, B4 ND, B5 ND, B6 ND, B7 ND, C1 0, C2 0, C3 0, C4 0, D 0.00243
- Exported thermal energy (EET) [MJ]: A1-A3 0, A4 0, A5 0, B1 ND, B2 0, B3 ND, B4 ND, B5 ND, B6 ND, B7 ND, C1 0, C2 0, C3 0, C4 0, D 0.00135

## Impact indicators
- Global Warming Potential - fossil fuels (GWP-fossil) [kg CO2 eq.]: A1-A3 0.444, A4 0.0169, A5 0.0017, B1 ND, B2 1.61e-5, B3 ND, B4 ND, B5 ND, B6 ND, B7 ND, C1 0.00141, C2 0.000519, C3 0.00537, C4 0.000872, D -0.0938
- Global Warming Potential - biogenic (GWP-biogenic) [kg CO2 eq.]: A1-A3 -0.00137, A4 7.35e-6, A5 0.00297, B1 ND, B2 9.59e-8, B3 ND, B4 ND, B5 ND, B6 ND, B7 ND, C1 6.12e-7, C2 5.15e-7, C3 0.000203, C4 2.39e-6, D 0.000905
- Global Warming Potential - land use and land use change (GWP-luluc) [kg CO2 eq.]: A1-A3 0.00043, A4 9.78e-6, A5 3.18e-7, B1 ND, B2 2.51e-8, B3 ND, B4 ND, B5 ND, B6 ND, B7 ND, C1 2.44e-7, C2 2.52e-7, C3 1.32e-5, C4 8.86e-8, D -0.000187
- Global Warming Potential - total (GWP-total) [kg CO2 eq.]: A1-A3 0.443, A4 0.0169, A5 0.00466, B1 ND, B2 1.62e-5, B3 ND, B4 ND, B5 ND, B6 ND, B7 ND, C1 0.00141, C2 0.00052, C3 0.00558, C4 0.000874, D -0.093
- Depletion potential of the stratospheric ozone layer (ODP) [kg CFC-11 eq.]: A1-A3 7.34e-9, A4 2.87e-10, A5 2.73e-11, B1 ND, B2 2.43e-12, B3 ND, B4 ND, B5 ND, B6 ND, B7 ND, C1 2.15e-11, C2 1.1e-11, C3 9.47e-11, C4 1.88e-11, D -1.16e-9
- Acidifcation potential, Accumulated Exceedance (AP) [mol H+ eq.]: A1-A3 0.00254, A4 0.000171, A5 1.32e-5, B1 ND, B2 8.38e-8, B3 ND, B4 ND, B5 ND, B6 ND, B7 ND, C1 1.26e-5, C2 1.11e-6, C3 2.65e-5, C4 8.13e-7, D -0.000665
- Europhication potential - freshwater (EP-freshwater) [kg P eq.]: A1-A3 0.000114, A4 1.06e-6, A5 7.71e-8, B1 ND, B2 6.86e-9, B3 ND, B4 ND, B5 ND, B6 ND, B7 ND, C1 6.12e-8, C2 3.6e-8, C3 4.82e-6, C4 3.44e-8, D -4.15e-5
- Europhication potential - marine (EP-marine) [kg N eq.]: A1-A3 0.000551, A4 4.26e-5, A5 6.04e-6, B1 ND, B2 1.69e-8, B3 ND, B4 ND, B5 ND, B6 ND, B7 ND, C1 5.78e-6, C2 2.79e-7, C3 4.71e-6, C4 2.97e-7, D -0.000124
- Europhication potential - terrestrial (EP-terrestrial) [mol N eq.]: A1-A3 0.00546, A4 0.000465, A5 6.54e-5, B1 ND, B2 1.71e-7, B3 ND, B4 ND, B5 ND, B6 ND, B7 ND, C1 6.28e-5, C2 2.83e-6, C3 4.15e-5, C4 2.88e-6, D -0.00146
- Photochemical Ozone Creation Potential (POCP) [kg NMVOC eq.]: A1-A3 0.00159, A4 0.000146, A5 1.94e-5, B1 ND, B2 5.57e-8, B3 ND, B4 ND, B5 ND, B6 ND, B7 ND, C1 1.86e-5, C2 1.72e-6, C3 1.34e-5, C4 1.07e-6, D -0.000403
- Abiotic depletion potential - non-fossil resources (ADPE) [kg Sb eq.]: A1-A3 1.22e-5, A4 4.27e-8, A5 9.48e-10, B1 ND, B2 7.29e-11, B3 ND, B4 ND, B5 ND, B6 ND, B7 ND, C1 5.07e-10, C2 1.65e-9, C3 1.05e-8, C4 5.29e-10, D -7.87e-6
- Abiotic depletion potential - fossil resources (ADPF) [MJ]: A1-A3 4.99, A4 0.224, A5 0.0198, B1 ND, B2 0.000201, B3 ND, B4 ND, B5 ND, B6 ND, B7 ND, C1 0.0181, C2 0.00718, C3 0.121, C4 0.00242, D -1.17
- Water (user) deprivation potential (WDP) [m3 world eq. deprived]: A1-A3 0.476, A4 0.000859, A5 6.24e-5, B1 ND, B2 0.000732, B3 ND, B4 ND, B5 ND, B6 ND, B7 ND, C1 4.64e-5, C2 3e-5, C3 0.00126, C4 9.45e-5, D -0.0161
- Global Warming Potential (GWP-GHG) [kg CO2 eq.]: A1-A3 0.445, A4 0.0169, A5 0.0017, B1 ND, B2 1.61e-5, B3 ND, B4 ND, B5 ND, B6 ND, B7 ND, C1 0.00141, C2 0.000519, C3 0.00538, C4 0.000872, D -0.0939

## Use advice
The results of this study shall be used with care, considering the assumptions and scenarios applied in the LCA study.

## Data sources
- ecoinvent database (general)
- ecoinvent 3.9 database
