# LONGi Photovoltaic Modules

Dataset: ILCD process, EPD, representative dataset
Geography: GLO
Reference year: 2025
Valid until: 2030
Classification: The International EPD System: Construction products
Functional unit: 1 Wp of manufactured photovoltaic module, with activities needed for a study period for a defined reference service life (≥80% of the labelled power output, estimated at 25 years).
Method details: 2019:14-c-PCR-016 Photovoltaic modules and parts thereof
Generated by: Hongyu Tian, hongyu.tian@tuvsud.com
Registration number: EPD-IES-0018640:001
Owner: LONGi Green Energy Technology Co., Ltd.
Compliance: EN 15804+A2 (EF 3.1); ISO 14025
Review: Independent external review by Marcel Gómez Ferrer
Amounts: rows without a unit in brackets have none in this file; such an amount is in the reference unit of its flow, which a separate flow dataset defines
copyright: true
licenseType: Free of charge for all users and uses
accessRestrictions: Your use of this material is subject to the General Terms of Use published on by EPD International AB:s homepage at https://www.environdec.com/contact/General-terms-of-use/. If you have not accepted EPD International AB:s the General Terms of Use, you are not authorized to exploit this work in any manner.

## Technology and included processes
Raw materials of the PV modules include solar cells, solar glass, frame, silicone gel, junction box and packaging etc.

## Technical purpose
The PV module can be installed both as rooftop and ground-mounted type.

## Reference product
- 1 Wp of manufactured photovoltaic module: 1

## Inputs
- Use of renewable primary energy as energy carrier (PERE) [MJ]: A1-A3 0.881, A4 0.00191, A5 0.000321, B1 0, B2 2.31e-5, B3 0, B4 0, B5 0, B6 0, B7 0, C1 0.000289, C2 0.000105, C3 0.036, C4 0.033, D -0.145
- Use of renewable primary energy resources used as raw materials (PERM) [MJ]: A1-A3 0.0329, A4 0, A5 0, B1 0, B2 0, B3 0, B4 0, B5 0, B6 0, B7 0, C1 0, C2 0, C3 0, C4 -0.0329, D 0
- Total use of renewable primary energy (PERT) [MJ]: A1-A3 0.914, A4 0.00191, A5 0.000321, B1 0, B2 2.31e-5, B3 0, B4 0, B5 0, B6 0, B7 0, C1 0.000289, C2 0.000105, C3 0.036, C4 0.000149, D -0.145
- Use of non renewable primary energy as energy carrier (PENRE) [MJ]: A1-A3 3.17, A4 0.0157, A5 0.184, B1 0, B2 4.78e-5, B3 0, B4 0, B5 0, B6 0, B7 0, C1 0.000922, C2 0.000565, C3 0.00115, C4 0.000368, D -0.561
- Use of non renewable primary energy resources used as raw materials (PENRM) [MJ]: A1-A3 0.183, A4 0, A5 -0.183, B1 0, B2 0, B3 0, B4 0, B5 0, B6 0, B7 0, C1 0, C2 0, C3 0, C4 0, D 0
- Total use of non renewable primary energy resource (PENRT) [MJ]: A1-A3 3.35, A4 0.0157, A5 0.00109, B1 0, B2 4.78e-5, B3 0, B4 0, B5 0, B6 0, B7 0, C1 0.000922, C2 0.000565, C3 0.00115, C4 0.000368, D -0.561
- Use of secondary material (SM) [kg]: A1-A3 0, A4 0, A5 0, B1 0, B2 0, B3 0, B4 0, B5 0, B6 0, B7 0, C1 0, C2 0, C3 0, C4 0, D 0
- Use of renewable secondary fuels (RSF) [MJ]: A1-A3 0, A4 0, A5 0, B1 0, B2 0, B3 0, B4 0, B5 0, B6 0, B7 0, C1 0, C2 0, C3 0, C4 0, D 0
- Use of non renewable secondary fuels (NRSF) [MJ]: A1-A3 0, A4 0, A5 0, B1 0, B2 0, B3 0, B4 0, B5 0, B6 0, B7 0, C1 0, C2 0, C3 0, C4 0, D 0
- Net use of fresh water (FW) [m3]: A1-A3 0.0118, A4 1.84e-5, A5 2.47e-6, B1 0, B2 2.43e-5, B3 0, B4 0, B5 0, B6 0, B7 0, C1 1.6e-6, C2 8.41e-7, C3 6.87e-5, C4 1.23e-5, D -0.000428

## Outputs
- Hazardous waste disposed (HWD) [kg]: A1-A3 0.000701, A4 1.1e-6, A5 1.35e-7, B1 0, B2 5.54e-10, B3 0, B4 0, B5 0, B6 0, B7 0, C1 1.22e-7, C2 4.09e-8, C3 1.66e-8, C4 6.17e-8, D -2.56e-6
- Non harzardous waste disposed (NHWD) [kg]: A1-A3 0.0184, A4 0.00352, A5 8.45e-5, B1 0, B2 1.05e-6, B3 0, B4 0, B5 0, B6 0, B7 0, C1 1.15e-5, C2 0.000293, C3 0.0382, C4 0.00729, D -0.00393
- Radioactive waste disposed (RWD) [kg]: A1-A3 5.72e-6, A4 3e-8, A5 6.62e-9, B1 0, B2 6.81e-10, B3 0, B4 0, B5 0, B6 0, B7 0, C1 6.06e-9, C2 1.96e-9, C3 8.21e-7, C4 2.17e-9, D -1.55e-6
- Components for re-use (CRU) [kg]: A1-A3 0, A4 0, A5 0, B1 0, B2 0, B3 0, B4 0, B5 0, B6 0, B7 0, C1 0, C2 0, C3 0, C4 0, D 0
- Materials for recycling (MFR) [kg]: A1-A3 0.0012, A4 0, A5 0.00151, B1 0, B2 0, B3 0, B4 0, B5 0, B6 0, B7 0, C1 0, C2 0, C3 0.0306, C4 0, D 0
- Materials for energy recovery (MER) [kg]: A1-A3 0, A4 0, A5 0.000937, B1 0, B2 0, B3 0, B4 0, B5 0, B6 0, B7 0, C1 0, C2 0, C3 0, C4 0.00575, D 0
- Exported electrical energy (EEE) [MJ]: A1-A3 0, A4 0, A5 0, B1 0, B2 0, B3 0, B4 0, B5 0, B6 0, B7 0, C1 0, C2 0, C3 0, C4 0, D 0.0311
- Exported thermal energy (EET) [MJ]: A1-A3 0, A4 0, A5 0, B1 0, B2 0, B3 0, B4 0, B5 0, B6 0, B7 0, C1 0, C2 0, C3 0, C4 0, D 0.0591

## Impact indicators
- Global Warming Potential - fossil fuels (GWP-fossil) [kg CO2 eq.]: A1-A3 0.393, A4 0.0148, A5 0.00179, B1 0, B2 7.28e-6, B3 0, B4 0, B5 0, B6 0, B7 0, C1 0.00135, C2 0.000432, C3 0.00032, C4 0.0137, D -0.0855
- Global Warming Potential - biogenic (GWP-biogenic) [kg CO2 eq.]: A1-A3 -0.00353, A4 0, A5 0.00353, B1 0, B2 0, B3 0, B4 0, B5 0, B6 0, B7 0, C1 0, C2 0, C3 0, C4 0, D 0
- Global Warming Potential - land use and land use change (GWP-luluc) [kg CO2 eq.]: A1-A3 0.000332, A4 7.09e-6, A5 3.79e-7, B1 0, B2 1.4e-8, B3 0, B4 0, B5 0, B6 0, B7 0, C1 3.43e-7, C2 1.43e-7, C3 4.49e-5, C4 5.69e-8, D -0.000129
- Global Warming Potential - total (GWP-total) [kg CO2 eq.]: A1-A3 0.39, A4 0.0149, A5 0.00532, B1 0, B2 7.29e-6, B3 0, B4 0, B5 0, B6 0, B7 0, C1 0.00135, C2 0.000432, C3 0.000365, C4 0.0137, D -0.0856
- Depletion potential of the stratospheric ozone layer (ODP) [kg CFC-11 eq.]: A1-A3 3.26e-8, A4 2.23e-10, A5 2.3e-11, B1 0, B2 1.04e-13, B3 0, B4 0, B5 0, B6 0, B7 0, C1 2.07e-11, C2 8.59e-12, C3 9.47e-12, C4 5.89e-12, D -2.13e-9
- Acidifcation potential, Accumulated Exceedance (AP) [mol H+ eq.]: A1-A3 0.00222, A4 0.000302, A5 1.26e-5, B1 0, B2 3.89e-8, B3 0, B4 0, B5 0, B6 0, B7 0, C1 1.22e-5, C2 9e-7, C3 1.8e-6, C4 3.24e-6, D -0.000433
- Europhication potential - freshwater (EP-freshwater) [kg P eq.]: A1-A3 1.92e-5, A4 8.17e-8, A5 5.84e-9, B1 0, B2 4.81e-10, B3 0, B4 0, B5 0, B6 0, B7 0, C1 4.81e-9, C2 3.37e-9, C3 1.21e-8, C4 3.43e-9, D -2.54e-6
- Europhication potential - marine (EP-marine) [kg N eq.]: A1-A3 0.000508, A4 7.49e-5, A5 5.8e-6, B1 0, B2 6.38e-9, B3 0, B4 0, B5 0, B6 0, B7 0, C1 5.64e-6, C2 2.11e-7, C3 3.96e-7, C4 1.54e-6, D -9.23e-5
- Europhication potential - terrestrial (EP-terrestrial) [mol N eq.]: A1-A3 0.00489, A4 0.000833, A5 6.35e-5, B1 0, B2 7.21e-8, B3 0, B4 0, B5 0, B6 0, B7 0, C1 6.18e-5, C2 2.33e-6, C3 4.92e-6, C4 1.59e-5, D -0.00112
- Photochemical Ozone Creation Potential (POCP) [kg NMVOC eq.]: A1-A3 0.00152, A4 0.000234, A5 1.91e-5, B1 0, B2 2.39e-8, B3 0, B4 0, B5 0, B6 0, B7 0, C1 1.84e-5, C2 1.5e-6, C3 1.24e-6, C4 4.15e-6, D -0.000324
- Abiotic depletion potential - non-fossil resources (ADPE) [kg Sb eq.]: A1-A3 2.49, A4 0.012, A5 0.00112, B1 0, B2 8.66e-5, B3 0, B4 0, B5 0, B6 0, B7 0, C1 0.000973, C2 0.000505, C3 0.0516, C4 0.000411, D -0.471
- Abiotic depletion potential - fossil resources (ADPF) [MJ]: A1-A3 2.05e-5, A4 2.57e-8, A5 8.79e-10, B1 0, B2 3.97e-11, B3 0, B4 0, B5 0, B6 0, B7 0, C1 5.18e-10, C2 1.41e-9, C3 7.37e-9, C4 6.1e-10, D -4.24e-6
- Water (user) deprivation potential (WDP) [m3 world eq. deprived]: A1-A3 0.452, A4 0.000586, A5 5.14e-5, B1 0, B2 0.00104, B3 0, B4 0, B5 0, B6 0, B7 0, C1 4.18e-5, C2 2.52e-5, C3 0.000718, C4 -0.000125, D -0.0124
- Global Warming Potential (GWP-GHG) [kg CO2 eq.]: A1-A3 0.394, A4 0.0149, A5 0.00179, B1 0, B2 7.29e-6, B3 0, B4 0, B5 0, B6 0, B7 0, C1 0.00135, C2 0.000432, C3 0.000365, C4 0.0137, D -0.0856

## Use advice
Results should be used with care by considering the system boundary, assumptions etc..

## Data sources
- ecoinvent database (general)
- ecoinvent 3.10 database
